// SBML level 2 version 3
// This model was downloaded from BioModels Database
// http://www.ebi.ac.uk/biomodels/

model Keizer1996_Ryanodine_receptor_adaptation()
  // The model reproduces the time profile of Open probability of the ryanodine receptor as shown in Fig 2A and 2B of the paper. The model was successfully tested on MathSBML and Jarnac.
  // To the extent possible under law, all copyright and related or neighbouring rights to this encoded model have been dedicated to the public domain worldwide. Please refer to CC0 Public Domain Dedication for more information.
  // In summary, you are entitled to use this encoded model in absolutely any manner you deem suitable, verbatim, or with modification, alone or embedded it in a larger context, redistribute it, commercially or not, in a restricted way or not.
  // To cite BioModels Database, please use: Li C, Donizelli M, Rodriguez N, Dharuri H, Endler L, Chelliah V, Li L, He E, Henry A, Stefan MI, Snoep JL, Hucka M, Le Novère N, Laibe C (2010) BioModels Database: An enhanced, curated and annotated resource for published quantitative kinetic models. BMC Syst Biol., 4:92.
  // biomodels.db:MODEL0332756009
  // biomodels.db:BIOMD0000000060
  // isDescribedBy pubmed:8968617
  // hasTaxon taxonomy:131567
  // kegg.pathway:map04020
  // hasPart GO:0005219 GO:0048763 GO:0019722

  // Compartments:
  compartment compartment = 1;  // GO:0005623

  // Species:
  substanceOnly species Pc1 in compartment = 0.963;  // isVersionOf uniprot:P21817
  substanceOnly species Po2 in compartment = 0;  // isVersionOf uniprot:P21817
  substanceOnly species Po1 in compartment = 0;  // isVersionOf uniprot:P21817
  substanceOnly species Pc2 in compartment = 0.037;  // isVersionOf uniprot:P21817

  // Parameters:
  Open_probability has dimensionless;

  // Assignment rules:
  Open_probability := Po1 + Po2;

  // Reactions:
  Closed_state_1: Po1 -> Pc1; ka_minus*Po1 - ka_plus*Closed_state_1_Ca^n*Pc1;  // isVersionOf GO:0005219
    ka_minus = 28.8 per_second; ka_plus = 1500 per_microM4sec; Closed_state_1_Ca = 0.9 microM; n = 4 dimensionless;
  Open_state_2: Po1 -> Po2; kb_plus*Open_state_2_Ca^m*Po1 - kb_minus*Po2;  // isVersionOf GO:0005219
    kb_plus = 1500 per_microM3sec; Open_state_2_Ca = 0.9 microM; m = 3 dimensionless; kb_minus = 385.9 per_second;
  Closed_State_2: Po1 -> Pc2; kc_plus*Po1 - kc_minus*Pc2;  // isVersionOf GO:0005219
    kc_plus = 1.75 per_second; kc_minus = 0.1 per_second;

  // Unit definitions:
  unit per_microM4sec = litre^4 / ((1e-6 mole)^4 * second); per_microM4sec is "microM-4sec-1";
  unit per_microM3sec = litre^3 / ((1e-6 mole)^3 * second); per_microM3sec is "microM-3sec-1";
  unit per_second = 1 / second;
  unit microM = 1e-6 mole / litre;
  unit substance = dimensionless; substance is "normalized substance";
end
