// SBML level 2 version 1
// This model was downloaded from BioModels Database
// http://www.ebi.ac.uk/biomodels/

model Bakker2001_Glycolysis()
  // .
  // .
  // .
  // SBML level 2 code generated for the JWS Online project by Jacky Snoep using PySCeS
  // Run this model online at http://jjj.biochem.sun.ac.za
  // To cite JWS Online please refer to: Olivier, B.G. and Snoep, J.L. (2004) Web-based modelling using JWS Online , Bioinformatics, 20:2143-2144
  // .
  // .
  // Biomodels Curation: The paper refers to the model equations present in Bakker et al's " Glycolysis in bloodstream from Trypanosoma brucei can be understood in terms of the kinetics of glycolytic enzymes" (Pubmed ID: 9013556), also, the authors claim that some of the modifications in these equations were made based on the experimental results from the paper "Contribution of glucose transport in the control of glycolytic flux in Trypanosoma brucei" (Pubmed ID: 10468568). The model reproduces the various flux values in Fig 3 for 100% TPI activity. It also matches with the values provided in Table 2 of the paper. The model was successfully tested with Copasi and SBML ODE Solver.
  // The volumes are set to the values containing 1 mg of total protein per microlitre total cell volume. To change the protein concentration use Vt , the total cell volume in micro litre per mg protein.
  // To change the TPI activity use the global parameter TPIact .
  // To the extent possible under law, all copyright and related or neighbouring rights to this encoded model have been dedicated to the public domain worldwide. Please refer to CC0 Public Domain Dedication for more information.
  // In summary, you are entitled to use this encoded model in absolutely any manner you deem suitable, verbatim, or with modification, alone or embedded it in a larger context, redistribute it, commercially or not, in a restricted way or not.
  // To cite BioModels Database, please use: Li C, Donizelli M, Rodriguez N, Dharuri H, Endler L, Chelliah V, Li L, He E, Henry A, Stefan MI, Snoep JL, Hucka M, Le Novère N, Laibe C (2010) BioModels Database: An enhanced, curated and annotated resource for published quantitative kinetic models. BMC Syst Biol., 4:92.
  // biomodels.db:MODEL6624099213
  // biomodels.db:BIOMD0000000071
  // isDescribedBy pubmed:11415442
  // isDerivedFrom biomodels.db:MODEL1101100000 pubmed:10468568
  // hasTaxon taxonomy:5691
  // kegg.pathway:tbr00010

  // Compartments:
  compartment tot_cell in extracellular = 5.7; tot_cell is "total cell";
  compartment glycosome in cytosol = 0.2446;  // GO:0020015
  compartment cytosol in extracellular = 5.4554;  // GO:0005829
  compartment extracellular = 1;  // GO:0005576

  // Species:
  species GlcI in tot_cell = 0.0340009; GlcI is "Glucose";  // isVersionOf CHEBI:17234 kegg.compound:C00293
  species Pg in glycosome = 7.63936; Pg is "Phosphates in Glycosome";  // isVersionOf CHEBI:35780
  species Glc6P in glycosome = 2.07199; Glc6P is "Glucose 6-phosphate";  // CHEBI:17665 kegg.compound:C00668
  species Fru6P in glycosome = 0.511773; Fru6P is "Fructose 6-phosphate";  // CHEBI:16084 kegg.compound:C05345
  species Fru16BP in glycosome = 16.5371; Fru16BP is "Fructose 1,6-bisphosphate";  // CHEBI:28013 kegg.compound:C05378
  species DHAP in tot_cell = 3.89921; DHAP is "Dihydroxyacetone phosphate";  // CHEBI:16108 kegg.compound:C00111
  species GAP in glycosome = 0.0399329; GAP is "Glyceraldehyde 3-phosphate";  // CHEBI:29052 kegg.compound:C00118
  species NAD in glycosome = 3.95514;  // CHEBI:15846 kegg.compound:C00003
  species BPGA13 in glycosome = 0.0326745; BPGA13 is "1,3-bisphosphoglycerate";  // CHEBI:16001 kegg.compound:C00236
  species NADH in glycosome = 0.0448639;  // CHEBI:16908 kegg.compound:C00004
  species Pyr in cytosol = 4.77413; Pyr is "Pyruvate";  // CHEBI:15361; kegg.compound:C00022
  species Nb in tot_cell = 1.59603; Nb is "3-PGA 2-PGA PEP";  // hasPart kegg.compound:C00197 kegg.compound:C00631 kegg.compound:C00074; hasPart CHEBI:18021 CHEBI:17794 CHEBI:17835
  species Pc in cytosol = 6.51839; Pc is "Phosphates cytosol";  // isVersionOf CHEBI:35780
  species $PyrE in extracellular = 0; PyrE is "Pyruvate external";  // isVersionOf CHEBI:32816 kegg.compound:C00022
  species $Gly in glycosome = 0; Gly is "Glycerol";  // CHEBI:17754 kegg.compound:C00116
  species $GlcE in extracellular = 5; GlcE is "Glucose external";  // isVersionOf CHEBI:17234 kegg.compound:C00293
  species $Gly3P in tot_cell; Gly3P is "Glycerol 3-phosphate";  // CHEBI:15978 kegg.compound:C00093
  species ATPc in cytosol; ATPc is "ATP cyt.";  // CHEBI:15422 kegg.compound:C00002
  species ADPc in cytosol; ADPc is "ADP cyt.";  // CHEBI:16761 kegg.compound:C00008
  species ATPg in glycosome; ATPg is "ATP gly.";  // CHEBI:15422 kegg.compound:C00002
  species ADPg in glycosome; ADPg is "ADP gly.";  // CHEBI:16761 kegg.compound:C00008
  species DHAPg in glycosome; DHAPg is "DHAP gly.";  // CHEBI:16108 kegg.compound:C00111
  species DHAPc in cytosol; DHAPc is "DHAP cyt.";  // CHEBI:16108 kegg.compound:C00111
  species Gly3Pc in cytosol; Gly3Pc is "Gy3P c.";  // CHEBI:15978 kegg.compound:C00093
  species Gly3Pg in glycosome; Gly3Pg is "Gy3P g.";  // CHEBI:15978 kegg.compound:C00093
  species PGAg in glycosome; PGAg is "3-PGA g.";  // CHEBI:18021 kegg.compound:C00074
  species PEPc in cytosol; PEPc is "PEP c.";  // CHEBI:18021 kegg.compound:C00074

  // Parameters:
  Vt = 5.7 microlitre_per_mg; Vt is "tot volume per mg protein";
  Vc has microlitre_per_mg;
  Vg has microlitre_per_mg;
  TPIact = 1 dimensionless;
  sumAc = 3.9 mM;
  sumAg = 6 mM;
  KeqAK = 0.442 dimensionless;
  Keq_anti = 1 dimensionless;
  sumc4 = 45 mM;
  sumc5 = 5 mM;
  Keq_PGM = 0.187 dimensionless;
  Keq_ENO = 6.7 dimensionless;

  // Assignment rules:
  Vc := cytosol*Vt/tot_cell;
  Vg := glycosome*Vt/tot_cell;
  ATPg := (Pg*(1 - 4*KeqAK) - sumAg + ((sumAg - (1 - 4*KeqAK)*Pg)^2 + 4*(1 - 4*KeqAK)*KeqAK*Pg^2)^0.5)/(2*(1 - 4*KeqAK));
  ADPg := Pg - 2*ATPg;
  ATPc := (Pc*(1 - 4*KeqAK) - sumAc + ((sumAc - (1 - 4*KeqAK)*Pc)^2 + 4*(1 - 4*KeqAK)*KeqAK*Pc^2)^0.5)/(2*(1 - 4*KeqAK));
  ADPc := Pc - 2*ATPc;
  DHAPc := sumc5*(1 + Vc/Vg)*DHAP/(sumc4 + sumc5*Vc/Vg - (BPGA13 + 2*Fru16BP + Fru6P + GAP + Glc6P + Pg));
  DHAPg := (DHAP*Vt - DHAPc*Vc)/Vg;
  Gly3Pc := sumc5 - DHAPc;
  Gly3Pg := Gly3Pc*DHAPg/(Keq_anti*DHAPc);
  Gly3P := (Gly3Pc*cytosol + Gly3Pg*glycosome)/tot_cell;
  PGAg := Nb*(1 + Vc/Vg)/(1 + (1 + Keq_PGM + Keq_PGM*Keq_ENO)*Vc/Vg);
  PEPc := Keq_ENO*Keq_PGM*PGAg;

  // Reactions:
  vGlcTr: $GlcE -> GlcI; tot_cell/Vt*Vm1*(GlcE - GlcI)/(K1Glc + GlcE + GlcI + afac*GlcE*GlcI/K1Glc); vGlcTr is "Glucose transport";  // isVersionOf GO:0046323; isHomologTo reactome:REACT_2092
    Vm1 = 106.2 nanomole_per_min_per_mg; K1Glc = 2 mM; afac = 0.75 dimensionless;
  vHK: Pg + GlcI => Glc6P; tot_cell/Vt*Vm2*GlcI*ATPg/(K2ATPg*K2GlcI*(1 + Glc6P/K2Glc6P + GlcI/K2GlcI)*(1 + ATPg/K2ATPg + ADPg/K2ADPg)); vHK is "Hexokinase";  // modifiers: ATPg, ADPg; kegg.reaction:R00299; isVersionOf ec-code:2.7.1.2; isHomologTo reactome:REACT_1318
    Vm2 = 625 nanomole_per_min_per_mg; K2ATPg = 0.116 mM; K2GlcI = 0.1 mM; K2Glc6P = 12 mM; K2ADPg = 0.126 mM;
  vPGI: Glc6P -> Fru6P; tot_cell/Vt*Vm3*(Glc6P/K3Glc6P - Fru6P/K3Fru6P)/(1 + Glc6P/K3Glc6P + Fru6P/K3Fru6P); vPGI is "Glucose-phosphate isomerase";  // kegg.reaction:R00771; isVersionOf ec-code:5.3.1.9; isHomologTo reactome:REACT_1164
    Vm3 = 848 nanomole_per_min_per_mg; K3Glc6P = 0.4 mM; K3Fru6P = 0.12 mM;
  vPFK: Pg + Fru6P => Fru16BP; tot_cell/Vt*K4i1Fru16BP*Vm4*Fru6P*ATPg/(K4ATPg*K4Fru6P*(K4i1Fru16BP + Fru16BP)*(1 + Fru16BP/K4i2Fru16BP + Fru6P/K4Fru6P)*(1 + ATPg/K4ATPg)); vPFK is "Phosphofructokinase";  // modifiers: ATPg; kegg.reaction:R00756; isVersionOf ec-code:2.7.1.11; isHomologTo reactome:REACT_736
    K4i1Fru16BP = 15.8 mM; Vm4 = 780 nanomole_per_min_per_mg; K4ATPg = 0.026 mM; K4Fru6P = 0.82 mM; K4i2Fru16BP = 10.7 mM;
  vALD: Fru16BP -> GAP + DHAP; tot_cell/Vt*(Vm5f*Fru16BP/(0.009*(1 + ATPg/0.68 + ADPg/1.51 + (sumAg - (ATPg + ADPg))/3.65)) - Vm5r*GAP*DHAPg/(K5DHAP*K5GAP))/(1 + GAP/K5GAP + DHAPg/K5DHAP + GAP*DHAPg/(K5DHAP*K5GAP) + Fru16BP/(0.009*(1 + ATPg/0.68 + ADPg/1.51 + (sumAg - (ATPg + ADPg))/3.65)) + Fru16BP*GAP/(K5GAPi*0.009*(1 + ATPg/0.68 + ADPg/1.51 + (sumAg - (ATPg + ADPg))/3.65))); vALD is "Aldolase";  // modifiers: DHAPg, ATPg, ADPg; kegg.reaction:R01070; isVersionOf ec-code:4.1.2.13; isHomologTo reactome:REACT_1602
    Vm5r = 219.555 nanomole_per_min_per_mg; K5DHAP = 0.015 mM; K5GAP = 0.067 mM; Vm5f = 184.5 nanomole_per_min_per_mg; K5GAPi = 0.098 mM;
  vTPI: DHAP -> GAP; tot_cell/Vt*TPIact*Vm6*(DHAPg/K6DHAPg - 5.7*GAP/K6GAP)/(1 + GAP/K6GAP + DHAPg/K6DHAPg); vTPI is "Triosephosphate isomerase";  // modifiers: DHAPg; kegg.reaction:R01015; isVersionOf ec-code:5.3.1.1; isHomologTo reactome:REACT_775
    Vm6 = 842 nanomole_per_min_per_mg; K6GAP = 0.25 mM; K6DHAPg = 1.2 mM;
  vGAPdh: GAP + NAD -> NADH + BPGA13; tot_cell/Vt*Vm7*(Vm7f*(GAP*(NAD/K7GAP/K7NAD) - Vm7r/Vm7f*(BPGA13*NADH/K7BPGA13/K7NADH))/((1 + GAP/K7GAP + BPGA13/K7BPGA13)*(1 + NAD/K7NAD + NADH/K7NADH))); vGAPdh is "Glyceraldehyde 3-phosphate dehydrogenase";  // kegg.reaction:R01061; isVersionOf ec-code:1.2.1.12; isHomologTo reactome:REACT_1847
    Vm7 = 1 dimensionless; Vm7f = 1470 nanomole_per_min_per_mg; K7GAP = 0.15 mM; K7NAD = 0.45 mM; Vm7r = 984.9 nanomole_per_min_per_mg; K7BPGA13 = 0.1 mM; K7NADH = 0.02 mM;
  vGDH: DHAP + NADH -> NAD + $Gly3P; tot_cell/Vt*Vm8*Vm8f*(NADH*DHAPg/(K8DHAPg*K8NADH) - Vm8r*NAD*Gly3Pg/(K8Gly3Pg*K8NAD*Vm8f))/((1 + NAD/K8NAD + NADH/K8NADH)*(1 + DHAPg/K8DHAPg + Gly3Pg/K8Gly3Pg)); vGDH is "Glycerol 3-phosphate dehydrogenase";  // modifiers: DHAPg, Gly3Pg; kegg.reaction:R00841; isVersionOf ec-code:3.1.3.21; isHomologTo reactome:REACT_1146
    Vm8 = 1 dimensionless; Vm8f = 533 nanomole_per_min_per_mg; K8DHAPg = 0.1 mM; K8NADH = 0.01 mM; Vm8r = 149.24 nanomole_per_min_per_mg; K8Gly3Pg = 2 mM; K8NAD = 0.4 mM;
  vGPO: $Gly3P => DHAP; tot_cell/Vt*Vm9*Gly3Pc/(K9Gly3Pc*1 + Gly3Pc); vGPO is "Glycerol 3-phosphate oxidase";  // modifiers: Gly3Pc; kegg.reaction:R00846; isVersionOf ec-code:1.1.3.21
    Vm9 = 368 nanomole_per_min_per_mg; K9Gly3Pc = 1.7 mM;
  vPyrTr: Pyr => $PyrE; tot_cell/Vt*Vm10*Pyr/K10Pyr/(1 + Pyr/K10Pyr); vPyrTr is "Pyruvate transport";
    Vm10 = 200 nanomole_per_min_per_mg; K10Pyr = 1.96 mM;
  vPGK: BPGA13 -> Nb + Pg; tot_cell/Vt*Vm11*Vm11f*(-Vm11r*PGAg*ATPg/(K11ATPg*K11PGA3*Vm11f) + BPGA13*ADPg/(K11ADPg*K11BPGA13))/((1 + BPGA13/K11BPGA13 + PGAg/K11PGA3)*(1 + ATPg/K11ATPg + ADPg/K11ADPg)); vPGK is "Phosphoglycerate kinase";  // modifiers: ADPg, ATPg, PGAg; isVersionOf ec-code:2.7.2.3
    Vm11 = 1 dimensionless; Vm11f = 640 nanomole_per_min_per_mg; Vm11r = 18.56 nanomole_per_min_per_mg; K11ATPg = 0.29 mM; K11PGA3 = 1.62 mM; K11ADPg = 0.1 dimensionless; K11BPGA13 = 0.05 dimensionless;
  vPK: Nb => Pc + Pyr; tot_cell/Vt*Vm12*(PEPc/(0.34*(1 + ADPc/0.57 + ATPc/0.64)))^n12*ADPc/K12ADP/((1 + (PEPc/(0.34*(1 + ADPc/0.57 + ATPc/0.64)))^n12)*(1 + ADPc/K12ADP)); vPK is "Pyruvate kinase";  // modifiers: PEPc, ADPc, ATPc; isVersionOf ec-code:2.7.1.40; kegg.reaction:R00200; isHomologTo reactome:REACT_1911
    n12 = 2.5 dimensionless; Vm12 = 2600 nanomole_per_min_per_mg; K12ADP = 0.114 mM;
  vATPase: Pc => ; tot_cell/Vt*K13*ATPc/ADPc;  // modifiers: ATPc, ADPc; isVersionOf GO:0006200
    K13 = 50 nanomole_per_min_per_mg;
  vGlyK: $Gly3P -> Pg + $Gly; tot_cell/Vt*Vm14*(Vm14f*ADPg*Gly3Pg/(K14ADPg*K14Gly3Pg) - Gly*Vm14r*ATPg/(K14ATPg*K14Gly))/((1 + Gly/K14Gly + Gly3Pg/K14Gly3Pg)*(1 + ATPg/K14ATPg + ADPg/K14ADPg)); vGlyK is "Glycerol kinase";  // modifiers: ADPg, Gly3Pg, ATPg; kegg.reaction:R00847; isVersionOf ec-code:2.7.1.30
    Vm14 = 1 dimensionless; Vm14r = 33400 nanomole_per_min_per_mg; K14ATPg = 0.19 mM; K14Gly = 0.12 mM; Vm14f = 200 nanomole_per_min_per_mg; K14ADPg = 0.12 mM; K14Gly3Pg = 5.1 mM;

  // Unit definitions:
  unit substance = 1e-9 mole; substance is "nanomole";
  unit volume = 1e-6 litre; volume is "microlitre";
  unit microlitre_per_mg = 1e-6 litre / (1e-3 gram);
  unit nanomole_per_min_per_mg = 1e-9 mole / (60 second * 1e-3 gram);
  unit time = 60 second; time is "minute";
  unit mM = 1e-9 mole / (1e-6 litre);
end
