// SBML level 2 version 3
// This model was downloaded from BioModels Database
// http://www.ebi.ac.uk/biomodels/

model TM()
  // Ibrahim2008_Cdc20_Sequestring_Template_Model
  // Biophysical Chemistry 134 (2008) 93-100
  // Mad2 binding is not sufficient for complete Cdc20 sequestering in mitotic transition control (an in silico study)
  // Bashar Ibrahim, Peter Dittrich, Stephan Diekmann, Eberhard Schmitt
  // This model originates from BioModels Database: A Database of Annotated Published Models. It is copyright (c) 2005-2009 The BioModels Team.
  // For more information see the terms of use .
  // To cite BioModels Database, please use Le Novère N., Bornstein B., Broicher A., Courtot M., Donizelli M., Dharuri H., Li L., Sauro H., Schilstra M., Shapiro B., Snoep J.L., Hucka M. (2006) BioModels Database: A Free, Centralized Database of Curated, Published, Quantitative Kinetic Models of Biochemical and Cellular Systems Nucleic Acids Res., 34: D689-D691.
  // biomodels.db:MODEL1667525941
  // biomodels.db:BIOMD0000000194
  // isDescribedBy pubmed:18295960
  // occursIn taxonomy:9606
  // isVersionOf reactome:REACT_2137.2 GO:0007094
  // isPartOf kegg.pathway:hsa04110

  // Compartments:
  compartment Cytoplasm = 1;  // GO:0005737

  // Species:
  species Mad1_CMad2 in Cytoplasm = 5e-8/Cytoplasm; Mad1_CMad2 is "Mad1:C-Mad2";  // substance in mole; hasPart uniprot:Q9Y6D9 uniprot:Q13257
  // Open conformation of Mad2
  species OMad2 in Cytoplasm = 1.5e-7/Cytoplasm; OMad2 is "O-Mad2";  // substance in mole; isVersionOf uniprot:Q13257
  species Mad1_CMad2_OMad2 in Cytoplasm = 0; Mad1_CMad2_OMad2 is "Mad1:C-Mad2:O-Mad2*";  // substance in mole; hasPart uniprot:Q9Y6D9 uniprot:Q13257
  species Cdc20 in Cytoplasm = 2.2e-7/Cytoplasm;  // substance in mole; isVersionOf uniprot:Q12834
  species Cdc20_CMad2 in Cytoplasm = 0; Cdc20_CMad2 is "Cdc20:C-Mad2";  // substance in mole; hasPart uniprot:Q12834 uniprot:Q13257

  // Parameters:
  eta_T = 0.01 ps;
  gamma_T = 1000000000 pMps;
  alpha_T = 200000 pMps;
  beta_T = 0.2 ps;
  // u = 1 : kinetochore unattached
  // u = 0 : kinetochore attached
  u = 1 dimensionless;
  const_val_0 = 0 dimensionless;
  const_val_1 = 1 dimensionless;

  // Reactions:
  R6: Mad1_CMad2 + OMad2 -> Mad1_CMad2_OMad2; Cytoplasm*(u*alpha_T*Mad1_CMad2*OMad2 - beta_T*Mad1_CMad2_OMad2);  // isVersionOf GO:0006461 GO:0043241 GO:0032092
  R7: Mad1_CMad2_OMad2 + Cdc20 => Mad1_CMad2 + Cdc20_CMad2; Cytoplasm*u*gamma_T*Mad1_CMad2_OMad2*Cdc20;  // isVersionOf GO:0006461 GO:0032092
  R8: Cdc20_CMad2 => Cdc20 + OMad2; Cytoplasm*eta_T*Cdc20_CMad2;  // isVersionOf GO:0043241

  // Events:
  mt_attachment: at (time > 2000): u = const_val_0; mt_attachment is "Microtubule attachment";  // GO:0008608

  // Unit definitions:
  unit ps = 1 / second; ps is "per second";
  unit pMps = litre / (mole * second); pMps is "liter per mole per second";
end
