// SBML level 2 version 3
// This model was downloaded from BioModels Database
// http://www.ebi.ac.uk/biomodels/

model testid()
  // Stone1996_NOsGC
  // This features the two step binding of NO to soluble Guanylyl Cyclase as proposed by Stone JR, Marletta MA. Biochemistry (1996) 35(4):1093-9 . There is a fast step binding scheme and a slow step binding scheme. The difference lies in the binding of a NO to a non-heme site on sGC, which may not necessarily be the same site of binding during the initial binding. The rates have been directly used models.
  // This model originates from BioModels Database: A Database of Annotated Published Models. It is copyright (c) 2005-2009 The BioModels Team.
  // For more information see the terms of use .
  // To cite BioModels Database, please use Le Novère N., Bornstein B., Broicher A., Courtot M., Donizelli M., Dharuri H., Li L., Sauro H., Schilstra M., Shapiro B., Snoep J.L., Hucka M. (2006) BioModels Database: A Free, Centralized Database of Curated, Published, Quantitative Kinetic Models of Biochemical and Cellular Systems Nucleic Acids Res., 34: D689-D691.
  // biomodels.db:MODEL4779732381
  // biomodels.db:BIOMD0000000198
  // isDescribedBy pubmed:8573563
  // isVersionOf GO:0007263 GO:0031282
  // occursIn taxonomy:9913

  // Compartments:
  compartment cytosol = 1;  // GO:0005829

  // Species:
  species $NO in cytosol = 0.5;  // CHEBI:16480 kegg.compound:C00533
  species sGCfast in cytosol = 0.112;  // hasVersion uniprot:P19687 uniprot:P16068
  species NO_sGCfast in cytosol = 0;  // hasPart CHEBI:16480 uniprot:P19687 uniprot:P16068
  species NO_sGCfast_6coord in cytosol = 0;  // hasPart CHEBI:16480 uniprot:P19687 uniprot:P16068
  species NO_sGCfast_5coord in cytosol = 0;  // hasPart CHEBI:16480 uniprot:P19687 uniprot:P16068
  species sGCslow in cytosol = 0.288;  // hasPart uniprot:P19687 uniprot:P16068
  species NO_sGCslow in cytosol = 0;  // hasPart CHEBI:16480 uniprot:P19687 uniprot:P16068
  species NO_sGCslow_6coord in cytosol = 0;  // hasPart CHEBI:16480 uniprot:P19687 uniprot:P16068
  species NO_sGCslow_6coord_NO_int in cytosol = 0;  // hasPart CHEBI:16480 uniprot:P19687 uniprot:P16068
  species NO_sGCslow_5coord in cytosol = 0;  // hasPart CHEBI:16480 uniprot:P19687 uniprot:P16068
  species NO_sGC_5coord_tot in cytosol;  // hasPart CHEBI:16480 uniprot:P16068 uniprot:P19687
  species sGC_inact_tot in cytosol;  // hasPart CHEBI:16480 uniprot:P16068 uniprot:P19687

  // Parameters:
  k1 = 700 peruMpersec;
  k2 = 800 persec;
  k3 = 850 persec;
  k4 = 20 persec;
  k5 = 0.2 persec;
  k6 = 700 peruMpersec;
  k7 = 800 persec;
  k8 = 850 persec;
  k9 = 5 peruMpersec;
  k10 = 25 persec;
  k11 = 1.6 persec;
  k12 = 0.02 persec;
  // micromolar extinction coefficient of the 5-coordinate ferrous species at 431 nm
  e5c = 0.11 peruMpercm; e5c is "ext_5coord";
  // micromolar extinction coefficient of the 5-coordinate ferrous nitrosyl species at 431 nm
  e5c_NO = 0.025 peruMpercm; e5c_NO is "ext_5coord_NO";
  // micromolar extinction coefficient of the 6-coordinate ferrous nitrosyl species at 431 nm
  e6c_NO = 0.064 peruMpercm; e6c_NO is "ext_6coord_NO";
  // extinction at 431 nm
  ext has percm; ext is "extinction";

  // Assignment rules:
  NO_sGC_5coord_tot := NO_sGCfast_5coord + NO_sGCslow_5coord;
  sGC_inact_tot := sGCfast + NO_sGCfast + NO_sGCfast_6coord + sGCslow + NO_sGCslow + NO_sGCslow_6coord + NO_sGCslow_6coord_NO_int;
  ext := e5c*(sGCfast + NO_sGCfast + sGCslow + NO_sGCslow) + e5c_NO*(NO_sGCfast_5coord + NO_sGCslow_5coord) + e6c_NO*(NO_sGCfast_6coord + NO_sGCslow_6coord + NO_sGCslow_6coord_NO_int);

  // Reactions:
  r1fast: $NO + sGCfast -> NO_sGCfast; cytosol*(k1*NO*sGCfast - k2*NO_sGCfast);
  r2fast: NO_sGCfast => NO_sGCfast_6coord; k3*cytosol*NO_sGCfast;
  r3fast: NO_sGCfast_6coord -> NO_sGCfast_5coord; cytosol*(k4*NO_sGCfast_6coord - k5*NO_sGCfast_5coord);
  r1slow: $NO + sGCslow -> NO_sGCslow; cytosol*(k6*NO*sGCslow - k7*NO_sGCslow);
  r2slow: NO_sGCslow => NO_sGCslow_6coord; k8*cytosol*NO_sGCslow;
  r3slow: $NO + NO_sGCslow_6coord -> NO_sGCslow_6coord_NO_int; cytosol*(k9*NO*NO_sGCslow_6coord - k10*NO_sGCslow_6coord_NO_int);
  r4slow: NO_sGCslow_6coord_NO_int -> NO_sGCslow_5coord; cytosol*(k11*NO_sGCslow_6coord_NO_int - k12*NO_sGCslow_5coord);

  // Unit definitions:
  unit substance = 1e-6 mole; substance is "micromole";
  unit peruMpersec = litre / (1e-6 mole * second);
  unit uM = 1e-6 mole / litre;
  unit persec = 1 / second;
  unit peruMpercm = litre / (1e-6 mole * 0.01 metre);
  unit percm = 1 / (0.01 metre);
end
