// SBML level 2 version 4
// This model was downloaded from BioModels Database
// http://www.ebi.ac.uk/biomodels/

model Tham2008_PDmodel_TumourShrinkage()
  // Tham2008 - PDmodel, Tumour shrinkage by gemcitabine and carboplatin
  // This model is described in the article:
  // A pharmacodynamic model for the time course of tumor shrinkage by gemcitabine + carboplatin in non-small cell lung cancer patients.
  // Tham LS, Wang L, Soo RA, Lee SC, Lee HS, Yong WP, Goh BC, Holford NH.
  // Clin. Cancer Res. 2008 Jul; 14(13): 4213-4218
  // Abstract:
  // PURPOSE: This tumor response pharmacodynamic model aims to describe primary lesion shrinkage in non-small cell lung cancer over time and determine if concentration-based exposure metrics for gemcitabine or that of its metabolites, 2',2'-difluorodeoxyuridine or gemcitabine triphosphate, are better than gemcitabine dose for prediction of individual response. EXPERIMENTAL DESIGN: Gemcitabine was given thrice weekly on days 1 and 8 in combination with carboplatin, which was given only on day 1 of every cycle. Gemcitabine amount in the body and area under the concentration-time curves of plasma gemcitabine, 2',2'-difluorodeoxyuridine, and intracellular gemcitabine triphosphate in white cells were compared to determine which best describes tumor shrinkage over time. Tumor growth kinetics were described using a Gompertz-like model. RESULTS: The apparent half-life for the effect of gemcitabine was 7.67 weeks. The tumor turnover time constant was 21.8 week.cm. Baseline tumor size and gemcitabine amount in the body to attain 50% of tumor shrinkage were estimated to be 6.66 cm and 10,600 mg. There was no evidence of relapse during treatment. CONCLUSIONS: Concentration-based exposure metrics for gemcitabine and its metabolites were no better than gemcitabine amount in predicting tumor shrinkage in primary lung cancer lesions. Gemcitabine dose-based models did marginally better than treatment-based models that ignored doses of drug administered to patients. Modeling tumor shrinkage in primary lesions can be used to quantify individual sensitivity and response to antitumor effects of anticancer drugs.
  // This model is hosted on BioModels Database and identified by: BIOMD0000000234.
  // To cite BioModels Database, please use: BioModels Database: An enhanced, curated and annotated resource for published quantitative kinetic models.
  // To the extent possible under law, all copyright and related or neighbouring rights to this encoded model have been dedicated to the public domain worldwide. Please refer to CC0 Public Domain Dedication for more information.
  // biomodels.db:MODEL0911120001
  // biomodels.db:BIOMD0000000234
  // isDescribedBy pubmed:18594002
  // hasTaxon taxonomy:9606
  // isVersionOf GO:0002357
  // hasProperty icd:C34 omim:211980 DOID:1324

  // Compartments:
  compartment COMpartment = 1;

  // Species:
  species Ce in COMpartment = 0;

  // Parameters:
  rem_time has week;
  Exposure has mg;
  Size = 6.66 cm;
  Effect has dimensionless;
  Dose = 5203.84 mg;
  Dose_Int1 = 0 week;
  Dose_Int2 = 1 week;
  Dose_Length = 0.44359 week;
  Cycle_Int = 3 week;
  N_Cycle = 6 dimensionless;
  conversion_factor = 604800 sec_per_week;
  AE50 = 10600 mg;
  Keq has per_week;
  Teq = 7.67 week;
  Size_0 = 6.66 cm;
  RateIn has per_week;
  T_Turnover = 21.8 cm_week;
  Kover has per_cm_per_week;

  // Assignment rules:
  Exposure := piecewise(Dose, (time < Cycle_Int*N_Cycle) && (Dose_Int1 < rem_time) && (rem_time < Dose_Length), Dose, (time < Cycle_Int*N_Cycle) && (Dose_Int2 < rem_time) && (rem_time < Dose_Int2 + Dose_Length), 0);
  rem_time := (time*conversion_factor - floor(time*conversion_factor/(Cycle_Int*conversion_factor))*Cycle_Int*conversion_factor)/conversion_factor;
  Keq := ln(2)/Teq;
  Effect := 1 - Ce/(AE50 + Ce);
  RateIn := Size_0*Kover;
  Kover := 1/T_Turnover;

  // Rate rules:
  Ce' = Exposure/1 - Ce*Keq;
  Size' = (RateIn*Effect - Kover*Size)*Size;

  // Unit definitions:
  unit effect_unit = dimensionless; effect_unit is "normalised";
  unit week = 604800 second;
  unit sec_per_week = second / (604800 second);
  unit cm = 0.01 metre;
  unit mg = 1e-3 gram;
  unit cm_week = 0.01 metre * 604800 second;
  unit per_week = 1 / (604800 second);
  unit per_cm_per_week = 1 / (0.01 metre * 604800 second);
  unit m2 = metre^2;
end
