// SBML level 2 version 4
// This model was downloaded from BioModels Database
// http://www.ebi.ac.uk/biomodels/

function Mass_Action_2_1(k1, S1, S2)
  k1*S1*S2;
end

model Bai2003_G1phaseRegulation()
  // This a model from the article:
  // Theoretical and experimental evidence for hysteresis in cell proliferation.
  // Bai S, Goodrich D, Thron CD, Tecarro E, Obeyesekere M. Cell Cycle. 2003 Jan-Feb;2(1):46-52. 12695688 ,
  // Abstract:
  // We propose a mathematical model for the regulation of the G1-phase of the mammalian cell cycle taking into account interactions of cyclin D/cdk4, cyclin E/cdk2, Rb and E2F. Mathematical analysis of this model predicts that a change in the proliferative status in response to a change in concentrations of serum growth factors will exhibit the property of hysteresis: the concentration of growth factors required to induce proliferation is higher than the concentration required to maintain proliferation. We experimentally confirmed this prediction in mouse embryonic fibroblasts in vitro. In agreement with the mathematical model, this indicates that changes in proliferative mode caused by small changes in concentrations of growth factors are not easily reversible. Based on this study, we discuss the importance of proliferation hysteresis for cell cycle regulation.
  // The original model was taken from the Cell Cycle DataBase (CCDB).
  // Variable added: assignment rule for denoting phosphorylated Rb (Rb_phosphorylated i.e(RT-RS-R)) created.
  // To the extent possible under law, all copyright and related or neighbouring rights to this encoded model have been dedicated to the public domain worldwide. Please refer to CC0 Public Domain Dedication for more information.
  // In summary, you are entitled to use this encoded model in absolutely any manner you deem suitable, verbatim, or with modification, alone or embedded it in a larger context, redistribute it, commercially or not, in a restricted way or not.
  // To cite BioModels Database, please use: Li C, Donizelli M, Rodriguez N, Dharuri H, Endler L, Chelliah V, Li L, He E, Henry A, Stefan MI, Snoep JL, Hucka M, Le Novère N, Laibe C (2010) BioModels Database: An enhanced, curated and annotated resource for published quantitative kinetic models. BMC Syst Biol., 4:92.
  // biomodels.db:MODEL1003050000
  // biomodels.db:BIOMD0000000242
  // isDescribedBy pubmed:12695688
  // isVersionOf reactome:REACT_1590 GO:0000114
  // occursIn taxonomy:39107
  // isDerivedFrom biomodels.db:BIOMD0000000168

  // Compartments:
  compartment cell = 1;  // isVersionOf GO:0005623

  // Species:
  species D_1 in cell = 0;  // hasPart uniprot:Q9JKW8 uniprot:P25322
  species E_1 in cell = 0;  // hasPart uniprot:P97377 uniprot:Q61457
  species R in cell = 2.5/cell;  // isVersionOf uniprot:P13405
  species RS_1 in cell = 0;  // isVersionOf uniprot:Q61501
  species theta_1 in cell = 0;  // isVersionOf uniprot:Q61501
  species X in cell = 0;

  // Parameters:
  GF_1 = 6.3;
  k1_1 = 0.05;
  dD_1 = 0.4;
  aD_1 = 0.4;
  aE_1 = 0.16;
  k2_1 = 1000;
  aF_1 = 0.9;
  pX_1 = 0.48;
  RT_1 = 2.5;
  qX_1 = 0.8;
  pS_1 = 0.6;
  pD_1 = 0.48;
  qD_1 = 0.6;
  pE_1 = 0.096;
  qE_1 = 0.6;
  atheta_1 = 0.05;
  k3_1 = 1.5;
  dtheta_1 = 0.12;
  qtheta_1 = 0.3;
  aX_1 = 0.08;
  f_1 = 0.35;
  g_1 = 0.528;
  dX_1 = 1.04;
  dE_1 = 0.2;
  fC_1_1 = 0.003; fC_1_1 is "fe";
  var Rb_phos; Rb_phos is "Rb_phosphorylated";

  // Assignment rules:
  Rb_phos := RT_1 - RS_1 - R;

  // Reactions:
  _1: => D_1; cell*aD_1*(GF_1/(k1_1^(-1) + GF_1)); _1 is "cyclinD synthesis";  // isVersionOf GO:0006412
  cyclinD_1: D_1 => ; cell*dD_1*E_1*D_1; cyclinD_1 is "cyclinD degradation";  // modifiers: E_1; isVersionOf GO:0008054
  cyclinEsynthesis_1: => E_1; cell*aE_1*(GF_1/(k2_1^(-1) + GF_1) + aF_1*theta_1); cyclinEsynthesis_1 is "cyclinE synthesis";  // modifiers: theta_1; isVersionOf GO:0006412
  cyclinEdegradation_1: E_1 => ; cell*dE_1*X*E_1; cyclinEdegradation_1 is "cyclinE degradation";  // modifiers: X; isVersionOf GO:0008054
  pRBsynthesis_1: => R; cell*(pX_1*(RT_1 - RS_1 - R)*X/(qX_1 + RT_1 - RS_1 - R + X)); pRBsynthesis_1 is "pRB synthesis";  // modifiers: RS_1, X; isVersionOf GO:0006412
  pRBdeplation_1: R + theta_1 => RS_1; cell*Mass_Action_2_1(pS_1, R, theta_1); pRBdeplation_1 is "pRB/E2F complex association";  // isVersionOf GO:0035189
  _2: RS_1 => theta_1; cell*(pD_1*RS_1*D_1/(qD_1 + RS_1 + D_1)); _2 is "pRB/E2F complex dissociation via cyclin D";  // modifiers: D_1; isVersionOf GO:0043241
  null2_1: RS_1 => theta_1; cell*(pE_1*RS_1*E_1/(qE_1 + RS_1 + E_1)); null2_1 is "pRB/E2F complex dissociation via cyclin E";  // modifiers: E_1; isVersionOf GO:0043241
  null3_1: => theta_1; cell*atheta_1*(GF_1/(k3_1^(-1) + GF_1) + fC_1_1*theta_1); null3_1 is "E2F synthesis";  // isVersionOf GO:0006412
  E2Fdegradationviacellcycleprogression_1: theta_1 => ; cell*dtheta_1*(X/(qtheta_1 + X))*theta_1; E2Fdegradationviacellcycleprogression_1 is "E2F degradation via cell cycle progression";  // modifiers: X; isVersionOf GO:0030163
  cellcycleprogression_1: => X; cell*(aX_1*E_1 + f_1*theta_1 + g_1*X^2*E_1); cellcycleprogression_1 is "cell cycle progression go";  // modifiers: E_1, theta_1; isVersionOf GO:0051726
  cellcycleprogressionslow_1: X => ; cell*dX_1*X; cellcycleprogressionslow_1 is "cell cycle progression slow";  // isVersionOf GO:0051726
end
