// SBML level 2 version 4
// This model was downloaded from BioModels Database
// http://www.ebi.ac.uk/biomodels/

model Model_1()
  // Lee2010_ThrombinActivation_OneForm_minimal
  // biomodels.db:MODEL1108260004
  // biomodels.db:BIOMD0000000363
  // isDescribedBy pubmed:20435402
  // isDerivedFrom pubmed:17726029
  // isVersionOf GO:0007596
  // hasTaxon taxonomy:2759

  // Compartments:
  compartment compartment = 1;

  // Species:
  species II in compartment = 1;  // uniprot:P00734
  species M in compartment = 0;
  species IIa in compartment = 0;  // uniprot:P00734
  species P2 in compartment = 0;

  // Reactions:
  r1: II => M; compartment*r1_k1*II;
    r1_k1 = 0.005;
  r2: M => IIa; compartment*r2_k1*M;
    r2_k1 = 0.01;
  r3: II => P2; compartment*r3_k1*II;
    r3_k1 = 1e-5;
  r4: P2 => IIa; compartment*r4_k1*P2;
    r4_k1 = 2.5e-5;

  // Unit definitions:
  unit substance = 1e-6 mole;
end
