// SBML level 2 version 1
// This model was downloaded from BioModels Database
// http://www.ebi.ac.uk/biomodels/

model Sivakumar2011_HedgehogSignalingPathway()
  // Sivakumar2011 - Hedgehog Signaling Pathway
  // This is the current model for the Hedgehog signaling pathway. The best data for mechanism of signaling has been worked out in Drosophila, so this model is based largely on Drosophila data. Hedgehog target genes vary from tissue to tissue, so the identities of individual target genes have not been listed. The main difference between the Drosophila and mammalian Hedgehog signaling pathways is the fact that there are three mammalian homologs of Cubitus interruptus, Gli1 Gli2 and Gli3. Some or all of the mammalian homologs may be proteolytically processed, but the data are controversial. There are two mammalian Ptc genes and three mammalian Hedgehog genes as well. The pathway for Sonic Hedgehog appears to be most similar to the Drosophila hedgehog pathway.
  // Hedgehog signaling in animal development: paradigms and principles.
  // Sonic hedgehog in the nervous system: functions, modifications and mechanisms.
  // Hedgehog signal transduction: recent findings.
  // Hedgehog signaling: Costal-2 bridges the transduction gap.
  // This model is described in the article:
  // A systems biology approach to model neural stem cell regulation by notch, shh, wnt, and EGF signaling pathways.
  // Sivakumar KC, Dhanesh SB, Shobana S, James J, Mundayoor S.
  // Omics: a Journal of Integrative Biology. 2011; 15(10):729-737
  // Abstract:
  // The Notch, Sonic Hedgehog (Shh), Wnt, and EGF pathways have long been known to influence cell fate specification in the developing nervous system. Here we attempted to evaluate the contemporary knowledge about neural stem cell differentiation promoted by various drug-based regulations through a systems biology approach. Our model showed the phenomenon of DAPT-mediated antagonism of Enhancer of split [E(spl)] genes and enhancement of Shh target genes by a SAG agonist that were effectively demonstrated computationally and were consistent with experimental studies. However, in the case of model simulation of Wnt and EGF pathways, the model network did not supply any concurrent results with experimental data despite the fact that drugs were added at the appropriate positions. This paves insight into the potential of crosstalks between pathways considered in our study. Therefore, we manually developed a map of signaling crosstalk, which included the species connected by representatives from Notch, Shh, Wnt, and EGF pathways and highlighted the regulation of a single target gene, Hes-1, based on drug-induced simulations. These simulations provided results that matched with experimental studies. Therefore, these signaling crosstalk models complement as a tool toward the discovery of novel regulatory processes involved in neural stem cell maintenance, proliferation, and differentiation during mammalian central nervous system development. To our knowledge, this is the first report of a simple crosstalk map that highlights the differential regulation of neural stem cell differentiation and underscores the flow of positive and negative regulatory signals modulated by drugs.
  // This model is hosted on BioModels Database and identified by: BIOMD0000000395.
  // To cite BioModels Database, please use: BioModels Database: An enhanced, curated and annotated resource for published quantitative kinetic models.
  // To the extent possible under law, all copyright and related or neighbouring rights to this encoded model have been dedicated to the public domain worldwide. Please refer to CC0 Public Domain Dedication for more information.
  // biomodels.db:MODEL1101270001
  // biomodels.db:BIOMD0000000395
  // isDescribedBy pubmed:21978399
  // isDerivedFrom panther.pathway:P00025
  // isVersionOf GO:0007224
  // occursIn taxonomy:40674

  // Compartments:
  compartment default = 1;
  compartment Receiving_cell in default = 1;
  compartment lipid_raft in Receiving_cell = 1;
  compartment nucleus in Receiving_cell = 1;

  // Species:
  // Long Name: ATP Synonym: Synonym not specified Accession: S01691
  species ATP in Receiving_cell = 2/Receiving_cell;  // isVersionOf CHEBI:15422
  // Long Name: ADP Synonym: Synonym not specified Accession: S01693
  species ADP in Receiving_cell = 0;  // isVersionOf CHEBI:16761
  // Long Name: Patched Synonym: Ptc,Ptc1 Accession: P00689
  species Patched in Receiving_cell = 5/Receiving_cell;  // isVersionOf uniprot:Q13635
  // Long Name: e.g., ptc Synonym: Synonym not specified Accession: G01526
  species Hedgehog_target_gene in nucleus = 0;  // isDescribedBy GO:0007228
  // Long Name: Sap18 Synonym: Sin3-associated polypeptide 18 Accession: P00697
  species Sap18 in nucleus = 2.5/nucleus;  // isHomologTo uniprot:Q3MHS8
  // Long Name: Hedgehog Synonym: Hh,Shh,Sonic hedgehog Accession: P00688
  species Hedgehog in default = 5/default;  // isVersionOf uniprot:Q15465
  // Long Name: Long Name: Long name not specified Synonym: Synonym not specified Accession: U05221 Heterodimer Member Info: Hedgehog#PROTEIN#Hedgehog#P00688#Hh|Shh|Sonic hedgehog#;Patched#PROTEIN#Patched#P00689#Ptc|Ptc1#
  species Complex_br__Patched_Hedgehog in Receiving_cell = 0; Complex_br__Patched_Hedgehog is "Complex_br_(Patched/Hedgehog)";  // isVersionOf GO:0043234
  // Long Name: Long Name: Smoothened Synonym: Synonym not specified Accession: U05226 Heterodimer Member Info: Smoothened#PROTEIN#Smoothened#P00685#Smo#;Fused#PROTEIN#Fused#P00686#Fu#;Costal2#PROTEIN#Costal2#P00698#Cos-2|Cos2|Costal-2#
  species s46 in Receiving_cell = 0; s46 is "Complex_br_(Costal2/Fused/_br_Smoothened)";  // isVersionOf GO:0043234
  // Long Name: Long Name: Long name not specified Synonym: Synonym not specified Accession: U05228 Heterodimer Member Info: Smoothened#PROTEIN#Smoothened#P00685#Smo#;Fused#PROTEIN#Fused#P00686#Fu#;Costal2#PROTEIN#Costal2#P00698#Cos-2|Cos2|Costal-2#
  species s48 in Receiving_cell = 0; s48 is "Complex_br_(Costal2/Smoothened/_br_Fused)";  // isVersionOf GO:0043234
  // Long Name: Long Name: Long name not specified Synonym: Synonym not specified Accession: U05229 Heterodimer Member Info: Smoothened#PROTEIN#Smoothened#P00685#Smo#;Fused#PROTEIN#Fused#P00686#Fu#;Costal2#PROTEIN#Costal2#P00698#Cos-2|Cos2|Costal-2#
  species s69 in lipid_raft = 0; s69 is "Complex_br_(Costal2/Fused/_br_Smoothened)";  // isVersionOf GO:0043234
  // Long Name: CBP Synonym: CREB binding protein,p300 Accession: P00691
  species CBP in nucleus = 2/nucleus;  // isVersionOf uniprot:Q92793
  // Long Name: Microtubule Synonym: Synonym not specified Accession: P00696
  species Microtubule in Receiving_cell = 0;  // GO:0005874
  // Long Name: Cubitus interruptus Synonym: Ci,CiFL,Gli1,Gli2,Gli3 Accession: P00690
  species Cubitus_space_interruptus in nucleus = 0;  // isHomologTo uniprot:B4NUI3
  // Long Name: Long Name: Long name not specified Synonym: Synonym not specified Accession: U05220 Heterodimer Member Info: Cubitus interruptus repressor#PROTEIN#Cubitus interruptus repressor#P00687#CiR#;Su(fu)#PROTEIN#Su(fu)#P00699#Suppressor of Fused#
  species s128 in nucleus = 2.5/nucleus; s128 is "Complex_br_(Cubitus_space_interruptus_space_repressor/Su(fu))";  // isVersionOf GO:0043234
  // Long Name: Long Name: Long name not specified Synonym: Synonym not specified Accession: U05217 Heterodimer Member Info: Cubitus interruptus repressor#PROTEIN#Cubitus interruptus repressor#P00687#CiR#;Sap18#PROTEIN#Sap18#P00697#Sin3-associated polypeptide 18#;Su(fu)#PROTEIN#Su(fu)#P00699#Suppressor of Fused#
  species s140 in nucleus = 0; s140 is "Complex_br_(Sap18/Su(fu)/_br_Cubitus_space_interruptus_space_repressor)";  // isVersionOf GO:0043234
  species smoothened in Receiving_cell = 3/Receiving_cell;
  species complex in Receiving_cell = 3/Receiving_cell;  // isVersionOf GO:0043234
  species MIcrotubule in Receiving_cell = 0;  // isVersionOf GO:0005874
  species sag in Receiving_cell = 0.5/Receiving_cell;  // isVersionOf uniprot:P10523
  species Complex_br__CBP_Cubitus in nucleus = 0; Complex_br__CBP_Cubitus is "Complex_br_(CBP/Cubitus)";  // isVersionOf GO:0043234
  species s159 in lipid_raft = 0; s159 is "Complex_br_(Costal2/Fused/../microtubule)";  // isVersionOf GO:0043234
  species s160 in lipid_raft = 0; s160 is "Complex_br_(Su(fu)/Fused/../_br_Smoothened)";  // isVersionOf GO:0043234
  species Complex_br__Su_fu_Cubitus in Receiving_cell = 0; Complex_br__Su_fu_Cubitus is "Complex_br_(Su(fu)/Cubitus)";

  // Parameters:
  kass_r7 = 1.13;
  kdiss_r7 = 1.122;
  kcatp_r14 = 1.146;
  kM_r14_s69 = 1.03;
  kcatn_r14 = 1.75;
  kM_r14_s46 = 0.215;
  kass_r25 = 1.27;
  kdiss_r25 = 0.73;
  kass_r26 = 1.33;
  kdiss_r26 = 0.61;
  kass_r51 = 1.23;
  kdiss_r51 = 0.46;
  kass_r52 = 0.6;
  kdiss_r52 = 1.67;
  kcatp_r53 = 1.29;
  kM_r53_s70 = 0.79;
  kcatn_r53 = 1.62;
  kass_r54 = 1.28;
  kdiss_r54 = 0.71;
  kass_r55 = 1.56;
  kass_r15_s21 = 1.53;
  kdiss_r15_s21 = 0.89;
  kass_re24_s157 = 1;
  kass_r23_s21 = 1;
  kdiss_r23_s21 = 1;

  // Reactions:
  r52: s140 => Hedgehog_target_gene; kass_r52*s140 - kdiss_r52*Hedgehog_target_gene;
  r55: Complex_br__CBP_Cubitus => Hedgehog_target_gene; kass_r55*Complex_br__CBP_Cubitus;
  // mass action rate law for second order forward, first order reverse, reversible reactions, two reactants, continuous scheme
  r7: Hedgehog + Patched -> Complex_br__Patched_Hedgehog; kass_r7*Hedgehog*Patched - kdiss_r7*Complex_br__Patched_Hedgehog;
  // kinetics of non-modulated unireactant enzymes
  r14: s69 -> s46; Complex_br__Patched_Hedgehog*((kcatp_r14/kM_r14_s69*s69 - kcatn_r14/kM_r14_s46*s46)/(1 + s69/kM_r14_s69 + s46/kM_r14_s46));  // modifiers: Complex_br__Patched_Hedgehog
  // mass action rate law for second order forward, first order reverse, reversible reactions, two reactants, continuous scheme
  r51: Sap18 + s128 -> s140; kass_r51*Sap18*s128 - kdiss_r51*s140;
  // kinetics of non-modulated unireactant enzymes
  r53: Cubitus_space_interruptus -> Cubitus_space_interruptus; s48*((kcatp_r53/kM_r53_s70*Cubitus_space_interruptus - kcatn_r53/kM_r53_s70*Cubitus_space_interruptus)/(1 + Cubitus_space_interruptus/kM_r53_s70 + Cubitus_space_interruptus/kM_r53_s70));  // modifiers: s48
  // mass action rate law for second order irreversible reactions, two reactants, continuous scheme
  re24: smoothened + complex => s159; sag*kass_re24_s157*smoothened*complex;  // modifiers: sag
  // reversible rapid-equilibrium random order ternary-complex mechanism with two products
  r15: s46 + ATP -> s48 + ADP; Complex_br__Patched_Hedgehog*(kass_r15_s21*s46*ATP - kdiss_r15_s21*s48*ADP);  // modifiers: Complex_br__Patched_Hedgehog
  // reversible simple convenience kinetics
  r23: s159 -> Microtubule + s160; Complex_br__Patched_Hedgehog*(kass_r23_s21*s159 - kdiss_r23_s21*Microtubule*s160);  // modifiers: Complex_br__Patched_Hedgehog
  // mass action rate law for second order forward, first order reverse, reversible reactions, two reactants, continuous scheme
  r54: Cubitus_space_interruptus + CBP -> Complex_br__CBP_Cubitus; kass_r54*Cubitus_space_interruptus*CBP - kdiss_r54*Complex_br__CBP_Cubitus;
  // mass action rate law for first order forward, first order reverse, reversible reactions, continuous scheme
  r26: Complex_br__Su_fu_Cubitus -> Cubitus_space_interruptus; kass_r26*Complex_br__Su_fu_Cubitus - kdiss_r26*Cubitus_space_interruptus;
  // mass action rate law for first order forward, second order reverse, reversible reactions, two products, continuous scheme
  r25: s160 -> Complex_br__Su_fu_Cubitus + s69; kass_r25*s160 - kdiss_r25*Complex_br__Su_fu_Cubitus*s69;
end
