// SBML level 2 version 1
// This model was downloaded from BioModels Database
// http://www.ebi.ac.uk/biomodels/

model Sivakumar2011_NotchSignalingPathway()
  // Sivakumar2011 - Notch Signaling Pathway
  // Notch is a transmembrane receptor that mediates local cell-cell communication and coordinates a signaling cascade. It plays a key role in modulating cell fate decisions throughout the development of invertebrate and vertebrate species and the misregulation leads to a number of human diseases.
  // Notch signaling: from the outside in.
  // Notch signaling in hematopoiesis and early lymphocyte development.
  // An overview of the Notch signalling pathway.
  // Notch and cancer: best to avoid the ups and downs.
  // Notch signaling: control of cell communication and cell fate.
  // This model is described in the article:
  // A systems biology approach to model neural stem cell regulation by notch, shh, wnt, and EGF signaling pathways.
  // Sivakumar KC, Dhanesh SB, Shobana S, James J, Mundayoor S.
  // Omics: a Journal of Integrative Biology. 2011; 15(10):729-737
  // Abstract:
  // The Notch, Sonic Hedgehog (Shh), Wnt, and EGF pathways have long been known to influence cell fate specification in the developing nervous system. Here we attempted to evaluate the contemporary knowledge about neural stem cell differentiation promoted by various drug-based regulations through a systems biology approach. Our model showed the phenomenon of DAPT-mediated antagonism of Enhancer of split [E(spl)] genes and enhancement of Shh target genes by a SAG agonist that were effectively demonstrated computationally and were consistent with experimental studies. However, in the case of model simulation of Wnt and EGF pathways, the model network did not supply any concurrent results with experimental data despite the fact that drugs were added at the appropriate positions. This paves insight into the potential of crosstalks between pathways considered in our study. Therefore, we manually developed a map of signaling crosstalk, which included the species connected by representatives from Notch, Shh, Wnt, and EGF pathways and highlighted the regulation of a single target gene, Hes-1, based on drug-induced simulations. These simulations provided results that matched with experimental studies. Therefore, these signaling crosstalk models complement as a tool toward the discovery of novel regulatory processes involved in neural stem cell maintenance, proliferation, and differentiation during mammalian central nervous system development. To our knowledge, this is the first report of a simple crosstalk map that highlights the differential regulation of neural stem cell differentiation and underscores the flow of positive and negative regulatory signals modulated by drugs.
  // This model is hosted on BioModels Database and identified by: BIOMD0000000396.
  // To cite BioModels Database, please use: BioModels Database: An enhanced, curated and annotated resource for published quantitative kinetic models.
  // To the extent possible under law, all copyright and related or neighbouring rights to this encoded model have been dedicated to the public domain worldwide. Please refer to CC0 Public Domain Dedication for more information.
  // biomodels.db:MODEL1101270000
  // biomodels.db:BIOMD0000000396
  // isDescribedBy pubmed:21978399
  // isDerivedFrom panther.pathway:P00045
  // isVersionOf GO:0007219
  // occursIn taxonomy:40674

  // Compartments:
  compartment default = 1;
  compartment cytosol in default = 1;
  compartment nucleus in cytosol = 1;

  // Species:
  // Long Name: Fringe Synonym: Lunatic Fringe,Manic Fringe,Radical Fringe Accession: P01107
  species Fringe in default = 5/default;  // isVersionOf uniprot:Q8NES3
  // Long Name: Fucose Synonym: Synonym not specified Accession: S01795
  species fucose in default = 5/default;  // isVersionOf CHEBI:18287
  // Long Name: Delta Synonym: Delta-like1,Delta-like3,Delta-like4,DeltaC,LAG-2 Accession: P01116
  species Delta in default = 5/default;  // isVersionOf uniprot:O00548
  // Long Name: Notch intracellular tethered fragment Synonym: Synonym not specified Accession: P01119
  species NI_sub_c_sub_t in cytosol = 5/cytosol;  // isVersionOf GO:0043234
  // Long Name: Notch transmembrane domain fragment Synonym: Synonym not specified Accession: P01114
  species N_sub_tm in cytosol = 0;  // isVersionOf GO:0043234
  // Long Name: TACE Synonym: A disintegrin and metalloproteinase domain 17,ADAM17,Tumor necrosis factor alpha converting enzyme Accession: P01105
  species TACE in cytosol = 0.5/cytosol;  // isVersionOf uniprot:Q8TE56
  // Long Name: a7_degraded Synonym: Synonym not specified Accession: U02511
  species a7_degraded in default = 0;  // CHEBI:36080
  // Long Name: Neuralized Synonym: Neu Accession: P01117
  species Neuralized in default = 0.5/default;  // isVersionOf uniprot:Q9BR09
  // Long Name: Numb Synonym: Synonym not specified Accession: P01118
  species Numb in cytosol = 0.64/cytosol;  // isHomologTo uniprot:P49757
  // Long Name: Mastermind Synonym: MECT-1,Mastermind-like 1 (MAML1),Mastermind-like2 (MAML2),Mastermind-like3(MAML3),mucoepidermoid carcinoma-translocated 1 Accession: P01106
  species Mastermind in nucleus = 0.5/nucleus;  // isVersionOf uniprot:Q92585
  // Long Name: Suppressor of Hairless [Su(H)] Synonym: C-promoter binding factor 1,CBF1,IKJRB1,Immunoglobulin Kappa J region recombination signal-binding protein 1,LAG-1 Accession: P01101
  species Su_H in nucleus = 5/nucleus; Su_H is "Su(H)";  // isVersionOf uniprot:P28159
  // Long Name: Co-repressors Synonym: Synonym not specified Accession: P01112
  species CoR in nucleus = 5/nucleus;
  // Long Name: Long Name: Suppressor of Hairless and Co-repressors Synonym: Synonym not specified Accession: U05412 Heterodimer Member Info: Su(H)#PROTEIN#Suppressor of Hairless [Su(H)]#P01101#C-promoter binding factor 1|CBF1|IKJRB1|Immunoglobulin Kappa J region recombination signal-binding protein 1|LAG-1#;CoR#PROTEIN#Co-repressors#P01112##
  species Complex_br__Su_H_CoR in nucleus = 0; Complex_br__Su_H_CoR is "Complex_br_(Su(H)/CoR)";  // isVersionOf GO:0043234
  // Long Name: Co-Activators Synonym: Synonym not specified Accession: P01100
  species CoA in nucleus = 0.5/nucleus;  // isVersionOf CHEBI:36080
  // Long Name: Notch intracellular soluble fragment Synonym: Synonym not specified Accession: P01120
  species s24 in nucleus = 0; s24 is "NI_sub_c_sub_s";  // isVersionOf GO:0043234
  // Long Name: Long Name: Long name not specified Synonym: Synonym not specified Accession: U05413 Heterodimer Member Info: CoA#PROTEIN#Co-Activators#P01100##;Su(H)#PROTEIN#Suppressor of Hairless [Su(H)]#P01101#C-promoter binding factor 1|CBF1|IKJRB1|Immunoglobulin Kappa J region recombination signal-binding protein 1|LAG-1#;Mastermind#PROTEIN#Mastermind#P01106#MECT-1|Mastermind-like 1 (MAML1)|Mastermind-like2 (MAML2)|Mastermind-like3(MAML3)|mucoepidermoid carcinoma-translocated 1#;NIcs#PROTEIN#Notch intracellular soluble fragment#P01120##
  species s35 in nucleus = 0; s35 is "Complex_br_(Mastermind/Su(H)/_br_CoA/NI_sub_c_sub_s)";  // isVersionOf GO:0043234
  // Long Name: Notch intracellular soluble fragment Synonym: Synonym not specified Accession: P01120
  species s37 in nucleus = 0; s37 is "NI_sub_c_sub_s";  // isVersionOf GO:0043234
  // Long Name: Sel 10 Synonym: Synonym not specified Accession: P01102
  species Sel_10 in nucleus = 0.6/nucleus;  // isHomologTo uniprot:Q9UBV2
  // Long Name: Ubiquitin Synonym: Synonym not specified Accession: S01796
  species Ub in nucleus = 0.5/nucleus;  // CCO:F0004655
  // Long Name: a46_degraded Synonym: Synonym not specified Accession: U02510
  species a46_degraded in nucleus = 0;  // CHEBI:36080
  // Long Name: Notch Synonym: GLP-1,LIN-12,Notch1,Notch2,Notch3,Notch4 Accession: P01099
  species s1 in cytosol = 5/cytosol; s1 is "Notch";  // isVersionOf uniprot:Q6IAD4
  // Long Name: Long Name: Delta and Notch extracellular fragment Synonym: Synonym not specified Accession: U05409 Heterodimer Member Info: Next#PROTEIN#Serrate and Notch extracellular fragment#P01103##;Delta#PROTEIN#Delta#P01116#Delta-like1|Delta-like3|Delta-like4|DeltaC|LAG-2#
  species Complex_br__Delta_N_sub_ext in default = 0; Complex_br__Delta_N_sub_ext is "Complex_br_(Delta/N_sub_ext)";  // isVersionOf GO:0043234
  // Long Name: Notch Synonym: GLP-1,LIN-12,Notch1,Notch2,Notch3,Notch4 Accession: P01099
  species s41 in cytosol = 0; s41 is "Notch";  // isVersionOf uniprot:Q6IAD4
  // Long Name: Neurotic Synonym: O-fucosyltransferase 1,O-fut1,OFUT1,Ofut1 Accession: P01115
  species Neurotic in default = 5/default;  // isHomologTo uniprot:Q9V6X7
  // Long Name: Serrate Synonym: APX-1,F16B12.2,Jagged1,Jagged2 Accession: P01104
  species Serrate in default = 5/default;  // isHomologTo uniprot:Q6SPF9
  // Long Name: Long Name: Serrate and Notch (fucosylated) Synonym: Synonym not specified Accession: U05410 Heterodimer Member Info: Notch#PROTEIN#Notch#P01099#GLP-1|LIN-12|Notch1|Notch2|Notch3|Notch4#;Serrate#PROTEIN#Serrate#P01104#APX-1|F16B12.2|Jagged1|Jagged2#
  species Complex_br__Serrate_Notch in cytosol = 0; Complex_br__Serrate_Notch is "Complex_br_(Serrate/Notch)";  // isVersionOf GO:0043234
  // Long Name: Long Name: Serrate and Notch extracellular fragment Synonym: Synonym not specified Accession: U05414 Heterodimer Member Info: Next#PROTEIN#Serrate and Notch extracellular fragment#P01103##;Serrate#PROTEIN#Serrate#P01104#APX-1|F16B12.2|Jagged1|Jagged2#
  species Complex_br__Serrate_N_sub_ext in default = 0; Complex_br__Serrate_N_sub_ext is "Complex_br_(Serrate/N_sub_ext)";  // isVersionOf GO:0043234
  // Long Name: Notch intracellular soluble fragment Synonym: Synonym not specified Accession: P01120
  species NI_sub_c_sub_s_cytosol in cytosol = 0;  // isVersionOf GO:0043234
  // Long Name: a25_degraded Synonym: Synonym not specified Accession: U02509
  species a25_degraded in cytosol = 0;
  // Long Name: LNXp80 Synonym: Ligand of Numb-protein X 80 kDa Accession: P01111
  species LNXp80 in cytosol = 0.33/cytosol;  // isHomologTo uniprot:O70263
  // Long Name: Long Name: Delta and Notch (fucosylated) Synonym: Synonym not specified Accession: U05411 Heterodimer Member Info: Notch#PROTEIN#Notch#P01099#GLP-1|LIN-12|Notch1|Notch2|Notch3|Notch4#;Delta#PROTEIN#Delta#P01116#Delta-like1|Delta-like3|Delta-like4|DeltaC|LAG-2#
  species Complex_br__Notch_Delta in cytosol = 0; Complex_br__Notch_Delta is "Complex_br_(Notch/Delta)";  // isVersionOf GO:0043234
  // Long Name: Enhancer of Split complex genes Synonym: Synonym not specified Accession: G01541
  species E_spl_C_genes in nucleus = 0; E_spl_C_genes is "E(spl)-C genes";  // isHomologTo uniprot:Q5S414
  species s76 in default = 5/default;  // isVersionOf CCO:U0000005
  species s77 in default = 5/default;  // isVersionOf CCO:U0000005
  species dapt in default = 0;  // isVersionOf CCO:U0000005
  species gama_secretase in default = 0;  // hasPart uniprot:Q9NZ42 uniprot:Q96BI3

  // Parameters:
  kcatp_r8 = 0.5;
  kM_r8_s15 = 1;
  kcatn_r8 = 1.5;
  kM_r8_s19 = 2;
  kM_r8_s63 = 1.5;
  kcatp_r9 = 1.5;
  kM_r9_s7 = 1;
  kcatn_r9 = 0.04;
  kM_r9_s22 = 0.05;
  kass_r10 = 2;
  kdiss_r10 = 0.01;
  kI_r10_s25 = 1;
  kcatp_r11 = 0.5;
  kM_r11_s32 = 1;
  kcatn_r11 = 0.5;
  kM_r11_s26 = 1.5;
  kM_r11_s28 = 1;
  kass_r13 = 0.5;
  kdiss_r13 = 2;
  kcatp_r16 = 1;
  kcatn_r16 = 1;
  kM_r16_s39 = 1;
  ki_r16_s39 = 1;
  kass_r17 = 1.5;
  kdiss_r17 = 1.5;
  kcatp_r18 = 1;
  kcatn_r18 = 1.5;
  kM_r18_s4 = 1;
  ki_r18_s4 = 1.5;
  kass_r21 = 1.5;
  kdiss_r21 = 1.5;
  kI_r21_s2 = 1.5;
  kcatp_r25 = 1;
  kM_r25_s53 = 1.5;
  kcatn_r25 = 1.5;
  kM_r25_s60 = 1.25;
  kM_r25_s15 = 1.5;
  kcatp_r26 = 0.5;
  kM_r26_s25 = 1.7;
  kcatn_r26 = 1;
  kM_r26_s64 = 1.61;
  kcatp_r28 = 1.71;
  kcatn_r28 = 1.48;
  kM_r28_s41 = 1.64;
  ki_r28_s41 = 1.28;
  kcatp_r29 = 1.86;
  kM_r29_s67 = 1.61;
  kcatn_r29 = 1.78;
  kM_r29_s18 = 0.15;
  kM_r29_s15 = 1.87;
  kass_r30 = 1.95;
  kass_r31 = 0.055;
  kdiss_r31 = 2;
  kass_re16 = 0.004;
  kdiss_re16 = 2;
  kI_re16_s81 = 0.00594;

  // Reactions:
  r30: Complex_br__Su_H_CoR => E_spl_C_genes; kass_r30*Complex_br__Su_H_CoR;
  r31: s35 => E_spl_C_genes; kass_r31*s35 - kdiss_r31*E_spl_C_genes;
  // reversible simple convenience kinetics
  r8: NI_sub_c_sub_t -> N_sub_tm + NI_sub_c_sub_s_cytosol; gama_secretase*((kcatp_r8*(NI_sub_c_sub_t/kM_r8_s15) - kcatn_r8*(N_sub_tm/kM_r8_s19)*(NI_sub_c_sub_s_cytosol/kM_r8_s63))/(NI_sub_c_sub_t/kM_r8_s15 + (1 + N_sub_tm/kM_r8_s19)*(1 + NI_sub_c_sub_s_cytosol/kM_r8_s63)));  // modifiers: gama_secretase
  // kinetics of non-modulated unireactant enzymes
  r9: Delta -> a7_degraded; Neuralized*((kcatp_r9/kM_r9_s7*Delta - kcatn_r9/kM_r9_s22*a7_degraded)/(1 + Delta/kM_r9_s7 + a7_degraded/kM_r9_s22));  // modifiers: Neuralized
  // mass action rate law for first order forward, first order reverse, reversible reactions, continuous scheme
  r10: NI_sub_c_sub_s_cytosol -> s24; kI_r10_s25/(kI_r10_s25 + Numb)*(kass_r10*NI_sub_c_sub_s_cytosol - kdiss_r10*s24);  // modifiers: Numb
  // reversible simple convenience kinetics
  r11: Complex_br__Su_H_CoR -> Su_H + CoR; s24*((kcatp_r11*(Complex_br__Su_H_CoR/kM_r11_s32) - kcatn_r11*(Su_H/kM_r11_s26)*(CoR/kM_r11_s28))/(Complex_br__Su_H_CoR/kM_r11_s32 + (1 + Su_H/kM_r11_s26)*(1 + CoR/kM_r11_s28)));  // modifiers: s24
  // mass action rate law for , reversible reactions, continuous scheme
  r13: s24 + Su_H + Mastermind + CoA -> s35; kass_r13*s24*Su_H*Mastermind*CoA - kdiss_r13*s35;
  // reversible rapid-equilibrium random order ternary-complex mechanism with one product
  r16: s24 + Ub -> s37; (kcatp_r16/(ki_r16_s39*kM_r16_s39)*Sel_10*s24*Ub - kcatn_r16/kM_r16_s39*Sel_10*s37)/(1 + s24/ki_r16_s39 + Ub/ki_r16_s39 + s24*Ub/(ki_r16_s39*kM_r16_s39) + s37/kM_r16_s39);  // modifiers: Sel_10
  // mass action rate law for first order forward, first order reverse, reversible reactions, continuous scheme
  r17: s37 -> a46_degraded; kass_r17*s37 - kdiss_r17*a46_degraded;
  // reversible rapid-equilibrium random order ternary-complex mechanism with one product
  r18: s1 + fucose -> s41; (kcatp_r18/(ki_r18_s4*kM_r18_s4)*Neurotic*s1*fucose - kcatn_r18/kM_r18_s4*Neurotic*s41)/(1 + s1/ki_r18_s4 + fucose/ki_r18_s4 + s1*fucose/(ki_r18_s4*kM_r18_s4) + s41/kM_r18_s4);  // modifiers: Neurotic
  // mass action rate law for second order forward, first order reverse, reversible reactions, two reactants, continuous scheme
  r21: s41 + Serrate -> Complex_br__Serrate_Notch; kI_r21_s2/(kI_r21_s2 + Fringe)*(kass_r21*s41*Serrate - kdiss_r21*Complex_br__Serrate_Notch);  // modifiers: Fringe
  // reversible simple convenience kinetics
  r25: Complex_br__Serrate_Notch -> Complex_br__Serrate_N_sub_ext + NI_sub_c_sub_t; TACE*((kcatp_r25*(Complex_br__Serrate_Notch/kM_r25_s53) - kcatn_r25*(Complex_br__Serrate_N_sub_ext/kM_r25_s60)*(NI_sub_c_sub_t/kM_r25_s15))/(Complex_br__Serrate_Notch/kM_r25_s53 + (1 + Complex_br__Serrate_N_sub_ext/kM_r25_s60)*(1 + NI_sub_c_sub_t/kM_r25_s15)));  // modifiers: TACE
  // kinetics of non-modulated unireactant enzymes
  r26: Numb -> a25_degraded; LNXp80*((kcatp_r26/kM_r26_s25*Numb - kcatn_r26/kM_r26_s64*a25_degraded)/(1 + Numb/kM_r26_s25 + a25_degraded/kM_r26_s64));  // modifiers: LNXp80
  // reversible rapid-equilibrium random order ternary-complex mechanism with one product
  r28: Delta + s41 -> Complex_br__Notch_Delta; (kcatp_r28/(ki_r28_s41*kM_r28_s41)*Fringe*Delta*s41 - kcatn_r28/kM_r28_s41*Fringe*Complex_br__Notch_Delta)/(1 + Delta/ki_r28_s41 + s41/ki_r28_s41 + Delta*s41/(ki_r28_s41*kM_r28_s41) + Complex_br__Notch_Delta/kM_r28_s41);  // modifiers: Fringe
  // reversible simple convenience kinetics
  r29: Complex_br__Notch_Delta -> Complex_br__Delta_N_sub_ext + NI_sub_c_sub_t; TACE*((kcatp_r29*(Complex_br__Notch_Delta/kM_r29_s67) - kcatn_r29*(Complex_br__Delta_N_sub_ext/kM_r29_s18)*(NI_sub_c_sub_t/kM_r29_s15))/(Complex_br__Notch_Delta/kM_r29_s67 + (1 + Complex_br__Delta_N_sub_ext/kM_r29_s18)*(1 + NI_sub_c_sub_t/kM_r29_s15)));  // modifiers: TACE
  // mass action rate law for second order forward, first order reverse, reversible reactions, two reactants, continuous scheme
  re16: s76 + s77 -> gama_secretase; kI_re16_s81/(kI_re16_s81 + dapt)*(kass_re16*s76*s77 - kdiss_re16*gama_secretase);  // modifiers: dapt
end
