// SBML level 2 version 1
// This model was downloaded from BioModels Database
// http://www.ebi.ac.uk/biomodels/

model Sivakumar2011_NeuralStemCellDifferentiation_Crosstalk()
  // Sivakumar2011_NeuralStemCellDifferentiation_Crosstalk
  // This model is generated by integrating BIOMD0000000394 (EGFR), BIOMD0000000395 (Hedgehog), BIOMD0000000396 (Notch) and BIOMD0000000397 (Wnt), to investigate the signalling crosstalk between the four pathways.
  // This model is described in the article:
  // A systems biology approach to model neural stem cell regulation by notch, shh, wnt, and EGF signaling pathways.
  // Sivakumar KC, Dhanesh SB, Shobana S, James J, Mundayoor S.
  // OMICS 2011 Oct; 15(10): 729-737
  // Abstract:
  // The Notch, Sonic Hedgehog (Shh), Wnt, and EGF pathways have long been known to influence cell fate specification in the developing nervous system. Here we attempted to evaluate the contemporary knowledge about neural stem cell differentiation promoted by various drug-based regulations through a systems biology approach. Our model showed the phenomenon of DAPT-mediated antagonism of Enhancer of split [E(spl)] genes and enhancement of Shh target genes by a SAG agonist that were effectively demonstrated computationally and were consistent with experimental studies. However, in the case of model simulation of Wnt and EGF pathways, the model network did not supply any concurrent results with experimental data despite the fact that drugs were added at the appropriate positions. This paves insight into the potential of crosstalks between pathways considered in our study. Therefore, we manually developed a map of signaling crosstalk, which included the species connected by representatives from Notch, Shh, Wnt, and EGF pathways and highlighted the regulation of a single target gene, Hes-1, based on drug-induced simulations. These simulations provided results that matched with experimental studies. Therefore, these signaling crosstalk models complement as a tool toward the discovery of novel regulatory processes involved in neural stem cell maintenance, proliferation, and differentiation during mammalian central nervous system development. To our knowledge, this is the first report of a simple crosstalk map that highlights the differential regulation of neural stem cell differentiation and underscores the flow of positive and negative regulatory signals modulated by drugs.
  // This model is hosted on BioModels Database and identified by: BIOMD0000000398.
  // To cite BioModels Database, please use: BioModels Database: An enhanced, curated and annotated resource for published quantitative kinetic models.
  // To the extent possible under law, all copyright and related or neighbouring rights to this encoded model have been dedicated to the public domain worldwide. Please refer to CC0 Public Domain Dedication for more information.
  // biomodels.db:MODEL1111020000
  // biomodels.db:BIOMD0000000398
  // isDescribedBy pubmed:21978399
  // isDerivedFrom biomodels.db:BIOMD0000000394 biomodels.db:BIOMD0000000395 biomodels.db:BIOMD0000000396 biomodels.db:BIOMD0000000397
  // isVersionOf GO:0007219 GO:0060070 GO:0007224 GO:0007173 GO:0048863
  // occursIn CL:0000047

  // Compartments:
  compartment default = 1;
  compartment nucleus in default = 1;

  // Species:
  species NICD in default = 0;  // isVersionOf uniprot:P46531
  species Notch in default = 5/default;  // isHomologTo uniprot:P07207
  species Notch_TM in default = 0;  // isVersionOf CHEBI:36080
  species Gamma_secretase in default = 5/default;  // isVersionOf GO:0070765
  species DAPT in default = 100/default;  // isVersionOf CHEBI:36080
  species RBP_jk in default = 5/default; RBP_jk is "RBP-jk";  // isVersionOf uniprot:Q06330
  species Complex_NICD_RBP in default = 0; Complex_NICD_RBP is "Complex NICD-RBP";  // isVersionOf GO:0043234
  species Hes_1 in nucleus = 0; Hes_1 is "Hes-1";  // omim:139605
  species Shh in default = 5/default;  // isVersionOf uniprot:Q15465
  species Ptch1 in default = 5/default;  // isHomologTo uniprot:Q13635
  species Complex_Shh_Ptch1 in default = 0;  // isVersionOf GO:0043234
  species smo in default = 5/default;  // isVersionOf uniprot:Q99835
  species SAG in default = 0;  // isVersionOf uniprot:P10523
  species EGF in default = 5/default;  // isVersionOf uniprot:P01133
  species EGFR in default = 5/default;  // isVersionOf uniprot:Q147T7
  species Complex_EGF_EGFR in default = 0; Complex_EGF_EGFR is "Complex EGF-EGFR";  // isVersionOf GO:0043234
  species Erlotinib in default = 100/default;  // isVersionOf CHEBI:114785
  species Wnt in default = 5/default;  // isVersionOf uniprot:P56704
  species Frzzl in default = 5/default;  // isVersionOf uniprot:P18537
  species Complex_Wnt_Frzzl in default = 0; Complex_Wnt_Frzzl is "Complex Wnt-Frzzl";
  species Dishevelled in default = 5/default;  // isHomologTo uniprot:Q86TH3
  species FRAT_CK2 in default = 5/default; FRAT_CK2 is "FRAT-CK2";  // isVersionOf GO:0043234
  species Complex_Dishevelled_FRAT_CK2 in default = 0; Complex_Dishevelled_FRAT_CK2 is "Complex Dishevelled-FRAT-CK2";  // isVersionOf GO:0043234
  species GSK3B in default = 5/default;  // isVersionOf uniprot:P49841
  species Beta_catenin in default = 5/default; Beta_catenin is "Beta-catenin";  // isHomologTo uniprot:Q02248
  species Complex_GSK3B_Bcatenin in default = 0; Complex_GSK3B_Bcatenin is "Complex GSK3B-Bcatenin";  // isVersionOf GO:0043234
  species _6_bromoindirubin_3_oxime in default = 100/default; _6_bromoindirubin_3_oxime is "6 bromoindirubin 3`oxime";  // isVersionOf CHEBI:25750

  // Parameters:
  kV_re29_s60 = 1;
  kM_re29_s60_s57 = 1;
  kG_s57 = 1;
  kM_re29_s60_s53 = 1;
  kG_s53 = 1;
  kM_re29_s60_s58 = 1;
  kG_s58 = 1;
  kI_re29_s61 = 1;
  kass_re31 = 1;
  kdiss_re31 = 1;
  kass_re32 = 1;
  kdiss_re32 = 1;
  kass_re33 = 1;
  kdiss_re33 = 1;
  kass_re36 = 1;
  kdiss_re36 = 1;
  kI_re36_s101 = 1;
  kass_re37 = 1;
  kdiss_re37 = 1;
  kass_re38 = 1;
  kdiss_re38 = 1;
  kcatp_re40 = 1;
  kcatn_re40 = 1;
  kM_re40_s124 = 1;
  ki_re40_s124 = 1;
  kass_re42 = 1;
  kdiss_re42 = 1;
  kI_re42_s147 = 1;
  kI_re42_s135 = 1;
  kass_re43 = 1;
  kdiss_re43 = 1;
  kass_re34_s85 = 1;
  kdiss_re34_s85 = 1;
  kass_re34_s89 = 1;
  kdiss_re34_s89 = 1;
  kass_re35_s89 = 1;
  kdiss_re35_s89 = 1;

  // Reactions:
  // reversible thermodynamically independent convenience kinetics
  re29: Notch -> NICD + Notch_TM; kI_re29_s61/(kI_re29_s61 + DAPT)*Gamma_secretase*kV_re29_s60*((Notch/kM_re29_s60_s57*sqrt(kG_s57*kM_re29_s60_s57/(kG_s53*kM_re29_s60_s53*kG_s58*kM_re29_s60_s58)) - NICD/kM_re29_s60_s53*(Notch_TM/kM_re29_s60_s58)*sqrt(kG_s53*kM_re29_s60_s53*kG_s58*kM_re29_s60_s58/(kG_s57*kM_re29_s60_s57)))/(Notch/kM_re29_s60_s57 + (1 + NICD/kM_re29_s60_s53)*(1 + Notch_TM/kM_re29_s60_s58)));  // modifiers: Gamma_secretase, DAPT
  // mass action rate law for second order forward, first order reverse, reversible reactions, two reactants, continuous scheme
  re31: NICD + RBP_jk -> Complex_NICD_RBP; kass_re31*NICD*RBP_jk - kdiss_re31*Complex_NICD_RBP;
  // mass action rate law for first order forward, first order reverse, reversible reactions, continuous scheme
  re32: Complex_NICD_RBP -> Hes_1; kass_re32*Complex_NICD_RBP - kdiss_re32*Hes_1;
  // mass action rate law for second order forward, first order reverse, reversible reactions, two reactants, continuous scheme
  re33: Shh + Ptch1 -> Complex_Shh_Ptch1; kass_re33*Shh*Ptch1 - kdiss_re33*Complex_Shh_Ptch1;
  // mass action rate law for second order forward, first order reverse, reversible reactions, two reactants, continuous scheme
  re36: EGF + EGFR -> Complex_EGF_EGFR; kI_re36_s101/(kI_re36_s101 + Erlotinib)*(kass_re36*EGF*EGFR - kdiss_re36*Complex_EGF_EGFR);  // modifiers: Erlotinib
  // mass action rate law for first order forward, first order reverse, reversible reactions, continuous scheme
  re37: Complex_EGF_EGFR -> Hes_1; kass_re37*Complex_EGF_EGFR - kdiss_re37*Hes_1;
  // mass action rate law for second order forward, first order reverse, reversible reactions, two reactants, continuous scheme
  re38: Wnt + Frzzl -> Complex_Wnt_Frzzl; kass_re38*Wnt*Frzzl - kdiss_re38*Complex_Wnt_Frzzl;
  // reversible rapid-equilibrium random order ternary-complex mechanism with one product
  re40: Dishevelled + FRAT_CK2 -> Complex_Dishevelled_FRAT_CK2; (kcatp_re40/(ki_re40_s124*kM_re40_s124)*Complex_Wnt_Frzzl*Dishevelled*FRAT_CK2 - kcatn_re40/kM_re40_s124*Complex_Wnt_Frzzl*Complex_Dishevelled_FRAT_CK2)/(1 + Dishevelled/ki_re40_s124 + FRAT_CK2/ki_re40_s124 + Dishevelled*FRAT_CK2/(ki_re40_s124*kM_re40_s124) + Complex_Dishevelled_FRAT_CK2/kM_re40_s124);  // modifiers: Complex_Wnt_Frzzl
  // mass action rate law for second order forward, first order reverse, reversible reactions, two reactants, continuous scheme
  re42: GSK3B + Beta_catenin -> Complex_GSK3B_Bcatenin; kI_re42_s147/(kI_re42_s147 + _6_bromoindirubin_3_oxime)*(kI_re42_s135/(kI_re42_s135 + Complex_Dishevelled_FRAT_CK2))*(kass_re42*GSK3B*Beta_catenin - kdiss_re42*Complex_GSK3B_Bcatenin);  // modifiers: _6_bromoindirubin_3_oxime, Complex_Dishevelled_FRAT_CK2
  // mass action rate law for first order forward, first order reverse, reversible reactions, continuous scheme
  re43: Beta_catenin -> Hes_1; kass_re43*Beta_catenin - kdiss_re43*Hes_1;
  // kinetics of non-modulated unireactant enzymes
  re34: smo -> smo; Complex_Shh_Ptch1*(kass_re34_s85*smo - kdiss_re34_s85*smo) + SAG*(kass_re34_s89*smo - kdiss_re34_s89*smo);  // modifiers: Complex_Shh_Ptch1, SAG
  // mass action rate law for first order forward, first order reverse, reversible reactions, continuous scheme
  re35: smo -> Hes_1; SAG*(kass_re35_s89*smo - kdiss_re35_s89*Hes_1);  // modifiers: SAG
end
