// SBML level 2 version 4
// This model was downloaded from BioModels Database
// http://www.ebi.ac.uk/biomodels/

model MODEL1309060000()
  // Besozzi2012 - Oscillatory regimes in the Ras/cAMP/PKA pathway in S.cerevisiae
  // Mechanistic model of the Ras/cAMP/PKA in yeast S.cerevisiae. The Ras/cAMP/PKA pathway plays a major role in the regulation of metabolism, stress resistance and cell cycle progress and is tightly regulated by multiple feedback loops, exerted by the protein kinase A (PKA). This model investigates the dynamics of the second messenger cAMP on Ras/cAMP/PKA pathway, to determine the effects of the feedback mechanisms on establising stable oscillatory regimes.
  // The model has been defined according to the stochastic formulation of chemical kinetics [Gillespie DT, 1977] , which requires to specify the set of molecular species occurring in the pathway and their respective interactions, formally described as a set of biochemical reactions.
  // The volume considered for this system is 30fL; this value can be used to convert the model into the deterministic formulation.
  // This model is described in the article:
  // The role of feedback control mechanisms on the establishment of oscillatory regimes in the Ras/cAMP/PKA pathway in S. cerevisiae.
  // Besozzi D, Cazzaniga P, Pescini D, Mauri G, Colombo S, Martegani E.
  // EURASIP J Bioinform Syst Biol. 2012 Jul 20;2012(1):10.
  // Abstract:
  // In the yeast Saccharomyces cerevisiae, the Ras/cAMP/PKA pathway is involved in the regulation of cell growth and proliferation in response to nutritional sensing and stress conditions. The pathway is tightly regulated by multiple feedback loops, exerted by the protein kinase A (PKA) on a few pivotal components of the pathway. In this article, we investigate the dynamics of the second messenger cAMP by performing stochastic simulations and parameter sweep analysis of a mechanistic model of the Ras/cAMP/PKA pathway, to determine the effects that the modulation of these feedback mechanisms has on the establishment of stable oscillatory regimes. In particular, we start by studying the role of phosphodiesterases, the enzymes that catalyze the degradation of cAMP, which represent the major negative feedback in this pathway. Then, we show the results on cAMP oscillations when perturbing the amount of protein Cdc25 coupled with the alteration of the intracellular ratio of the guanine nucleotides (GTP/GDP), which are known to regulate the switch of the GTPase Ras protein. This multi-level regulation of the amplitude and frequency of oscillations in the Ras/cAMP/PKA pathway might act as a fine tuning mechanism for the downstream targets of PKA, as also recently evidenced by some experimental investigations on the nucleocytoplasmic shuttling of the transcription factor Msn2 in yeast cells.
  // This model is hosted on BioModels Database and identified by: BIOMD0000000478 .
  // To cite BioModels Database, please use: BioModels Database: An enhanced, curated and annotated resource for published quantitative kinetic models .
  // To the extent possible under law, all copyright and related or neighbouring rights to this encoded model have been dedicated to the public domain worldwide. Please refer to CC0 Public Domain Dedication for more information.
  // biomodels.db:MODEL1309060000
  // biomodels.db:BIOMD0000000478
  // isDescribedBy pubmed:22818197
  // hasProperty mamo:MAMO_0000046
  // hasTaxon taxonomy:4932
  // hasPart GO:0010737 GO:0019933 PW:0000543

  // Compartments:
  compartment compartment01 = 1;  // isVersionOf GO:0005623

  // Species:
  species Ras2_GDP in compartment01 = 20000/compartment01;  // hasPart CHEBI:17552 uniprot:P01120
  species Cdc25 in compartment01 = 300/compartment01;  // isVersionOf uniprot:P04821
  species Ras2_GDP_Cdc25 in compartment01 = 0;  // hasPart CHEBI:17552 uniprot:P04821 uniprot:P01120
  species Ras2_Cdc25 in compartment01 = 0;  // hasPart uniprot:P04821 uniprot:P01120
  species $GDP in compartment01 = 1500000/compartment01;  // isVersionOf CHEBI:17552
  species $GTP in compartment01 = 5000000/compartment01;  // isVersionOf CHEBI:15996
  species Ras2_GTP_Cdc25 in compartment01 = 0;  // hasPart CHEBI:15996 uniprot:P04821 uniprot:P01120
  species Ras2_GTP in compartment01 = 0;  // hasPart CHEBI:15996 uniprot:P01120
  species Ira2 in compartment01 = 200/compartment01;  // isVersionOf uniprot:P19158
  species Ras2_GTP_Ira2 in compartment01 = 0;  // hasPart CHEBI:15996 uniprot:P19158 uniprot:P01120
  species CYR1 in compartment01 = 200/compartment01;  // isVersionOf uniprot:P08678
  species Ras2_GTP_CYR1 in compartment01 = 0;  // hasPart CHEBI:15996 uniprot:P08678 uniprot:P01120
  species $ATP in compartment01 = 24000000/compartment01;  // isVersionOf CHEBI:15422
  species cAMP in compartment01 = 0;  // isVersionOf CHEBI:17489
  species PKA in compartment01 = 2500/compartment01;  // isVersionOf ec-code:2.7.11.11
  species cAMP_PKA in compartment01 = 0;  // hasPart CHEBI:17489 ec-code:2.7.11.11
  species IIcAMP_PKA in compartment01 = 0;  // hasPart CHEBI:17489 CHEBI:17489 ec-code:2.7.11.11
  species IIIcAMP_PKA in compartment01 = 0;  // hasPart CHEBI:17489 CHEBI:17489 CHEBI:17489 ec-code:2.7.11.11
  species IVcAMP_PKA in compartment01 = 0;  // hasPart CHEBI:17489 CHEBI:17489 CHEBI:17489 CHEBI:17489
  species C in compartment01 = 0;  // hasPart uniprot:P05986 uniprot:P06245 uniprot:P06244
  species R_2cAMP in compartment01 = 0;  // hasPart CHEBI:17489 uniprot:P07278
  species R in compartment01 = 0;  // isVersionOf uniprot:P07278
  species R_C in compartment01 = 0;  // hasPart uniprot:P07278 uniprot:P05986 uniprot:P06245 uniprot:P06244
  species Pde1 in compartment01 = 1400/compartment01;  // isVersionOf uniprot:P22434
  species Pde1f in compartment01 = 0;  // isVersionOf uniprot:P22434; hasProperty PATO:0002220
  species cAMP_Pde1f in compartment01 = 0;  // hasPart CHEBI:17489 uniprot:P22434; hasProperty PATO:0002220
  species AMP in compartment01 = 0;  // isVersionOf CHEBI:16027
  species PPA2 in compartment01 = 4000/compartment01;  // isVersionOf uniprot:P28239
  species Pde2 in compartment01 = 6500/compartment01;  // isVersionOf uniprot:P06776
  species cAMP_Pde2 in compartment01 = 0;  // hasPart CHEBI:17489 uniprot:P06776
  species Cdc25f in compartment01 = 0;  // isVersionOf uniprot:P04821
  species Ira2P in compartment01 = 0;  // isVersionOf uniprot:P19158; hasProperty PATO:0002220
  species Ras2_GTP_Ira2P in compartment01 = 0;  // hasPart CHEBI:15996 uniprot:P01120 uniprot:P19158

  // Parameters:
  K0 = 1 per_second;
  K1 = 1 per_second;
  K2 = 1.5 per_second;
  K3 = 1 per_second;
  K4 = 1 per_second;
  K5 = 1 per_second;
  K6 = 1 per_second;
  K7 = 1 per_second;
  K8 = 0.01 per_second;
  K9 = 0.25 per_second;
  K10 = 0.001 per_second;
  K11 = 2.1e-6 per_second;
  K12 = 0.001 per_second;
  K13 = 1e-5 per_second;
  K14 = 1e-5 per_second;
  K15 = 1e-5 per_second;
  K16 = 1e-5 per_second;
  K17 = 0.1 per_second;
  K18 = 0.1 per_second;
  K19 = 0.1 per_second;
  K20 = 0.1 per_second;
  K21 = 1 per_second;
  K22 = 1 per_second;
  K23 = 0.75 per_second;
  K24 = 1 per_second;
  K25 = 1e-6 per_second;
  K26 = 0.1 per_second;
  K27 = 0.1 per_second;
  K28 = 7.5 per_second;
  K29 = 0.0001 per_second;
  K30 = 0.0001 per_second;
  K31 = 1 per_second;
  K32 = 1.7 per_second;
  K33 = 1 per_second;
  K34 = 0.01 per_second;
  K35 = 0.001 per_second;
  K36 = 1.25 per_second;
  K37 = 2.5 per_second;
  K38 = 10 per_second;

  // Reactions:
  R0: Ras2_GDP + Cdc25 => Ras2_GDP_Cdc25; K0*Ras2_GDP*Cdc25;
  R1: Ras2_GDP_Cdc25 => Ras2_GDP + Cdc25; K1*Ras2_GDP_Cdc25;
  R2: Ras2_GDP_Cdc25 => Ras2_Cdc25 + $GDP; K2*Ras2_GDP_Cdc25;
  R3: Ras2_Cdc25 + $GDP => Ras2_GDP_Cdc25; K3*Ras2_Cdc25*GDP;
  R4: Ras2_Cdc25 + $GTP => Ras2_GTP_Cdc25; K4*Ras2_Cdc25*GTP;
  R5: Ras2_GTP_Cdc25 => Ras2_Cdc25 + $GTP; K5*Ras2_GTP_Cdc25;
  R6: Ras2_GTP_Cdc25 => Cdc25 + Ras2_GTP; K6*Ras2_GTP_Cdc25;
  R7: Cdc25 + Ras2_GTP => Ras2_GTP_Cdc25; K7*Cdc25*Ras2_GTP;
  R8: Ras2_GTP + Ira2 => Ras2_GTP_Ira2; K8*Ras2_GTP*Ira2;
  R9: Ras2_GTP_Ira2 => Ras2_GDP + Ira2; K9*Ras2_GTP_Ira2;
  R10: Ras2_GTP + CYR1 => Ras2_GTP_CYR1; K10*Ras2_GTP*CYR1;
  R11: Ras2_GTP_CYR1 + $ATP => Ras2_GTP_CYR1 + cAMP; K11*Ras2_GTP_CYR1*ATP;
  R12: Ira2 + Ras2_GTP_CYR1 => Ras2_GDP + Ira2 + CYR1; K12*Ira2*Ras2_GTP_CYR1;
  R13: cAMP + PKA => cAMP_PKA; K13*cAMP*PKA;
  R14: cAMP + cAMP_PKA => IIcAMP_PKA; K14*cAMP*cAMP_PKA;
  R15: cAMP + IIcAMP_PKA => IIIcAMP_PKA; K15*cAMP*IIcAMP_PKA;
  R16: cAMP + IIIcAMP_PKA => IVcAMP_PKA; K16*cAMP*IIIcAMP_PKA;
  R17: IVcAMP_PKA => cAMP + IIIcAMP_PKA; K17*IVcAMP_PKA;
  R18: IIIcAMP_PKA => cAMP + IIcAMP_PKA; K18*IIIcAMP_PKA;
  R19: IIcAMP_PKA => cAMP + cAMP_PKA; K19*IIcAMP_PKA;
  R20: cAMP_PKA => cAMP + PKA; K20*cAMP_PKA;
  R21: IVcAMP_PKA => 2 C + 2 R_2cAMP; K21*IVcAMP_PKA;
  R22: R_2cAMP => 2 cAMP + R; K22*R_2cAMP;
  R23: C + R => R_C; K23*C*R;
  R24: 2 R_C => PKA; K24*(R_C*(R_C - 1)/2);
  R25: C + Pde1 => C + Pde1f; K25*C*Pde1;
  R26: cAMP + Pde1f => cAMP_Pde1f; K26*cAMP*Pde1f;
  R27: cAMP_Pde1f => cAMP + Pde1f; K27*cAMP_Pde1f;
  R28: cAMP_Pde1f => Pde1f + AMP; K28*cAMP_Pde1f;
  R29: Pde1f + PPA2 => Pde1 + PPA2; K29*Pde1f*PPA2;
  R30: cAMP + Pde2 => cAMP_Pde2; K30*cAMP*Pde2;
  R31: cAMP_Pde2 => cAMP + Pde2; K31*cAMP_Pde2;
  R32: cAMP_Pde2 => AMP + Pde2; K32*cAMP_Pde2;
  R33: Cdc25 + C => C + Cdc25f; K33*Cdc25*C;
  R34: PPA2 + Cdc25f => Cdc25 + PPA2; K34*PPA2*Cdc25f;
  R35: Ira2 + C => C + Ira2P; K35*Ira2*C;
  R36: Ras2_GTP + Ira2P => Ras2_GTP_Ira2P; K36*Ras2_GTP*Ira2P;
  R37: Ras2_GTP_Ira2P => Ras2_GDP + Ira2P; K37*Ras2_GTP_Ira2P;
  R38: Ira2P => Ira2; K38*Ira2P;

  // Unit definitions:
  unit volume = dimensionless;
  unit substance = dimensionless;
  unit per_second = 1 / second;
end
