// SBML level 2 version 4
// This model was downloaded from BioModels Database
// http://www.ebi.ac.uk/biomodels/

model MODEL1406130001()
  // Yugi2014 - Insulin induced signalling (PFKL phosphorylation) - model 2
  // Insulin induces phosphorylation and activation of liver-type phosphofructokinase 1, which thereby controls a key reaction in glycolysis. This mechanism is revealed using the mathematical model. In this model, the PFKL phosphorylation time courses are calculation from the signalling pathway model developed by Kubata et al. (2012) ( MODEL1204060000 - Kubota2012_InsulinAction_AKTpathway).
  // Author's Note: Katsuyuki Yugi thank Akira Funahashi (Keio University, Japan) for his kind advice in converting the model from MATLAB to SBML.
  // This model is described in the article:
  // Reconstruction of insulin signal flow from phosphoproteome and metabolome data.
  // Yugi K, Kubota H, Toyoshima Y, Noguchi R, Kawata K, Komori Y, Uda S, Kunida K, Tomizawa Y, Funato Y, Miki H, Matsumoto M, Nakayama KI, Kashikura K, Endo K, Ikeda K, Soga T, Kuroda S.
  // Cell Rep 2014 Aug; 8(4): 1171-1183
  // Abstract:
  // Cellular homeostasis is regulated by signals through multiple molecular networks that include protein phosphorylation and metabolites. However, where and when the signal flows through a network and regulates homeostasis has not been explored. We have developed a reconstruction method for the signal flow based on time-course phosphoproteome and metabolome data, using multiple databases, and have applied it to acute action of insulin, an important hormone for metabolic homeostasis. An insulin signal flows through a network, through signaling pathways that involve 13 protein kinases, 26 phosphorylated metabolic enzymes, and 35 allosteric effectors, resulting in quantitative changes in 44 metabolites. Analysis of the network reveals that insulin induces phosphorylation and activation of liver-type phosphofructokinase 1, thereby controlling a key reaction in glycolysis. We thus provide a versatile method of reconstruction of signal flow through the network using phosphoproteome and metabolome data.
  // This model is hosted on BioModels Database and identified by: BIOMD0000000541.
  // To cite BioModels Database, please use: BioModels Database: An enhanced, curated and annotated resource for published quantitative kinetic models.
  // To the extent possible under law, all copyright and related or neighbouring rights to this encoded model have been dedicated to the public domain worldwide. Please refer to CC0 Public Domain Dedication for more information.
  // biomodels.db:MODEL1406130001
  // biomodels.db:BIOMD0000000541
  // isDescribedBy pubmed:25131207
  // isDerivedFrom biomodels.db:MODEL1204060000
  // hasTaxon taxonomy:131567
  // isVersionOf GO:0032868 GO:0006110

  // Compartments:
  compartment default = 1 volume;  // isVersionOf GO:0005623

  // Species:
  substanceOnly species $PFKL in default = 1.235571;  // uniprot:P17858
  substanceOnly species FBPase in default = 1;  // uniprot:P09467
  substanceOnly species F6P in default = 14.07743;  // CHEBI:15946
  substanceOnly species F1_6BP in default = 104.0724; F1_6BP is "F1,6BP";  // CHEBI:16905
  substanceOnly species PEP in default = 108.0945;  // CHEBI:18021
  substanceOnly species Isocitrate in default = 1.794872;  // CHEBI:30887
  substanceOnly species _2_oxoglutarate in default = 25.18854; _2_oxoglutarate is "2-oxoglutarate";  // CHEBI:30915
  substanceOnly species Malate in default = 68.87883;  // CHEBI:6650
  substanceOnly species F2_6BP in default = 1; F2_6BP is "F2,6BP";  // CHEBI:28602
  substanceOnly species Citrate in default = 17.74761;  // CHEBI:30769
  species sa4_degraded in default = 0;
  substanceOnly species ALDO in default = 1;  // uniprot:P04075
  substanceOnly species pPFKL in default = 0.759332005;  // isVersionOf uniprot:P17858; hasProperty PATO:0002220
  species sa8_degraded in default = 0;
  species sa7_degraded in default = 0;
  species sa5_degraded in default = 0;
  species sa6_degraded in default = 0;
  species sa9_degraded in default = 0;
  species sa3_degraded in default = 0;
  species sa10_degraded in default = 0;
  substanceOnly species IR_complex in default = 37.81915;  // uniprot:P06213
  substanceOnly species $pro_IR_complex in default = 46.22225;  // isVersionOf uniprot:P06213
  substanceOnly species p1IR_complex in default = 2.507671;  // isVersionOf uniprot:P06213; hasPart CHEBI:36080
  substanceOnly species p2IR_complex in default = 852.608418;  // isVersionOf uniprot:P06213; hasPart CHEBI:36080
  substanceOnly species p1p2IRcomplex in default = 3.930696;  // isVersionOf uniprot:P06213; hasPart CHEBI:36080
  substanceOnly species $AKT in default = 4.338122;  // uniprot:P31749
  substanceOnly species pAKT in default = 0.012942682;  // isVersionOf uniprot:P31749; hasProperty PATO:0002220
  substanceOnly species $mTOR in default = 0.09591637;  // uniprot:P42345
  substanceOnly species pmTOR in default = 0.004015031;  // isVersionOf uniprot:P42345; hasProperty +PATO:0002220
  substanceOnly species $S6K in default = 2.776994;  // uniprot:P23443
  substanceOnly species pS6K in default = 0.000988831;  // hasProperty +PATO:0002220; uniprot:P23443
  substanceOnly species $X in default = 14.99133;  // CHEBI:36080
  substanceOnly species pX in default = 0.043352951;  // isVersionOf CHEBI:36080; hasProperty PATO:0002220
  species sa28_degraded in default = 0;
  species sa27_degraded in default = 0;
  species sa26_degraded in default = 0;
  substanceOnly species $F6P_proxy in default;  // isVersionOf CHEBI:57579

  // Parameters:
  K_FBPase_cit = 0.0211646 dimensionless;
  K_FBPase_f16bp = 0.104089638 dimensionless;
  K_FBPase_f26bp = 17.51744 dimensionless;
  K_PFKL_PHOS_S775 = 6.283706 dimensionless;
  K_PFKL_akg = 24661.01 dimensionless;
  K_PFKL_cit = 41.30426 dimensionless;
  K_PFKL_f26bp = 1.282443 dimensionless;
  K_PFKL_f6p = 0.014114844 dimensionless;
  K_PFKL_icit = 1784.508 dimensionless;
  K_PFKL_mal = 9.544729 dimensionless;
  K_PFKL_pep = 0.633518366 dimensionless;
  Vf_FBPase = 9.932861 dimensionless;
  Vf_PFKL = 695063.7 dimensionless;
  k_ALDO = 0.008187906 dimensionless;
  k_mal = 1.00553 substance;
  k_akg = -3.544495 substance;
  k_pep = 43.99196 substance;
  k_icit = -0.038210156 substance;
  k_f26bp = -0.083430336 substance;
  k_cit = -0.351935646 substance;
  k_f6p = -0.930115636 dimensionless;
  insulin = 1 dimensionless;

  // Assignment rules:
  F6P_proxy := F6P;

  // Reactions:
  re30: $F6P_proxy => F1_6BP; F2_6BP/(K_PFKL_f26bp + F2_6BP)*(K_PFKL_akg/(K_PFKL_akg + _2_oxoglutarate))*(K_PFKL_pep/(K_PFKL_pep + PEP))*(K_PFKL_cit/(K_PFKL_cit + Citrate))*(K_PFKL_icit/(K_PFKL_icit + Isocitrate))*(K_PFKL_mal/(K_PFKL_mal + Malate))*(pPFKL/(K_PFKL_PHOS_S775 + pPFKL))*(Vf_PFKL*F6P_proxy/(K_PFKL_f6p + F6P_proxy));  // modifiers: PFKL, PEP, Isocitrate, _2_oxoglutarate, Malate, F2_6BP, Citrate, pPFKL
  re31: F1_6BP => $F6P_proxy; K_FBPase_f26bp/(K_FBPase_f26bp + F2_6BP)*(Citrate/(K_FBPase_cit + Citrate))*(Vf_FBPase*F1_6BP/(K_FBPase_f16bp + F1_6BP));  // modifiers: FBPase, F2_6BP, Citrate
  re32: F1_6BP => sa4_degraded; k_ALDO*F1_6BP;  // modifiers: ALDO
  re33: Malate => sa8_degraded; -k_mal;
  re34: _2_oxoglutarate => sa7_degraded; -k_akg;
  re35: PEP => sa5_degraded; -k_pep;
  re36: Isocitrate => sa6_degraded; -k_icit;
  re37: F2_6BP => sa9_degraded; -k_f26bp;
  re38: Citrate => sa10_degraded; -k_cit;
  re39: F6P => sa3_degraded; -k_f6p;
  re40: $pro_IR_complex => IR_complex; re40_k1*(pro_IR_complex - IR_complex);
    re40_k1 = 0.04779859 dimensionless;
  re41: IR_complex -> p1IR_complex; re41_k1*insulin*IR_complex - re41_k2*p1IR_complex;
    re41_k1 = 7.781608 dimensionless; re41_k2 = 1.611475 dimensionless;
  re42: IR_complex => p2IR_complex; re42_k1*IR_complex*pmTOR;  // modifiers: pmTOR
    re42_k1 = 9.933112 dimensionless;
  re43: p2IR_complex -> p1p2IRcomplex; re43_k1*insulin*p2IR_complex - re43_k2*p1p2IRcomplex;
    re43_k1 = 0.3630303 dimensionless; re43_k2 = 0.4081279 dimensionless;
  re44: p1IR_complex => p1p2IRcomplex; re44_k1*p1IR_complex*pmTOR;  // modifiers: pmTOR
    re44_k1 = 3.88249e-5 dimensionless;
  re45: p1p2IRcomplex => p1IR_complex; re45_k1*p1p2IRcomplex;
    re45_k1 = 0.284426 dimensionless;
  re46: p2IR_complex => IR_complex; re46_k1*p2IR_complex;
    re46_k1 = 1e-5 dimensionless;
  re47: p1p2IRcomplex => sa28_degraded; re47_k1*p1p2IRcomplex;
    re47_k1 = 0.09489603 dimensionless;
  re48: $AKT => pAKT; re48_k1*(AKT - pAKT)*p1IR_complex;  // modifiers: p1IR_complex
    re48_k1 = 0.009195789 dimensionless;
  re49: pAKT => $AKT; re49_k1*pAKT;
    re49_k1 = 7.706185 dimensionless;
  re50: p2IR_complex => sa27_degraded; re50_k1*p2IR_complex;
    re50_k1 = 1.002778e-5 dimensionless;
  re51: p1IR_complex => sa26_degraded; re51_k1*p1IR_complex;
    re51_k1 = 0.007927176 substance;
  re52: $mTOR => pmTOR; re52_k1*(mTOR - pmTOR)*pAKT;  // modifiers: pAKT
    re52_k1 = 0.4196824 dimensionless;
  re53: pmTOR => $mTOR; re53_k1*pmTOR;
    re53_k1 = 0.1243305 dimensionless;
  re54: $S6K => pS6K; re54_k1*(S6K - pS6K)*pmTOR;  // modifiers: pmTOR
    re54_k1 = 0.007524646 dimensionless;
  re55: pS6K => $S6K; re55_k1*pS6K*pX;  // modifiers: pX
    re55_k1 = 1.954976 dimensionless;
  re56: $X => pX; re56_k1*(X - pX)*pmTOR;  // modifiers: pmTOR
    re56_k1 = 0.001053424 dimensionless;
  re57: pX => $X; re57_k1*pX;
    re57_k1 = 0.001458116 substance;
  re58: $PFKL => pPFKL; re58_k1*(PFKL - pPFKL)*pS6K;  // modifiers: pS6K
    re58_k1 = 26.83167 dimensionless;
  re59: pPFKL => $PFKL; re59_k1*pPFKL;
    re59_k1 = 0.01665251 dimensionless;

  // Events:
  ev2min: at (time > 2): k_akg = -1.357466, k_cit = 0.351935646, k_f6p = 1.357466, k_icit = -0.038210156, k_f26bp = 0.028924455, k_mal = -1.508296, k_pep = 7.54147813;
  ev5min: at (time > 5): k_akg = 0, k_cit = -0.211161388, k_f6p = 0.271493213, k_icit = -0.038210156, k_f26bp = 0.119075279, k_mal = -0.904977376, k_pep = -6.334842;
  ev10min: at (time > 10): k_akg = 0.36199095, k_cit = 1.085973, k_f6p = -1.055807, k_icit = -0.038210156, k_f26bp = -0.050207413, k_mal = 3.921569, k_pep = 9.049774;
  ev15min: at (time > 15): k_akg = 1.085973, k_cit = 0.452488688, k_f6p = -0.12066365, k_icit = -0.018099548, k_f26bp = 0.100115778, k_mal = 1.809955, k_pep = -4.826546;
  ev20min: at (time > 20): k_akg = 0.226244344, k_cit = 0.377073906, k_f6p = -0.165912519, k_icit = 0.031674208, k_f26bp = -0.032601514, k_mal = 1.206637, k_pep = -3.61991;
  ev30min: at (time > 30): k_akg = 0.369532428, k_cit = 0.306686777, k_f6p = 0.070387129, k_icit = 0.031674208, k_f26bp = -0.003055632, k_mal = 0.502765209, k_pep = -0.301659125;
  ev45min: at (time > 45): k_akg = 0.369532428, k_cit = 0.306686777, k_f6p = 0.070387129, k_icit = 0.031674208, k_f26bp = -0.003055632, k_mal = 0.502765209, k_pep = -0.301659125;

  // Unit definitions:
  unit substance = mole;
  unit volume = litre;
  unit area = metre^2;
  unit length = metre;
  unit time = second;
end
