// SBML level 2 version 4
// This model was downloaded from BioModels Database
// http://www.ebi.ac.uk/biomodels/

model MODEL1405150000()
  // Miao2010 - Innate and adaptive immune responses to primary Influenza A Virus infection
  // This model is described in the article:
  // Quantifying the early immune response and adaptive immune response kinetics in mice infected with influenza A virus.
  // Miao H, Hollenbaugh JA, Zand MS, Holden-Wiltse J, Mosmann TR, Perelson AS, Wu H, Topham DJ.
  // J. Virol. 2010 Jul; 84(13): 6687-6698
  // Abstract:
  // Seasonal and pandemic influenza A virus (IAV) continues to be a public health threat. However, we lack a detailed and quantitative understanding of the immune response kinetics to IAV infection and which biological parameters most strongly influence infection outcomes. To address these issues, we use modeling approaches combined with experimental data to quantitatively investigate the innate and adaptive immune responses to primary IAV infection. Mathematical models were developed to describe the dynamic interactions between target (epithelial) cells, influenza virus, cytotoxic T lymphocytes (CTLs), and virus-specific IgG and IgM. IAV and immune kinetic parameters were estimated by fitting models to a large data set obtained from primary H3N2 IAV infection of 340 mice. Prior to a detectable virus-specific immune response (before day 5), the estimated half-life of infected epithelial cells is approximately 1.2 days, and the half-life of free infectious IAV is approximately 4 h. During the adaptive immune response (after day 5), the average half-life of infected epithelial cells is approximately 0.5 days, and the average half-life of free infectious virus is approximately 1.8 min. During the adaptive phase, model fitting confirms that CD8(+) CTLs are crucial for limiting infected cells, while virus-specific IgM regulates free IAV levels. This may imply that CD4 T cells and class-switched IgG antibodies are more relevant for generating IAV-specific memory and preventing future infection via a more rapid secondary immune response. Also, simulation studies were performed to understand the relative contributions of biological parameters to IAV clearance. This study provides a basis to better understand and predict influenza virus immunity.
  // This model is hosted on BioModels Database and identified by: BIOMD0000000546.
  // To cite BioModels Database, please use: BioModels Database: An enhanced, curated and annotated resource for published quantitative kinetic models.
  // To the extent possible under law, all copyright and related or neighbouring rights to this encoded model have been dedicated to the public domain worldwide. Please refer to CC0 Public Domain Dedication for more information.
  // biomodels.db:MODEL1405150000
  // biomodels.db:BIOMD0000000546
  // isDescribedBy pubmed:20410284
  // isDerivedFrom biomodels.db:MODEL1406230000
  // hasTaxon taxonomy:39107 taxonomy:132504
  // isVersionOf GO:0045087 GO:0002250

  // Compartments:
  compartment default = 1 volume;  // isVersionOf FMA:7195

  // Species:
  // Initial no. of uninfected and infectible epithelial cells per lung
  substanceOnly species Ep in default = 5.8e5;  // isVersionOf FMA:66768
  // This entity is refered as Ep* in the paper. Infected epithelial cells per lung.
  substanceOnly species Eps in default = 0;  // isVersionOf FMA:66768
  // Infective viral titer (EID50/ml)
  substanceOnly species V in default = 1.473e3;  // isVersionOf taxonomy:132504
  species s4 in default = 0;
  species s5 in default = 0;
  species s6 in default = 0;
  species s7 in default = 0;

  // Parameters:
  // Net growth rate of uninfected epithelial cells (per day)
  rho_E = 6.2e-8 substance;
  // alpha x the infection rate of uninfected epithelial cells ml*per(EID50*day)
  beta_a = 2.4e-6 substance;
  // Death rate of infected epithelial cells (per day)
  delta_Es = 0.6 substance;
  pi_a = 100 substance;
  // Virus clearance rate (reduction of infectious viral titer) (per day)
  c_V = 4.2 substance;

  // Reactions:
  re1: Ep => Eps; beta_a*Ep*V;  // modifiers: V
  re3: s4 => Ep; rho_E*Ep;
  re5: Eps => s5; delta_Es*Eps;
  re6: V => s6; c_V*V;
  re7: s7 => V; pi_a*Eps;  // modifiers: Eps

  // Unit definitions:
  unit substance = mole;
  unit volume = litre;
  unit area = metre^2;
  unit length = metre;
  unit time = second;
end
