// SBML level 2 version 4

function function_7(substrate, Km, V)
  V*substrate/(Km + substrate);
end
function_7 is "Henri-Michaelis-Menten (irreversible)";

function function_4_MAPK_MAPKp_1(K, k, MAPK, MKKpp)
  k*MAPK*MKKpp/(K + MAPK);
end
function_4_MAPK_MAPKp_1 is "function_4_MAPK -> MAPKp_1";

function function_4_MAPKp_MAPKpp_1(K, k, MAPKp, MKKpp)
  k*MAPKp*MKKpp/(K + MAPKp);
end
function_4_MAPKp_MAPKpp_1 is "function_4_MAPKp -> MAPKpp_1";

function function_4_MKK_MKKp_1(K, k, MKK, TAKTAB)
  k*MKK*TAKTAB/(K + MKK);
end
function_4_MKK_MKKp_1 is "function_4_MKK -> MKKp_1";

function function_4_MKKp_MKKpp_1(K, k, MKKp, TAKTAB)
  k*MKKp*TAKTAB/(K + MKKp);
end
function_4_MKKp_MKKpp_1 is "function_4_MKKp -> MKKpp_1";

model Model_1()
  // New Model

  // Compartments:
  compartment compartment_1 = 1;

  // Species:
  species IkBa_NFkb in compartment_1 = 5;
  species NFkBc in compartment_1 = 0;
  species TNFR1 in compartment_1 = 1;
  species TRADD in compartment_1 = 0;
  species cIAP in compartment_1 = 0;
  species TRAF6 in compartment_1 = 0;
  species TRAF5 in compartment_1 = 0;
  species RIP1 in compartment_1 = 0;
  species TRAF2 in compartment_1 = 0;
  species TAK1 in compartment_1 = 0;
  species LUBAC in compartment_1 = 0;
  species SHARPIN in compartment_1 = 0;
  species MKKpp in compartment_1 = 0;
  species MAPKpp in compartment_1 = 0;
  species IKK in compartment_1 = 0;
  species NFkBn in compartment_1 = 0;
  species MAPKn in compartment_1 = 0;
  species AP1 in compartment_1 = 0;
  species MAPK in compartment_1 = 46;
  species MAPKp in compartment_1 = 0;
  species MKK in compartment_1 = 52;
  species MKKp in compartment_1 = 0;
  species TAKTAB in compartment_1 = 0;
  species TAB in compartment_1 = 1;
  species IKK_IkBa_NFkb in compartment_1 = 0;
  species IKB in compartment_1 = 0;

  // Parameters:
  FB = 0.002;
  KO = 0;

  // Reactions:
  TNFR1_TRADD: TNFR1 => TRADD; compartment_1*TNFR1_TRADD_k1*TNFR1; TNFR1_TRADD is "TNFR1 -> TRADD";
    TNFR1_TRADD_k1 = 0.005;
  TRADD_cIAP1_2: TRADD => cIAP; compartment_1*TRADD_cIAP1_2_k1*TRADD; TRADD_cIAP1_2 is "TRADD -> cIAP1/2";
    TRADD_cIAP1_2_k1 = 0.02;
  TRADD_TRAF6: TRADD => TRAF6; compartment_1*TRADD_TRAF6_k1*TRADD; TRADD_TRAF6 is "TRADD -> TRAF6";
    TRADD_TRAF6_k1 = 0.02;
  cIAP1_2_TRAF5: cIAP => TRAF5; compartment_1*cIAP1_2_TRAF5_k1*cIAP; cIAP1_2_TRAF5 is "cIAP1/2 -> TRAF5";
    cIAP1_2_TRAF5_k1 = 0.008;
  TRAF2_RIP1: TRAF2 => RIP1; compartment_1*TRAF2_RIP1_k1*TRAF2; TRAF2_RIP1 is "TRAF2 -> RIP1";
    TRAF2_RIP1_k1 = 0.001;
  TRAF5_RIP1: TRAF5 => RIP1; compartment_1*TRAF5_RIP1_k1*TRAF5; TRAF5_RIP1 is "TRAF5 -> RIP1";
    TRAF5_RIP1_k1 = 0.001;
  TRAF6_RIP1: TRAF6 => RIP1; compartment_1*TRAF6_RIP1_k1*TRAF6; TRAF6_RIP1 is "TRAF6 -> RIP1";
    TRAF6_RIP1_k1 = 0.0001;
  TRAF6_TAK1: TRAF6 => TAK1; compartment_1*TRAF6_TAK1_k1*TRAF6; TRAF6_TAK1 is "TRAF6 -> TAK1";
    TRAF6_TAK1_k1 = 0.00013;
  RIP1_LUBAC: RIP1 => LUBAC; compartment_1*RIP1_LUBAC_k1*RIP1; RIP1_LUBAC is "RIP1 -> LUBAC";
    RIP1_LUBAC_k1 = 0.007;
  LUBAC_TAK1: LUBAC => TAK1; compartment_1*LUBAC_TAK1_k1*LUBAC; LUBAC_TAK1 is "LUBAC -> TAK1";
    LUBAC_TAK1_k1 = 0.1;
  RIP1_SHARPIN: RIP1 => SHARPIN; compartment_1*RIP1_SHARPIN_k1*RIP1; RIP1_SHARPIN is "RIP1 -> SHARPIN";
    RIP1_SHARPIN_k1 = 0.007;
  SHARPIN_IKK: SHARPIN => IKK; compartment_1*SHARPIN_IKK_k1*SHARPIN; SHARPIN_IKK is "SHARPIN -> IKK";
    SHARPIN_IKK_k1 = 0.01;
  TAK1_IKK: TAK1 => IKK; compartment_1*TAK1_IKK_k1*TAK1; TAK1_IKK is "TAK1 -> IKK";
    TAK1_IKK_k1 = 0.1;
  TAK1_TAB_TAK_TAB: TAB + TAK1 => TAKTAB; compartment_1*TAK1_TAB_TAK_TAB_k1*TAB*TAK1; TAK1_TAB_TAK_TAB is "TAK1 +TAB -> TAK/TAB";
    TAK1_TAB_TAK_TAB_k1 = 0.01;
  reaction_20: IKK + IkBa_NFkb => IKK_IkBa_NFkb; compartment_1*reaction_20_k1*IKK*IkBa_NFkb; reaction_20 is "IKK + IkBa/NFKb -> IKK/IkBa/NFKb";
    reaction_20_k1 = 0.0021;
  NFKBc_NFKBn: NFkBc => NFkBn; compartment_1*NFKBc_NFKBn_k1*NFkBc; NFKBc_NFKBn is "NFKBc -> NFKBn";
    NFKBc_NFKBn_k1 = 0.015;
  MAPKpp_MAPKn: MAPKpp => MAPKn; compartment_1*MAPKpp_MAPKn_k1*MAPKpp; MAPKpp_MAPKn is "MAPKpp -> MAPKn";
    MAPKpp_MAPKn_k1 = 0.082;
  MAPKn_AP1: MAPKn => AP1; compartment_1*MAPKn_AP1_k1*MAPKn; MAPKn_AP1 is "MAPKn -> AP1";
    MAPKn_AP1_k1 = 0.01;
  cIAP1_2_TRAF2: cIAP => TRAF2; compartment_1*cIAP1_2_TRAF2_k1*cIAP; cIAP1_2_TRAF2 is "cIAP1/2 -> TRAF2";
    cIAP1_2_TRAF2_k1 = 0.01;
  MAPK_MAPKp: MAPK => MAPKp; compartment_1*function_4_MAPK_MAPKp_1(MAPK_MAPKp_K, MAPK_MAPKp_k, MAPK, MKKpp); MAPK_MAPKp is "MAPK -> MAPKp";  // modifiers: MKKpp
    MAPK_MAPKp_K = 0.39; MAPK_MAPKp_k = 0.061;
  MAPKp_MAPK: MAPKp => MAPK; compartment_1*function_7(MAPKp, MAPKp_MAPK_Km, MAPKp_MAPK_V); MAPKp_MAPK is "MAPKp -> MAPK";
    MAPKp_MAPK_Km = 0.00052; MAPKp_MAPK_V = 9.7e-5;
  MAPKp_MAPKpp: MAPKp => MAPKpp; compartment_1*function_4_MAPKp_MAPKpp_1(MAPKp_MAPKpp_K, MAPKp_MAPKpp_k, MAPKp, MKKpp); MAPKp_MAPKpp is "MAPKp -> MAPKpp";  // modifiers: MKKpp
    MAPKp_MAPKpp_K = 9.9e-7; MAPKp_MAPKpp_k = 0.25;
  MAPKpp_MAPKp: MAPKpp => MAPKp; compartment_1*function_7(MAPKpp, MAPKpp_MAPKp_Km, MAPKpp_MAPKp_V); MAPKpp_MAPKp is "MAPKpp -> MAPKp";
    MAPKpp_MAPKp_Km = 0.44; MAPKpp_MAPKp_V = 2.6e-6;
  MKK_MKKp: MKK => MKKp; compartment_1*function_4_MKK_MKKp_1(MKK_MKKp_K, MKK_MKKp_k, MKK, TAKTAB); MKK_MKKp is "MKK -> MKKp";  // modifiers: TAKTAB
    MKK_MKKp_K = 0.059; MKK_MKKp_k = 0.027;
  MKKp_MKK: MKKp => MKK; compartment_1*function_7(MKKp, MKKp_MKK_Km, MKKp_MKK_V); MKKp_MKK is "MKKp -> MKK";
    MKKp_MKK_Km = 0.029; MKKp_MKK_V = 0.00057;
  MKKp_MKKpp: MKKp => MKKpp; compartment_1*function_4_MKKp_MKKpp_1(MKKp_MKKpp_K, MKKp_MKKpp_k, MKKp, TAKTAB); MKKp_MKKpp is "MKKp -> MKKpp";  // modifiers: TAKTAB
    MKKp_MKKpp_K = 1.9e-7; MKKp_MKKpp_k = 0.026;
  MKKpp_MKKp: MKKpp => MKKp; compartment_1*function_7(MKKpp, MKKpp_MKKp_Km, MKKpp_MKKp_V); MKKpp_MKKp is "MKKpp -> MKKp";
    MKKpp_MKKp_Km = 0.09; MKKpp_MKKp_V = 0.00038;
  reaction_26: IKK_IkBa_NFkb => IKK + IkBa_NFkb; compartment_1*reaction_26_k1*IKK_IkBa_NFkb; reaction_26 is "IKK/IkBa/NFKb -> IKK + IkBa/NFKb";
    reaction_26_k1 = 8.9e-7;
  IKK_IkBa_NFKb_NFKBc_IKB: IKK_IkBa_NFkb => NFkBc + IKB + IKK; compartment_1*IKK_IkBa_NFKb_NFKBc_IKB_k1*IKK_IkBa_NFkb; IKK_IkBa_NFKb_NFKBc_IKB is "IKK/IkBa/NFKb -> NFKBc + IKB";
    IKK_IkBa_NFKb_NFKBc_IKB_k1 = 2;
  IkB_degrad: IKB => ; compartment_1*IkB_degrad_k1*IKB;
    IkB_degrad_k1 = 0.017;
  TAK_TAB_degrad: TAKTAB => ; compartment_1*TAK_TAB_degrad_k1*TAKTAB; TAK_TAB_degrad is "TAK/TAB degrad";
    TAK_TAB_degrad_k1 = 0.071;
  IKK_degrad: IKK => ; compartment_1*IKK_degrad_k1*IKK;
    IKK_degrad_k1 = 0.0046;

  // Unit definitions:
  unit volume = 1e-3 litre;
  unit substance = 1e-9 mole;
end
