// SBML level 2 version 4

model main()

  // Compartments:
  compartment System___CELL = 1;
  compartment System___ENVIRONMENT = 1e-13;
  compartment System__CELL_CYTOPLASM = 1e-13;
  compartment System__CELL_MEMBRANE = 1e-13;
  compartment System___ = 1; System___ is "root";

  // Species:
  species Variable___SIZE in System___ = 1.66054e-24/System___;
  species Variable__CELL_CYTOPLASM_AC_Enzyme in System__CELL_CYTOPLASM = 5.030757e-23/System__CELL_CYTOPLASM;
  species Variable__CELL_CYTOPLASM_AC_Purine in System__CELL_CYTOPLASM = 4.15135e-22/System__CELL_CYTOPLASM;
  species Variable__CELL_CYTOPLASM_ADE in System__CELL_CYTOPLASM = 1.48668e-18/System__CELL_CYTOPLASM;
  species Variable__CELL_CYTOPLASM_ADO in System__CELL_CYTOPLASM = 4.455333e-21/System__CELL_CYTOPLASM;
  species Variable__CELL_CYTOPLASM_BPGSP in System__CELL_CYTOPLASM = 3.265363e-20/System__CELL_CYTOPLASM;
  species Variable__CELL_CYTOPLASM_BPGSPP in System__CELL_CYTOPLASM = 4.693169e-20/System__CELL_CYTOPLASM;
  species Variable__CELL_CYTOPLASM_BPGSPP_P2GA in System__CELL_CYTOPLASM = 4.852579e-25/System__CELL_CYTOPLASM;
  species Variable__CELL_CYTOPLASM_BPGSPP_P3GA in System__CELL_CYTOPLASM = 4.18223e-24/System__CELL_CYTOPLASM;
  species Variable__CELL_CYTOPLASM_BPGSPP_Phos in System__CELL_CYTOPLASM = 7.820676e-20/System__CELL_CYTOPLASM;
  species Variable__CELL_CYTOPLASM_BPGSP_B13PG in System__CELL_CYTOPLASM = 1.500938e-21/System__CELL_CYTOPLASM;
  species Variable__CELL_CYTOPLASM_BPGSP_B23PG in System__CELL_CYTOPLASM = 7.639755e-20/System__CELL_CYTOPLASM;
  species Variable__CELL_CYTOPLASM_CO2 in System__CELL_CYTOPLASM = 1.2e-16/System__CELL_CYTOPLASM;
  species Variable__CELL_CYTOPLASM_DHAP in System__CELL_CYTOPLASM = 1.508136e-18/System__CELL_CYTOPLASM;
  species Variable__CELL_CYTOPLASM_E4P in System__CELL_CYTOPLASM = 4.570804e-20/System__CELL_CYTOPLASM;
  species Variable__CELL_CYTOPLASM_E_6PGLase in System__CELL_CYTOPLASM = 1.66054e-24/System__CELL_CYTOPLASM;
  species Variable__CELL_CYTOPLASM_E_6PGODH in System__CELL_CYTOPLASM = 2.100002e-19/System__CELL_CYTOPLASM;
  species Variable__CELL_CYTOPLASM_E_ADA in System__CELL_CYTOPLASM = 1.66054e-24/System__CELL_CYTOPLASM;
  species Variable__CELL_CYTOPLASM_E_ADPRT in System__CELL_CYTOPLASM = 1.66054e-24/System__CELL_CYTOPLASM;
  species Variable__CELL_CYTOPLASM_E_AK in System__CELL_CYTOPLASM = 1.66054e-24/System__CELL_CYTOPLASM;
  species Variable__CELL_CYTOPLASM_E_ALD in System__CELL_CYTOPLASM = 9.965646e-21/System__CELL_CYTOPLASM;
  species Variable__CELL_CYTOPLASM_E_AMPDA in System__CELL_CYTOPLASM = 1.66054e-24/System__CELL_CYTOPLASM;
  species Variable__CELL_CYTOPLASM_E_AMPase in System__CELL_CYTOPLASM = 1.66054e-24/System__CELL_CYTOPLASM;
  species Variable__CELL_CYTOPLASM_E_APK in System__CELL_CYTOPLASM = 9.696558e-20/System__CELL_CYTOPLASM;
  species Variable__CELL_CYTOPLASM_E_ATPase in System__CELL_CYTOPLASM = 1.66054e-24/System__CELL_CYTOPLASM;
  species Variable__CELL_CYTOPLASM_E_EN in System__CELL_CYTOPLASM = 2.199219e-20/System__CELL_CYTOPLASM;
  species Variable__CELL_CYTOPLASM_E_G6PDH in System__CELL_CYTOPLASM = 1.66054e-24/System__CELL_CYTOPLASM;
  species Variable__CELL_CYTOPLASM_E_GAPDH in System__CELL_CYTOPLASM = 1.191644e-19/System__CELL_CYTOPLASM;
  species Variable__CELL_CYTOPLASM_E_GSH_S in System__CELL_CYTOPLASM = 1.66054e-24/System__CELL_CYTOPLASM;
  species Variable__CELL_CYTOPLASM_E_GSSGR in System__CELL_CYTOPLASM = 1.250055e-20/System__CELL_CYTOPLASM;
  species Variable__CELL_CYTOPLASM_E_GSSG_transport in System__CELL_CYTOPLASM = 1.66054e-24/System__CELL_CYTOPLASM;
  species Variable__CELL_CYTOPLASM_E_HGPRT in System__CELL_CYTOPLASM = 1.66054e-24/System__CELL_CYTOPLASM;
  species Variable__CELL_CYTOPLASM_E_HK in System__CELL_CYTOPLASM = 2.399148e-21/System__CELL_CYTOPLASM;
  species Variable__CELL_CYTOPLASM_E_IMPase in System__CELL_CYTOPLASM = 1.66054e-24/System__CELL_CYTOPLASM;
  species Variable__CELL_CYTOPLASM_E_LDH in System__CELL_CYTOPLASM = 3.432e-19/System__CELL_CYTOPLASM;
  species Variable__CELL_CYTOPLASM_E_L_GCS in System__CELL_CYTOPLASM = 1.66054e-24/System__CELL_CYTOPLASM;
  species Variable__CELL_CYTOPLASM_E_PFK in System__CELL_CYTOPLASM = 7.552596e-22/System__CELL_CYTOPLASM;
  species Variable__CELL_CYTOPLASM_E_PGI in System__CELL_CYTOPLASM = 2.179227e-20/System__CELL_CYTOPLASM;
  species Variable__CELL_CYTOPLASM_E_PGK in System__CELL_CYTOPLASM = 2.739028e-19/System__CELL_CYTOPLASM;
  species Variable__CELL_CYTOPLASM_E_PGM in System__CELL_CYTOPLASM = 4.098545e-20/System__CELL_CYTOPLASM;
  species Variable__CELL_CYTOPLASM_E_PK in System__CELL_CYTOPLASM = 8.696913e-21/System__CELL_CYTOPLASM;
  species Variable__CELL_CYTOPLASM_E_PNPase in System__CELL_CYTOPLASM = 1.488472e-18/System__CELL_CYTOPLASM;
  species Variable__CELL_CYTOPLASM_E_PRM in System__CELL_CYTOPLASM = 1.66054e-24/System__CELL_CYTOPLASM;
  species Variable__CELL_CYTOPLASM_E_PRPPsyn in System__CELL_CYTOPLASM = 1.66054e-24/System__CELL_CYTOPLASM;
  species Variable__CELL_CYTOPLASM_E_R5PI in System__CELL_CYTOPLASM = 1.419496e-18/System__CELL_CYTOPLASM;
  species Variable__CELL_CYTOPLASM_E_TA in System__CELL_CYTOPLASM = 6.900043e-20/System__CELL_CYTOPLASM;
  species Variable__CELL_CYTOPLASM_E_TK1 in System__CELL_CYTOPLASM = 3.299992e-20/System__CELL_CYTOPLASM;
  species Variable__CELL_CYTOPLASM_E_TK2 in System__CELL_CYTOPLASM = 3.299992e-20/System__CELL_CYTOPLASM;
  species Variable__CELL_CYTOPLASM_E_TPI in System__CELL_CYTOPLASM = 1.139596e-19/System__CELL_CYTOPLASM;
  species Variable__CELL_CYTOPLASM_E_X5PI in System__CELL_CYTOPLASM = 4.218503e-19/System__CELL_CYTOPLASM;
  species Variable__CELL_CYTOPLASM_F6P in System__CELL_CYTOPLASM = 1.943203e-18/System__CELL_CYTOPLASM;
  species Variable__CELL_CYTOPLASM_FDP in System__CELL_CYTOPLASM = 5.734945e-19/System__CELL_CYTOPLASM;
  species Variable__CELL_CYTOPLASM_G6P in System__CELL_CYTOPLASM = 5.957015e-18/System__CELL_CYTOPLASM;
  species Variable__CELL_CYTOPLASM_GA3P in System__CELL_CYTOPLASM = 3.631856e-19/System__CELL_CYTOPLASM;
  species Variable__CELL_CYTOPLASM_GDP in System__CELL_CYTOPLASM = 9.395671e-18/System__CELL_CYTOPLASM;
  species Variable__CELL_CYTOPLASM_GL6P in System__CELL_CYTOPLASM = 5.278356e-22/System__CELL_CYTOPLASM;
  species Variable__CELL_CYTOPLASM_GLC in System__CELL_CYTOPLASM = 4.750003e-15/System__CELL_CYTOPLASM;
  species Variable__CELL_CYTOPLASM_GO6P in System__CELL_CYTOPLASM = 4.473403e-18/System__CELL_CYTOPLASM;
  species Variable__CELL_CYTOPLASM_GSH in System__CELL_CYTOPLASM = 3.268176e-16/System__CELL_CYTOPLASM;
  species Variable__CELL_CYTOPLASM_GSSG in System__CELL_CYTOPLASM = 4.6495e-19/System__CELL_CYTOPLASM;
  species Variable__CELL_CYTOPLASM_GUA in System__CELL_CYTOPLASM = 9.300005e-18/System__CELL_CYTOPLASM;
  species Variable__CELL_CYTOPLASM_GUA2 in System__CELL_CYTOPLASM = 9.300005e-18/System__CELL_CYTOPLASM;
  species Variable__CELL_CYTOPLASM_GUO in System__CELL_CYTOPLASM = 1.440001e-16/System__CELL_CYTOPLASM;
  species Variable__CELL_CYTOPLASM_H in System__CELL_CYTOPLASM = 6.307335e-21/System__CELL_CYTOPLASM;
  species Variable__CELL_CYTOPLASM_HXi in System__CELL_CYTOPLASM = 1.618263e-19/System__CELL_CYTOPLASM;
  species Variable__CELL_CYTOPLASM_IMP in System__CELL_CYTOPLASM = 8.061596e-19/System__CELL_CYTOPLASM;
  species Variable__CELL_CYTOPLASM_INO in System__CELL_CYTOPLASM = 1.457906e-20/System__CELL_CYTOPLASM;
  species Variable__CELL_CYTOPLASM_Ki in System__CELL_CYTOPLASM = 1.326579e-14/System__CELL_CYTOPLASM;
  species Variable__CELL_CYTOPLASM_LACi in System__CELL_CYTOPLASM = 1.33037e-16/System__CELL_CYTOPLASM;
  species Variable__CELL_CYTOPLASM_L_GC in System__CELL_CYTOPLASM = 4.224606e-20/System__CELL_CYTOPLASM;
  species Variable__CELL_CYTOPLASM_Mg in System__CELL_CYTOPLASM = 6.02546e-17/System__CELL_CYTOPLASM;
  species Variable__CELL_CYTOPLASM_Mg13DPG in System__CELL_CYTOPLASM = 2.924405e-21/System__CELL_CYTOPLASM;
  species Variable__CELL_CYTOPLASM_Mg23DPG in System__CELL_CYTOPLASM = 5.691346e-17/System__CELL_CYTOPLASM;
  species Variable__CELL_CYTOPLASM_MgADP in System__CELL_CYTOPLASM = 1.303171e-17/System__CELL_CYTOPLASM;
  species Variable__CELL_CYTOPLASM_MgAMP in System__CELL_CYTOPLASM = 9.106084e-20/System__CELL_CYTOPLASM;
  species Variable__CELL_CYTOPLASM_MgATP in System__CELL_CYTOPLASM = 1.413632e-16/System__CELL_CYTOPLASM;
  species Variable__CELL_CYTOPLASM_MgFDP in System__CELL_CYTOPLASM = 1.481868e-19/System__CELL_CYTOPLASM;
  species Variable__CELL_CYTOPLASM_MgGDP in System__CELL_CYTOPLASM = 2.427773e-18/System__CELL_CYTOPLASM;
  species Variable__CELL_CYTOPLASM_MgPi in System__CELL_CYTOPLASM = 2.144145e-18/System__CELL_CYTOPLASM;
  species Variable__CELL_CYTOPLASM_NAD in System__CELL_CYTOPLASM = 6.502469e-18/System__CELL_CYTOPLASM;
  species Variable__CELL_CYTOPLASM_NADH in System__CELL_CYTOPLASM = 2.753125e-20/System__CELL_CYTOPLASM;
  species Variable__CELL_CYTOPLASM_NADP in System__CELL_CYTOPLASM = 6.477905e-21/System__CELL_CYTOPLASM;
  species Variable__CELL_CYTOPLASM_NADPH in System__CELL_CYTOPLASM = 6.528166e-18/System__CELL_CYTOPLASM;
  species Variable__CELL_CYTOPLASM_Nai in System__CELL_CYTOPLASM = 3.393012e-15/System__CELL_CYTOPLASM;
  species Variable__CELL_CYTOPLASM_PCO2 in System__CELL_CYTOPLASM = 6.642161e-23/System__CELL_CYTOPLASM;
  species Variable__CELL_CYTOPLASM_PEP in System__CELL_CYTOPLASM = 8.185737e-19/System__CELL_CYTOPLASM;
  species Variable__CELL_CYTOPLASM_PO2 in System__CELL_CYTOPLASM = 1.66054e-22/System__CELL_CYTOPLASM;
  species Variable__CELL_CYTOPLASM_PRPP in System__CELL_CYTOPLASM = 1.411099e-19/System__CELL_CYTOPLASM;
  species Variable__CELL_CYTOPLASM_PYRi in System__CELL_CYTOPLASM = 5.164722e-18/System__CELL_CYTOPLASM;
  species Variable__CELL_CYTOPLASM_Pi in System__CELL_CYTOPLASM = 1.016502e-16/System__CELL_CYTOPLASM;
  species Variable__CELL_CYTOPLASM_R1P in System__CELL_CYTOPLASM = 8.079666e-18/System__CELL_CYTOPLASM;
  species Variable__CELL_CYTOPLASM_R5P in System__CELL_CYTOPLASM = 5.857744e-19/System__CELL_CYTOPLASM;
  species Variable__CELL_CYTOPLASM_RU5P in System__CELL_CYTOPLASM = 4.926003e-19/System__CELL_CYTOPLASM;
  species Variable__CELL_CYTOPLASM_S7P in System__CELL_CYTOPLASM = 2.10189e-18/System__CELL_CYTOPLASM;
  species Variable__CELL_CYTOPLASM_SIZE in System__CELL_CYTOPLASM = 1.66054e-37/System__CELL_CYTOPLASM;
  species Variable__CELL_CYTOPLASM_T in System__CELL_CYTOPLASM = 6.642161e-24/System__CELL_CYTOPLASM;
  species Variable__CELL_CYTOPLASM_X5P in System__CELL_CYTOPLASM = 8.993661e-19/System__CELL_CYTOPLASM;
  species Variable__CELL_CYTOPLASM__13DPG in System__CELL_CYTOPLASM = 2.355153e-20/System__CELL_CYTOPLASM;
  species Variable__CELL_CYTOPLASM__2PG in System__CELL_CYTOPLASM = 1.45234e-18/System__CELL_CYTOPLASM;
  species Variable__CELL_CYTOPLASM__3PG in System__CELL_CYTOPLASM = 4.816925e-18/System__CELL_CYTOPLASM;
  species Variable__CELL_CYTOPLASM_band3 in System__CELL_CYTOPLASM = 2.712906e-19/System__CELL_CYTOPLASM;
  species Variable__CELL_CYTOPLASM_band3ALD in System__CELL_CYTOPLASM = 2.703586e-20/System__CELL_CYTOPLASM;
  species Variable__CELL_CYTOPLASM_band3GAPDH in System__CELL_CYTOPLASM = 6.465638e-19/System__CELL_CYTOPLASM;
  species Variable__CELL_CYTOPLASM_band3PFK in System__CELL_CYTOPLASM = 1.024474e-20/System__CELL_CYTOPLASM;
  species Variable__CELL_CYTOPLASM_band3_ka in System__CELL_CYTOPLASM = 1.66054e-24/System__CELL_CYTOPLASM;
  species Variable__CELL_CYTOPLASM_band3_kd in System__CELL_CYTOPLASM = 1.66054e-24/System__CELL_CYTOPLASM;
  species Variable__CELL_CYTOPLASM_band3deoxyHb in System__CELL_CYTOPLASM = 1.04807e-19/System__CELL_CYTOPLASM;
  species Variable__CELL_CYTOPLASM_band3deoxyHb13DPG in System__CELL_CYTOPLASM = 3.825967e-23/System__CELL_CYTOPLASM;
  species Variable__CELL_CYTOPLASM_band3deoxyHb23DPG in System__CELL_CYTOPLASM = 6.811392e-19/System__CELL_CYTOPLASM;
  species Variable__CELL_CYTOPLASM_band3deoxyHbADP in System__CELL_CYTOPLASM = 1.134626e-20/System__CELL_CYTOPLASM;
  species Variable__CELL_CYTOPLASM_band3deoxyHbATP in System__CELL_CYTOPLASM = 2.301031e-20/System__CELL_CYTOPLASM;
  species Variable__CELL_CYTOPLASM_band3deoxyHbFDP in System__CELL_CYTOPLASM = 6.070731e-22/System__CELL_CYTOPLASM;
  species Variable__CELL_CYTOPLASM_band3deoxyHbGDP in System__CELL_CYTOPLASM = 9.945796e-21/System__CELL_CYTOPLASM;
  species Variable__CELL_CYTOPLASM_band3deoxyHbMgATP in System__CELL_CYTOPLASM = 2.074219e-20/System__CELL_CYTOPLASM;
  species Variable__CELL_CYTOPLASM_band3oxyHb in System__CELL_CYTOPLASM = 1.29702e-19/System__CELL_CYTOPLASM;
  species Variable__CELL_CYTOPLASM_band3oxyHb13DPG in System__CELL_CYTOPLASM = 9.67316e-24/System__CELL_CYTOPLASM;
  species Variable__CELL_CYTOPLASM_band3oxyHb23DPG in System__CELL_CYTOPLASM = 4.214658e-20/System__CELL_CYTOPLASM;
  species Variable__CELL_CYTOPLASM_band3oxyHbADP in System__CELL_CYTOPLASM = 2.925284e-21/System__CELL_CYTOPLASM;
  species Variable__CELL_CYTOPLASM_band3oxyHbATP in System__CELL_CYTOPLASM = 3.942829e-21/System__CELL_CYTOPLASM;
  species Variable__CELL_CYTOPLASM_band3oxyHbFDP in System__CELL_CYTOPLASM = 0;
  species Variable__CELL_CYTOPLASM_band3oxyHbGDP in System__CELL_CYTOPLASM = 0;
  species Variable__CELL_CYTOPLASM_band3oxyHbMgATP in System__CELL_CYTOPLASM = 7.150686e-21/System__CELL_CYTOPLASM;
  species Variable__CELL_CYTOPLASM_cysteine in System__CELL_CYTOPLASM = 2e-20/System__CELL_CYTOPLASM;
  species Variable__CELL_CYTOPLASM_deoxyHb in System__CELL_CYTOPLASM = 3.863275e-18/System__CELL_CYTOPLASM;
  species Variable__CELL_CYTOPLASM_deoxyHb13DPG in System__CELL_CYTOPLASM = 1.410284e-21/System__CELL_CYTOPLASM;
  species Variable__CELL_CYTOPLASM_deoxyHb23DPG in System__CELL_CYTOPLASM = 2.510737e-17/System__CELL_CYTOPLASM;
  species Variable__CELL_CYTOPLASM_deoxyHbADP in System__CELL_CYTOPLASM = 4.182328e-19/System__CELL_CYTOPLASM;
  species Variable__CELL_CYTOPLASM_deoxyHbATP in System__CELL_CYTOPLASM = 8.481793e-19/System__CELL_CYTOPLASM;
  species Variable__CELL_CYTOPLASM_deoxyHbFDP in System__CELL_CYTOPLASM = 2.237723e-20/System__CELL_CYTOPLASM;
  species Variable__CELL_CYTOPLASM_deoxyHbGDP in System__CELL_CYTOPLASM = 3.666104e-19/System__CELL_CYTOPLASM;
  species Variable__CELL_CYTOPLASM_deoxyHbMgATP in System__CELL_CYTOPLASM = 7.645748e-19/System__CELL_CYTOPLASM;
  species Variable__CELL_CYTOPLASM_f23DPG in System__CELL_CYTOPLASM = 1.299797e-16/System__CELL_CYTOPLASM;
  species Variable__CELL_CYTOPLASM_fADP in System__CELL_CYTOPLASM = 9.021551e-18/System__CELL_CYTOPLASM;
  species Variable__CELL_CYTOPLASM_fAMP in System__CELL_CYTOPLASM = 3.355018e-18/System__CELL_CYTOPLASM;
  species Variable__CELL_CYTOPLASM_fATP in System__CELL_CYTOPLASM = 8.444203e-18/System__CELL_CYTOPLASM;
  species Variable__CELL_CYTOPLASM_glutamate in System__CELL_CYTOPLASM = 2e-17/System__CELL_CYTOPLASM;
  species Variable__CELL_CYTOPLASM_glycine in System__CELL_CYTOPLASM = 1.8e-17/System__CELL_CYTOPLASM;
  species Variable__CELL_CYTOPLASM_oxyHb in System__CELL_CYTOPLASM = 4.780927e-16/System__CELL_CYTOPLASM;
  species Variable__CELL_CYTOPLASM_oxyHb13DPG in System__CELL_CYTOPLASM = 3.565608e-20/System__CELL_CYTOPLASM;
  species Variable__CELL_CYTOPLASM_oxyHb23DPG in System__CELL_CYTOPLASM = 1.553559e-16/System__CELL_CYTOPLASM;
  species Variable__CELL_CYTOPLASM_oxyHbADP in System__CELL_CYTOPLASM = 1.078284e-17/System__CELL_CYTOPLASM;
  species Variable__CELL_CYTOPLASM_oxyHbATP in System__CELL_CYTOPLASM = 1.45336e-17/System__CELL_CYTOPLASM;
  species Variable__CELL_CYTOPLASM_oxyHbMgATP in System__CELL_CYTOPLASM = 2.635803e-17/System__CELL_CYTOPLASM;
  species Variable__CELL_CYTOPLASM_pHi in System__CELL_CYTOPLASM = 1.263385e-23/System__CELL_CYTOPLASM;
  species Variable__CELL_MEMBRANE_AC_K_Leak in System__CELL_MEMBRANE = 3.995302e-22/System__CELL_MEMBRANE;
  species Variable__CELL_MEMBRANE_AC_NaK_Pump in System__CELL_MEMBRANE = 1.66054e-24/System__CELL_MEMBRANE;
  species Variable__CELL_MEMBRANE_E_ADEtr in System__CELL_MEMBRANE = 1.66054e-24/System__CELL_MEMBRANE;
  species Variable__CELL_MEMBRANE_E_ADOtr in System__CELL_MEMBRANE = 1.66054e-24/System__CELL_MEMBRANE;
  species Variable__CELL_MEMBRANE_E_HXtr in System__CELL_MEMBRANE = 1.66054e-24/System__CELL_MEMBRANE;
  species Variable__CELL_MEMBRANE_E_INOtr in System__CELL_MEMBRANE = 1.66054e-24/System__CELL_MEMBRANE;
  species Variable__CELL_MEMBRANE_E_K_Leak in System__CELL_MEMBRANE = 1.66054e-24/System__CELL_MEMBRANE;
  species Variable__CELL_MEMBRANE_E_LACtr in System__CELL_MEMBRANE = 1.66054e-24/System__CELL_MEMBRANE;
  species Variable__CELL_MEMBRANE_E_NaK_Pump in System__CELL_MEMBRANE = 1.66054e-24/System__CELL_MEMBRANE;
  species Variable__CELL_MEMBRANE_E_Na_Leak in System__CELL_MEMBRANE = 1.66054e-24/System__CELL_MEMBRANE;
  species Variable__CELL_MEMBRANE_E_PYRtr in System__CELL_MEMBRANE = 1.66054e-24/System__CELL_MEMBRANE;
  species Variable__CELL_MEMBRANE_E_Pitr in System__CELL_MEMBRANE = 1.66054e-24/System__CELL_MEMBRANE;
  species Variable__CELL_MEMBRANE_SIZE in System__CELL_MEMBRANE = 1.66054e-37/System__CELL_MEMBRANE;
  species Variable__ENVIRONMENT_ADEe in System___ENVIRONMENT = 1.440001e-16/System___ENVIRONMENT;
  species Variable__ENVIRONMENT_ADEe_ef in System___ENVIRONMENT = 0;
  species Variable__ENVIRONMENT_ADOe in System___ENVIRONMENT = 0;
  species Variable__ENVIRONMENT_ADOe_ef in System___ENVIRONMENT = 0;
  species Variable__ENVIRONMENT_HXe in System___ENVIRONMENT = 0;
  species Variable__ENVIRONMENT_HXe_ef in System___ENVIRONMENT = 0;
  species Variable__ENVIRONMENT_INOe in System___ENVIRONMENT = 0;
  species Variable__ENVIRONMENT_INOe_ef in System___ENVIRONMENT = 0;
  species Variable__ENVIRONMENT_Ke in System___ENVIRONMENT = 0;
  species Variable__ENVIRONMENT_LACe in System___ENVIRONMENT = 0;
  species Variable__ENVIRONMENT_LACe_ef in System___ENVIRONMENT = 0;
  species Variable__ENVIRONMENT_Nae in System___ENVIRONMENT = 6.400004e-15/System___ENVIRONMENT;
  species Variable__ENVIRONMENT_PYRe in System___ENVIRONMENT = 0;
  species Variable__ENVIRONMENT_PYRe_ef in System___ENVIRONMENT = 0;
  species Variable__ENVIRONMENT_Pie in System___ENVIRONMENT = 1.600001e-15/System___ENVIRONMENT;
  species Variable__ENVIRONMENT_Pie_ef in System___ENVIRONMENT = 0;
  species Variable__ENVIRONMENT_SIZE in System___ENVIRONMENT = 1.66054e-37/System___ENVIRONMENT;

  // Parameters:
  N_A = 6.0221367e23;

  // Reactions:
  Process__CELL_CYTOPLASM_BPGSP1: Variable__CELL_CYTOPLASM__13DPG + Variable__CELL_CYTOPLASM_BPGSP -> Variable__CELL_CYTOPLASM_BPGSP_B13PG; (Process__CELL_CYTOPLASM_BPGSP1_k1*((1 + 10^(-6.8)/10^(-7.2))/(1 + 10^(-6.8)/10^(-1*Variable__CELL_CYTOPLASM_pHi*1e-13*N_A)))*Variable__CELL_CYTOPLASM__13DPG*Variable__CELL_CYTOPLASM_BPGSP - Process__CELL_CYTOPLASM_BPGSP1_k2*Variable__CELL_CYTOPLASM_BPGSP_B13PG)*(1e-13*N_A*Variable__CELL_CYTOPLASM_AC_Enzyme*1e-13*N_A/1000)/N_A;  // modifiers: Variable__CELL_CYTOPLASM_pHi, Variable__CELL_CYTOPLASM_AC_Enzyme
    Process__CELL_CYTOPLASM_BPGSP1_Name = BPGSP1; Process__CELL_CYTOPLASM_BPGSP1_StepperID = DE1; Process__CELL_CYTOPLASM_BPGSP1_Priority = 0; Process__CELL_CYTOPLASM_BPGSP1_k1 = 80000000; Process__CELL_CYTOPLASM_BPGSP1_k2 = 400;
  Process__CELL_CYTOPLASM_BPGSP2: Variable__CELL_CYTOPLASM_BPGSP_B13PG -> Variable__CELL_CYTOPLASM_BPGSPP + Variable__CELL_CYTOPLASM__3PG; Process__CELL_CYTOPLASM_BPGSP2_k3*((1 + (10^(-7.2)/10^(-7.17))^4)/(1 + (10^(-1*Variable__CELL_CYTOPLASM_pHi*1e-13*N_A)/10^(-7.17))^4))*Variable__CELL_CYTOPLASM_BPGSP_B13PG*1e-13*N_A*Variable__CELL_CYTOPLASM_AC_Enzyme*1e-13*N_A/1000/N_A;  // modifiers: Variable__CELL_CYTOPLASM_pHi, Variable__CELL_CYTOPLASM_AC_Enzyme
    Process__CELL_CYTOPLASM_BPGSP2_Name = BPGSP2; Process__CELL_CYTOPLASM_BPGSP2_StepperID = DE1; Process__CELL_CYTOPLASM_BPGSP2_Priority = 0; Process__CELL_CYTOPLASM_BPGSP2_k3 = 9.9;
  Process__CELL_CYTOPLASM_BPGSP3: Variable__CELL_CYTOPLASM_BPGSPP + Variable__CELL_CYTOPLASM__3PG -> Variable__CELL_CYTOPLASM_BPGSPP_P3GA; (Process__CELL_CYTOPLASM_BPGSP3_k4*((1 + (10^(-7.2)/10^(-7.17))^4)/(1 + (10^(-1*Variable__CELL_CYTOPLASM_pHi*1e-13*N_A)/10^(-7.17))^4))*Variable__CELL_CYTOPLASM_BPGSPP*Variable__CELL_CYTOPLASM__3PG - Process__CELL_CYTOPLASM_BPGSP3_k5*Variable__CELL_CYTOPLASM_BPGSPP_P3GA)*1e-13*N_A*Variable__CELL_CYTOPLASM_AC_Enzyme*1e-13*N_A/1000/N_A;  // modifiers: Variable__CELL_CYTOPLASM_pHi, Variable__CELL_CYTOPLASM_AC_Enzyme
    Process__CELL_CYTOPLASM_BPGSP3_Name = BPGSP3; Process__CELL_CYTOPLASM_BPGSP3_StepperID = DE1; Process__CELL_CYTOPLASM_BPGSP3_Priority = 0; Process__CELL_CYTOPLASM_BPGSP3_k4 = 185000000; Process__CELL_CYTOPLASM_BPGSP3_k5 = 100000000;
  Process__CELL_CYTOPLASM_BPGSP4: Variable__CELL_CYTOPLASM_BPGSPP + Variable__CELL_CYTOPLASM__2PG -> Variable__CELL_CYTOPLASM_BPGSPP_P2GA; (Process__CELL_CYTOPLASM_BPGSP4_k6*((1 + (10^(-7.2)/10^(-7.17))^4)/(1 + (10^(-1*Variable__CELL_CYTOPLASM_pHi*1e-13*N_A)/10^(-7.17))^4))*Variable__CELL_CYTOPLASM_BPGSPP*Variable__CELL_CYTOPLASM__2PG - Process__CELL_CYTOPLASM_BPGSP4_k7*Variable__CELL_CYTOPLASM_BPGSPP_P2GA)*1e-13*N_A*Variable__CELL_CYTOPLASM_AC_Enzyme*1e-13*N_A/1000/N_A;  // modifiers: Variable__CELL_CYTOPLASM_pHi, Variable__CELL_CYTOPLASM_AC_Enzyme
    Process__CELL_CYTOPLASM_BPGSP4_Name = BPGSP4; Process__CELL_CYTOPLASM_BPGSP4_StepperID = DE1; Process__CELL_CYTOPLASM_BPGSP4_Priority = 0; Process__CELL_CYTOPLASM_BPGSP4_k6 = 1000; Process__CELL_CYTOPLASM_BPGSP4_k7 = 1000;
  Process__CELL_CYTOPLASM_BPGSP5: Variable__CELL_CYTOPLASM_BPGSPP_P3GA -> Variable__CELL_CYTOPLASM_BPGSP_B23PG; (Process__CELL_CYTOPLASM_BPGSP5_k8*Variable__CELL_CYTOPLASM_BPGSPP_P3GA - Process__CELL_CYTOPLASM_BPGSP5_k9*Variable__CELL_CYTOPLASM_BPGSP_B23PG)*1e-13*N_A*Variable__CELL_CYTOPLASM_AC_Enzyme*1e-13*N_A/1000/N_A;  // modifiers: Variable__CELL_CYTOPLASM_AC_Enzyme
    Process__CELL_CYTOPLASM_BPGSP5_Name = BPGSP5; Process__CELL_CYTOPLASM_BPGSP5_StepperID = DE1; Process__CELL_CYTOPLASM_BPGSP5_Priority = 0; Process__CELL_CYTOPLASM_BPGSP5_k8 = 10000; Process__CELL_CYTOPLASM_BPGSP5_k9 = 0.55;
  Process__CELL_CYTOPLASM_BPGSP6: Variable__CELL_CYTOPLASM_BPGSPP_P2GA -> Variable__CELL_CYTOPLASM_BPGSP_B23PG; (Process__CELL_CYTOPLASM_BPGSP6_k10*Variable__CELL_CYTOPLASM_BPGSPP_P2GA - Process__CELL_CYTOPLASM_BPGSP6_k11*Variable__CELL_CYTOPLASM_BPGSP_B23PG)*1e-13*N_A*Variable__CELL_CYTOPLASM_AC_Enzyme*1e-13*N_A/1000/N_A;  // modifiers: Variable__CELL_CYTOPLASM_AC_Enzyme
    Process__CELL_CYTOPLASM_BPGSP6_Name = BPGSP6; Process__CELL_CYTOPLASM_BPGSP6_StepperID = DE1; Process__CELL_CYTOPLASM_BPGSP6_Priority = 0; Process__CELL_CYTOPLASM_BPGSP6_k10 = 1979; Process__CELL_CYTOPLASM_BPGSP6_k11 = 0.01;
  Process__CELL_CYTOPLASM_BPGSP7: Variable__CELL_CYTOPLASM_BPGSP_B23PG -> Variable__CELL_CYTOPLASM_BPGSP + Variable__CELL_CYTOPLASM_f23DPG; (Process__CELL_CYTOPLASM_BPGSP7_k12*Variable__CELL_CYTOPLASM_BPGSP_B23PG - k13*((1 + 10^(-6.8)/10^(-7.2))/(1 + 10^(-6.8)/10^(-1*Variable__CELL_CYTOPLASM_pHi*1e-13*N_A)))*Variable__CELL_CYTOPLASM_BPGSP*Variable__CELL_CYTOPLASM_f23DPG)*1e-13*N_A*Variable__CELL_CYTOPLASM_AC_Enzyme*1e-13*N_A/1000/N_A;  // modifiers: Variable__CELL_CYTOPLASM_pHi, Variable__CELL_CYTOPLASM_AC_Enzyme
    Process__CELL_CYTOPLASM_BPGSP7_Name = BPGSP7; Process__CELL_CYTOPLASM_BPGSP7_StepperID = DE1; Process__CELL_CYTOPLASM_BPGSP7_Priority = 0; Process__CELL_CYTOPLASM_BPGSP7_k12 = 1000; k13 = 1800000;
  Process__CELL_CYTOPLASM_BPGSP8: Variable__CELL_CYTOPLASM_BPGSPP + Variable__CELL_CYTOPLASM_Pi -> Variable__CELL_CYTOPLASM_BPGSPP_Phos; (k14*Variable__CELL_CYTOPLASM_BPGSPP*Variable__CELL_CYTOPLASM_Pi - k15*Variable__CELL_CYTOPLASM_BPGSPP_Phos)*1e-13*N_A*Variable__CELL_CYTOPLASM_AC_Enzyme*1e-13*N_A/1000/N_A;  // modifiers: Variable__CELL_CYTOPLASM_AC_Enzyme
    Process__CELL_CYTOPLASM_BPGSP8_Name = BPGSP8; Process__CELL_CYTOPLASM_BPGSP8_StepperID = DE1; Process__CELL_CYTOPLASM_BPGSP8_Priority = 0; k14 = 1000000000; k15 = 610000;
  Process__CELL_CYTOPLASM_BPGSP9: Variable__CELL_CYTOPLASM_BPGSPP_Phos -> Variable__CELL_CYTOPLASM_BPGSP + 2 Variable__CELL_CYTOPLASM_Pi; k16*Variable__CELL_CYTOPLASM_BPGSPP_Phos*1e-13*N_A*Variable__CELL_CYTOPLASM_AC_Enzyme*1e-13*N_A/1000/N_A;  // modifiers: Variable__CELL_CYTOPLASM_AC_Enzyme
    Process__CELL_CYTOPLASM_BPGSP9_Name = BPGSP9; Process__CELL_CYTOPLASM_BPGSP9_StepperID = DE1; Process__CELL_CYTOPLASM_BPGSP9_Priority = 0; k16 = 0.19;
  Process__CELL_CYTOPLASM_E_6PGLase: Variable__CELL_CYTOPLASM_GL6P -> Variable__CELL_CYTOPLASM_GO6P; 1000*Variable__CELL_CYTOPLASM_GL6P/(Process__CELL_CYTOPLASM_E_6PGLase_Km + 1000*Variable__CELL_CYTOPLASM_GL6P)*Process__CELL_CYTOPLASM_E_6PGLase_Vm*1e-13*N_A*(Variable__CELL_CYTOPLASM_AC_Enzyme*1e-13*N_A/1000/1000/3600)/N_A;  // modifiers: Variable__CELL_CYTOPLASM_E_6PGLase, Variable__CELL_CYTOPLASM_AC_Enzyme
    Process__CELL_CYTOPLASM_E_6PGLase_Name = _6_Phosphogluconolactonase; Process__CELL_CYTOPLASM_E_6PGLase_StepperID = DE1; Process__CELL_CYTOPLASM_E_6PGLase_Priority = 0; Process__CELL_CYTOPLASM_E_6PGLase_Km = 0.079882812; Process__CELL_CYTOPLASM_E_6PGLase_Vm = 2251.8;
  Process__CELL_CYTOPLASM_E_6PGODH: Variable__CELL_CYTOPLASM_NADP + Variable__CELL_CYTOPLASM_GO6P -> Variable__CELL_CYTOPLASM_RU5P + Variable__CELL_CYTOPLASM_NADPH; Variable__CELL_CYTOPLASM_E_6PGODH*1e-13*N_A*(Process__CELL_CYTOPLASM_E_6PGODH_k1*Process__CELL_CYTOPLASM_E_6PGODH_k3*Process__CELL_CYTOPLASM_E_6PGODH_k5*Process__CELL_CYTOPLASM_E_6PGODH_k7*Process__CELL_CYTOPLASM_E_6PGODH_k9*Process__CELL_CYTOPLASM_E_6PGODH_k11*Variable__CELL_CYTOPLASM_NADP*Variable__CELL_CYTOPLASM_GO6P - Process__CELL_CYTOPLASM_E_6PGODH_k2*Process__CELL_CYTOPLASM_E_6PGODH_k4*Process__CELL_CYTOPLASM_E_6PGODH_k6*Process__CELL_CYTOPLASM_E_6PGODH_k8*Process__CELL_CYTOPLASM_E_6PGODH_k10*Process__CELL_CYTOPLASM_E_6PGODH_k12*Variable__CELL_CYTOPLASM_CO2*Variable__CELL_CYTOPLASM_RU5P*Variable__CELL_CYTOPLASM_NADPH)/(Process__CELL_CYTOPLASM_E_6PGODH_k2*Process__CELL_CYTOPLASM_E_6PGODH_k9*Process__CELL_CYTOPLASM_E_6PGODH_k11*(Process__CELL_CYTOPLASM_E_6PGODH_k4*Process__CELL_CYTOPLASM_E_6PGODH_k6 + Process__CELL_CYTOPLASM_E_6PGODH_k4*Process__CELL_CYTOPLASM_E_6PGODH_k7 + Process__CELL_CYTOPLASM_E_6PGODH_k5*Process__CELL_CYTOPLASM_E_6PGODH_k7) + Process__CELL_CYTOPLASM_E_6PGODH_k1*Process__CELL_CYTOPLASM_E_6PGODH_k9*Process__CELL_CYTOPLASM_E_6PGODH_k11*(Process__CELL_CYTOPLASM_E_6PGODH_k4*Process__CELL_CYTOPLASM_E_6PGODH_k6 + Process__CELL_CYTOPLASM_E_6PGODH_k4*Process__CELL_CYTOPLASM_E_6PGODH_k7 + Process__CELL_CYTOPLASM_E_6PGODH_k5*Process__CELL_CYTOPLASM_E_6PGODH_k7)*Variable__CELL_CYTOPLASM_NADP + Process__CELL_CYTOPLASM_E_6PGODH_k3*Process__CELL_CYTOPLASM_E_6PGODH_k5*Process__CELL_CYTOPLASM_E_6PGODH_k7*Process__CELL_CYTOPLASM_E_6PGODH_k9*Process__CELL_CYTOPLASM_E_6PGODH_k11*Variable__CELL_CYTOPLASM_GO6P + Process__CELL_CYTOPLASM_E_6PGODH_k2*Process__CELL_CYTOPLASM_E_6PGODH_k4*Process__CELL_CYTOPLASM_E_6PGODH_k6*Process__CELL_CYTOPLASM_E_6PGODH_k8*Process__CELL_CYTOPLASM_E_6PGODH_k11*Variable__CELL_CYTOPLASM_CO2 + Process__CELL_CYTOPLASM_E_6PGODH_k2*Process__CELL_CYTOPLASM_E_6PGODH_k9*Process__CELL_CYTOPLASM_E_6PGODH_k12*(Process__CELL_CYTOPLASM_E_6PGODH_k4*Process__CELL_CYTOPLASM_E_6PGODH_k6 + Process__CELL_CYTOPLASM_E_6PGODH_k4*Process__CELL_CYTOPLASM_E_6PGODH_k7 + Process__CELL_CYTOPLASM_E_6PGODH_k5*Process__CELL_CYTOPLASM_E_6PGODH_k7)*Variable__CELL_CYTOPLASM_NADPH + Process__CELL_CYTOPLASM_E_6PGODH_k1*Process__CELL_CYTOPLASM_E_6PGODH_k3*(Process__CELL_CYTOPLASM_E_6PGODH_k5*Process__CELL_CYTOPLASM_E_6PGODH_k9*Process__CELL_CYTOPLASM_E_6PGODH_k11 + Process__CELL_CYTOPLASM_E_6PGODH_k6*Process__CELL_CYTOPLASM_E_6PGODH_k9*Process__CELL_CYTOPLASM_E_6PGODH_k11 + Process__CELL_CYTOPLASM_E_6PGODH_k7*Process__CELL_CYTOPLASM_E_6PGODH_k9*Process__CELL_CYTOPLASM_E_6PGODH_k11 + Process__CELL_CYTOPLASM_E_6PGODH_k5*Process__CELL_CYTOPLASM_E_6PGODH_k7*Process__CELL_CYTOPLASM_E_6PGODH_k9 + Process__CELL_CYTOPLASM_E_6PGODH_k5*Process__CELL_CYTOPLASM_E_6PGODH_k7*Process__CELL_CYTOPLASM_E_6PGODH_k11)*Variable__CELL_CYTOPLASM_NADP*Variable__CELL_CYTOPLASM_GO6P + Process__CELL_CYTOPLASM_E_6PGODH_k1*Process__CELL_CYTOPLASM_E_6PGODH_k4*Process__CELL_CYTOPLASM_E_6PGODH_k6*Process__CELL_CYTOPLASM_E_6PGODH_k8*Process__CELL_CYTOPLASM_E_6PGODH_k11*Variable__CELL_CYTOPLASM_NADP*Variable__CELL_CYTOPLASM_CO2 + Process__CELL_CYTOPLASM_E_6PGODH_k3*Process__CELL_CYTOPLASM_E_6PGODH_k5*Process__CELL_CYTOPLASM_E_6PGODH_k7*Process__CELL_CYTOPLASM_E_6PGODH_k9*Process__CELL_CYTOPLASM_E_6PGODH_k12*Variable__CELL_CYTOPLASM_GO6P*Variable__CELL_CYTOPLASM_NADPH + Process__CELL_CYTOPLASM_E_6PGODH_k2*Process__CELL_CYTOPLASM_E_6PGODH_k4*Process__CELL_CYTOPLASM_E_6PGODH_k6*Process__CELL_CYTOPLASM_E_6PGODH_k8*Process__CELL_CYTOPLASM_E_6PGODH_k10*Variable__CELL_CYTOPLASM_CO2*Variable__CELL_CYTOPLASM_RU5P + Process__CELL_CYTOPLASM_E_6PGODH_k2*Process__CELL_CYTOPLASM_E_6PGODH_k4*Process__CELL_CYTOPLASM_E_6PGODH_k6*Process__CELL_CYTOPLASM_E_6PGODH_k8*Process__CELL_CYTOPLASM_E_6PGODH_k12*Variable__CELL_CYTOPLASM_CO2*Variable__CELL_CYTOPLASM_NADPH + Process__CELL_CYTOPLASM_E_6PGODH_k2*Process__CELL_CYTOPLASM_E_6PGODH_k10*Process__CELL_CYTOPLASM_E_6PGODH_k12*(Process__CELL_CYTOPLASM_E_6PGODH_k4*Process__CELL_CYTOPLASM_E_6PGODH_k6 + Process__CELL_CYTOPLASM_E_6PGODH_k4*Process__CELL_CYTOPLASM_E_6PGODH_k7 + Process__CELL_CYTOPLASM_E_6PGODH_k5*Process__CELL_CYTOPLASM_E_6PGODH_k7)*Variable__CELL_CYTOPLASM_RU5P*Variable__CELL_CYTOPLASM_NADPH + Process__CELL_CYTOPLASM_E_6PGODH_k1*Process__CELL_CYTOPLASM_E_6PGODH_k3*Process__CELL_CYTOPLASM_E_6PGODH_k8*Process__CELL_CYTOPLASM_E_6PGODH_k11*(Process__CELL_CYTOPLASM_E_6PGODH_k5 + Process__CELL_CYTOPLASM_E_6PGODH_k6)*Variable__CELL_CYTOPLASM_NADP*Variable__CELL_CYTOPLASM_GO6P*Variable__CELL_CYTOPLASM_CO2 + Process__CELL_CYTOPLASM_E_6PGODH_k1*Process__CELL_CYTOPLASM_E_6PGODH_k3*Process__CELL_CYTOPLASM_E_6PGODH_k5*Process__CELL_CYTOPLASM_E_6PGODH_k7*Process__CELL_CYTOPLASM_E_6PGODH_k10*Variable__CELL_CYTOPLASM_NADP*Variable__CELL_CYTOPLASM_GO6P*Variable__CELL_CYTOPLASM_RU5P + Process__CELL_CYTOPLASM_E_6PGODH_k1*Process__CELL_CYTOPLASM_E_6PGODH_k4*Process__CELL_CYTOPLASM_E_6PGODH_k6*Process__CELL_CYTOPLASM_E_6PGODH_k8*Process__CELL_CYTOPLASM_E_6PGODH_k10*Variable__CELL_CYTOPLASM_NADP*Variable__CELL_CYTOPLASM_CO2*Variable__CELL_CYTOPLASM_RU5P + Process__CELL_CYTOPLASM_E_6PGODH_k3*Process__CELL_CYTOPLASM_E_6PGODH_k5*Process__CELL_CYTOPLASM_E_6PGODH_k7*Process__CELL_CYTOPLASM_E_6PGODH_k10*Process__CELL_CYTOPLASM_E_6PGODH_k12*Variable__CELL_CYTOPLASM_GO6P*Variable__CELL_CYTOPLASM_RU5P*Variable__CELL_CYTOPLASM_NADPH + Process__CELL_CYTOPLASM_E_6PGODH_k8*Process__CELL_CYTOPLASM_E_6PGODH_k10*Process__CELL_CYTOPLASM_E_6PGODH_k12*(Process__CELL_CYTOPLASM_E_6PGODH_k2*Process__CELL_CYTOPLASM_E_6PGODH_k4 + Process__CELL_CYTOPLASM_E_6PGODH_k2*Process__CELL_CYTOPLASM_E_6PGODH_k5 + Process__CELL_CYTOPLASM_E_6PGODH_k2*Process__CELL_CYTOPLASM_E_6PGODH_k6 + Process__CELL_CYTOPLASM_E_6PGODH_k4*Process__CELL_CYTOPLASM_E_6PGODH_k6)*Variable__CELL_CYTOPLASM_CO2*Variable__CELL_CYTOPLASM_RU5P*Variable__CELL_CYTOPLASM_NADPH + Process__CELL_CYTOPLASM_E_6PGODH_k1*Process__CELL_CYTOPLASM_E_6PGODH_k3*Process__CELL_CYTOPLASM_E_6PGODH_k8*Process__CELL_CYTOPLASM_E_6PGODH_k10*(Process__CELL_CYTOPLASM_E_6PGODH_k5 + Process__CELL_CYTOPLASM_E_6PGODH_k6)*Variable__CELL_CYTOPLASM_NADP*Variable__CELL_CYTOPLASM_GO6P*Variable__CELL_CYTOPLASM_CO2*Variable__CELL_CYTOPLASM_RU5P + Process__CELL_CYTOPLASM_E_6PGODH_k3*Process__CELL_CYTOPLASM_E_6PGODH_k8*Process__CELL_CYTOPLASM_E_6PGODH_k10*Process__CELL_CYTOPLASM_E_6PGODH_k12*(Process__CELL_CYTOPLASM_E_6PGODH_k5 + Process__CELL_CYTOPLASM_E_6PGODH_k6)*Variable__CELL_CYTOPLASM_GO6P*Variable__CELL_CYTOPLASM_CO2*Variable__CELL_CYTOPLASM_RU5P*Variable__CELL_CYTOPLASM_NADPH)*(Variable__CELL_CYTOPLASM_AC_Enzyme*1e-13*N_A/1000)/N_A;  // modifiers: Variable__CELL_CYTOPLASM_E_6PGODH, Variable__CELL_CYTOPLASM_AC_Enzyme, Variable__CELL_CYTOPLASM_CO2
    Process__CELL_CYTOPLASM_E_6PGODH_Name = _6_Phosphogluconate; Process__CELL_CYTOPLASM_E_6PGODH_StepperID = DE1; Process__CELL_CYTOPLASM_E_6PGODH_Priority = 0; Process__CELL_CYTOPLASM_E_6PGODH_k1 = 2400000; Process__CELL_CYTOPLASM_E_6PGODH_k10 = 225000; Process__CELL_CYTOPLASM_E_6PGODH_k11 = 300; Process__CELL_CYTOPLASM_E_6PGODH_k12 = 4950000; Process__CELL_CYTOPLASM_E_6PGODH_k2 = 410; Process__CELL_CYTOPLASM_E_6PGODH_k3 = 2000000000; Process__CELL_CYTOPLASM_E_6PGODH_k4 = 26000; Process__CELL_CYTOPLASM_E_6PGODH_k5 = 48; Process__CELL_CYTOPLASM_E_6PGODH_k6 = 30; Process__CELL_CYTOPLASM_E_6PGODH_k7 = 630; Process__CELL_CYTOPLASM_E_6PGODH_k8 = 36000; Process__CELL_CYTOPLASM_E_6PGODH_k9 = 800;
  Process__CELL_CYTOPLASM_E_ADA: Variable__CELL_CYTOPLASM_ADO -> Variable__CELL_CYTOPLASM_INO; 1000*Variable__CELL_CYTOPLASM_ADO*Process__CELL_CYTOPLASM_E_ADA_Vm*1e-13*N_A/(Process__CELL_CYTOPLASM_E_ADA_Km + 1000*Variable__CELL_CYTOPLASM_ADO)*(Variable__CELL_CYTOPLASM_AC_Purine*1e-13*N_A/1000/1000/3600)/N_A;  // modifiers: Variable__CELL_CYTOPLASM_E_ADA, Variable__CELL_CYTOPLASM_AC_Purine
    Process__CELL_CYTOPLASM_E_ADA_Name = Adenosine_deaminase; Process__CELL_CYTOPLASM_E_ADA_StepperID = DE1; Process__CELL_CYTOPLASM_E_ADA_Priority = 0; Process__CELL_CYTOPLASM_E_ADA_Km = 0.052; Process__CELL_CYTOPLASM_E_ADA_Vm = 20;
  Process__CELL_CYTOPLASM_E_ADPRT: Variable__CELL_CYTOPLASM_ADE + Variable__CELL_CYTOPLASM_PRPP -> Variable__CELL_CYTOPLASM_fAMP + 2 Variable__CELL_CYTOPLASM_Pi; Variable__CELL_CYTOPLASM_AC_Purine*1e-13*N_A/1000/1000/3600*(1000*Variable__CELL_CYTOPLASM_ADE/(Process__CELL_CYTOPLASM_E_ADPRT_KmA + 1000*Variable__CELL_CYTOPLASM_ADE))*(1000*Variable__CELL_CYTOPLASM_PRPP/(Process__CELL_CYTOPLASM_E_ADPRT_KmB + 1000*Variable__CELL_CYTOPLASM_PRPP))*Process__CELL_CYTOPLASM_E_ADPRT_Vm*1e-13*N_A*Variable__CELL_CYTOPLASM_E_ADPRT*1e-13*N_A/N_A;  // modifiers: Variable__CELL_CYTOPLASM_E_ADPRT, Variable__CELL_CYTOPLASM_AC_Purine
    Process__CELL_CYTOPLASM_E_ADPRT_Name = Adenine_phosphoribosyl_transferase; Process__CELL_CYTOPLASM_E_ADPRT_StepperID = DE1; Process__CELL_CYTOPLASM_E_ADPRT_Priority = 0; Process__CELL_CYTOPLASM_E_ADPRT_KmA = 0.0023; Process__CELL_CYTOPLASM_E_ADPRT_KmB = 0.0195; Process__CELL_CYTOPLASM_E_ADPRT_Vm = 0.078;
  Process__CELL_CYTOPLASM_E_AK: Variable__CELL_CYTOPLASM_ADO + Variable__CELL_CYTOPLASM_MgATP -> Variable__CELL_CYTOPLASM_MgADP + Variable__CELL_CYTOPLASM_fAMP; Variable__CELL_CYTOPLASM_AC_Enzyme*1e-13*N_A/1000/1000000*(Process__CELL_CYTOPLASM_E_AK_Vm*1000000*Variable__CELL_CYTOPLASM_ADO*1000000*Variable__CELL_CYTOPLASM_MgATP/(Process__CELL_CYTOPLASM_E_AK_KiA*Process__CELL_CYTOPLASM_E_AK_KmB + Process__CELL_CYTOPLASM_E_AK_KmA*1000000*Variable__CELL_CYTOPLASM_MgATP + Process__CELL_CYTOPLASM_E_AK_KmB*1000000*Variable__CELL_CYTOPLASM_ADO + 1000000*Variable__CELL_CYTOPLASM_ADO*1000000*Variable__CELL_CYTOPLASM_MgATP))*1e-13*N_A/N_A;  // modifiers: Variable__CELL_CYTOPLASM_E_AK, Variable__CELL_CYTOPLASM_AC_Enzyme
    Process__CELL_CYTOPLASM_E_AK_Name = Adenosine_kinase; Process__CELL_CYTOPLASM_E_AK_StepperID = DE1; Process__CELL_CYTOPLASM_E_AK_Priority = 0; Process__CELL_CYTOPLASM_E_AK_KiA = 0.54; Process__CELL_CYTOPLASM_E_AK_KmA = 1.75; Process__CELL_CYTOPLASM_E_AK_KmB = 27; Process__CELL_CYTOPLASM_E_AK_Vm = 0.55;
  Process__CELL_CYTOPLASM_E_ALD: Variable__CELL_CYTOPLASM_FDP -> Variable__CELL_CYTOPLASM_GA3P + Variable__CELL_CYTOPLASM_DHAP; Variable__CELL_CYTOPLASM_E_ALD*1e-13*N_A*((Process__CELL_CYTOPLASM_E_ALD_kcatf*(1000000*Variable__CELL_CYTOPLASM_FDP/Process__CELL_CYTOPLASM_E_ALD_KmA) - Process__CELL_CYTOPLASM_E_ALD_kcatr*(1000000*Variable__CELL_CYTOPLASM_GA3P/Process__CELL_CYTOPLASM_E_ALD_KmP)*(1000000*Variable__CELL_CYTOPLASM_DHAP/KiQ))/(1 + 1000000*Variable__CELL_CYTOPLASM_f23DPG/KiI + 1000000*Variable__CELL_CYTOPLASM_FDP/Process__CELL_CYTOPLASM_E_ALD_KmA + Process__CELL_CYTOPLASM_E_ALD_KmQ*(1000000*Variable__CELL_CYTOPLASM_GA3P/Process__CELL_CYTOPLASM_E_ALD_KmP)/KiQ + 1 + 1000000*Variable__CELL_CYTOPLASM_f23DPG/KiI + 1000000*Variable__CELL_CYTOPLASM_DHAP/KiQ + Process__CELL_CYTOPLASM_E_ALD_KmQ*(1000000*Variable__CELL_CYTOPLASM_FDP/Process__CELL_CYTOPLASM_E_ALD_KiA)*(1000000*Variable__CELL_CYTOPLASM_GA3P/Process__CELL_CYTOPLASM_E_ALD_KmP)/KiQ + 1000000*Variable__CELL_CYTOPLASM_GA3P/Process__CELL_CYTOPLASM_E_ALD_KmP*(1000000*Variable__CELL_CYTOPLASM_DHAP/KiQ)))*(Variable__CELL_CYTOPLASM_AC_Enzyme*1e-13*N_A/1000)/N_A;  // modifiers: Variable__CELL_CYTOPLASM_E_ALD, Variable__CELL_CYTOPLASM_AC_Enzyme, Variable__CELL_CYTOPLASM_f23DPG
    Process__CELL_CYTOPLASM_E_ALD_Name = Aldolase; Process__CELL_CYTOPLASM_E_ALD_StepperID = DE1; Process__CELL_CYTOPLASM_E_ALD_Priority = 0; Process__CELL_CYTOPLASM_E_ALD_KiA = 19.8; KiI = 1500; KiQ = 11; Process__CELL_CYTOPLASM_E_ALD_KmA = 16.5; Process__CELL_CYTOPLASM_E_ALD_KmP = 190; Process__CELL_CYTOPLASM_E_ALD_KmQ = 35; Process__CELL_CYTOPLASM_E_ALD_kcatf = 68; Process__CELL_CYTOPLASM_E_ALD_kcatr = 234;
  Process__CELL_CYTOPLASM_E_AMPDA: Variable__CELL_CYTOPLASM_fAMP -> Variable__CELL_CYTOPLASM_IMP; 1000*Variable__CELL_CYTOPLASM_fAMP*Process__CELL_CYTOPLASM_E_AMPDA_Vm*1e-13*N_A/(Process__CELL_CYTOPLASM_E_AMPDA_Km + 1000*Variable__CELL_CYTOPLASM_fAMP)*(Variable__CELL_CYTOPLASM_AC_Purine*1e-13*N_A/1000/1000/3600)/N_A;  // modifiers: Variable__CELL_CYTOPLASM_E_AMPDA, Variable__CELL_CYTOPLASM_AC_Purine
    Process__CELL_CYTOPLASM_E_AMPDA_Name = AMP_deaminase; Process__CELL_CYTOPLASM_E_AMPDA_StepperID = DE1; Process__CELL_CYTOPLASM_E_AMPDA_Priority = 0; Process__CELL_CYTOPLASM_E_AMPDA_Km = 0.8; Process__CELL_CYTOPLASM_E_AMPDA_Vm = 0.01;
  Process__CELL_CYTOPLASM_E_AMPase: Variable__CELL_CYTOPLASM_fAMP -> Variable__CELL_CYTOPLASM_ADO + Variable__CELL_CYTOPLASM_Pi; Process__CELL_CYTOPLASM_E_AMPase_k*Variable__CELL_CYTOPLASM_fAMP*(Variable__CELL_CYTOPLASM_AC_Purine*1e-13*N_A/1000/3600)*1e-13*N_A/N_A;  // modifiers: Variable__CELL_CYTOPLASM_E_AMPase, Variable__CELL_CYTOPLASM_AC_Purine
    Process__CELL_CYTOPLASM_E_AMPase_Name = AMP_phosphohydrolase; Process__CELL_CYTOPLASM_E_AMPase_StepperID = DE1; Process__CELL_CYTOPLASM_E_AMPase_Priority = 0; Process__CELL_CYTOPLASM_E_AMPase_k = 1.58;
  Process__CELL_CYTOPLASM_E_APK: Variable__CELL_CYTOPLASM_fADP + Variable__CELL_CYTOPLASM_MgADP -> Variable__CELL_CYTOPLASM_fAMP + Variable__CELL_CYTOPLASM_MgATP; Variable__CELL_CYTOPLASM_AC_Purine*1e-13*N_A/1000*Variable__CELL_CYTOPLASM_E_APK*1e-13*N_A*((Process__CELL_CYTOPLASM_E_APK_kcatf*(1000*Variable__CELL_CYTOPLASM_fADP/Process__CELL_CYTOPLASM_E_APK_KmA)*(1000*Variable__CELL_CYTOPLASM_MgADP/Process__CELL_CYTOPLASM_E_APK_KmB) - Process__CELL_CYTOPLASM_E_APK_kcatr*(1000*Variable__CELL_CYTOPLASM_fAMP/Process__CELL_CYTOPLASM_E_APK_KmP)*(1000*Variable__CELL_CYTOPLASM_MgATP/Process__CELL_CYTOPLASM_E_APK_KmQ))/(1 + 1000*Variable__CELL_CYTOPLASM_fADP/Process__CELL_CYTOPLASM_E_APK_KmA + 1000*Variable__CELL_CYTOPLASM_MgADP/Process__CELL_CYTOPLASM_E_APK_KmB + 1000*Variable__CELL_CYTOPLASM_fADP/Process__CELL_CYTOPLASM_E_APK_KmA*(1000*Variable__CELL_CYTOPLASM_MgADP/Process__CELL_CYTOPLASM_E_APK_KmB) + 1000*Variable__CELL_CYTOPLASM_fAMP/Process__CELL_CYTOPLASM_E_APK_KmP + 1000*Variable__CELL_CYTOPLASM_MgATP/Process__CELL_CYTOPLASM_E_APK_KmQ + 1000*Variable__CELL_CYTOPLASM_fAMP/Process__CELL_CYTOPLASM_E_APK_KmP*(1000*Variable__CELL_CYTOPLASM_MgATP/Process__CELL_CYTOPLASM_E_APK_KmQ)))/N_A;  // modifiers: Variable__CELL_CYTOPLASM_E_APK, Variable__CELL_CYTOPLASM_AC_Purine, Variable__CELL_CYTOPLASM_Mg
    Process__CELL_CYTOPLASM_E_APK_Name = Adenylate_kinase; Process__CELL_CYTOPLASM_E_APK_StepperID = DE1; Process__CELL_CYTOPLASM_E_APK_Priority = 0; Process__CELL_CYTOPLASM_E_APK_KmA = 0.01; Process__CELL_CYTOPLASM_E_APK_KmB = 0.1; Process__CELL_CYTOPLASM_E_APK_KmP = 0.11; Process__CELL_CYTOPLASM_E_APK_KmQ = 0.067; Process__CELL_CYTOPLASM_E_APK_kcatf = 2080; Process__CELL_CYTOPLASM_E_APK_kcatr = 3800;
  Process__CELL_CYTOPLASM_E_ATPase: Variable__CELL_CYTOPLASM_MgATP -> Variable__CELL_CYTOPLASM_MgADP + Variable__CELL_CYTOPLASM_Pi; Variable__CELL_CYTOPLASM_MgATP*Process__CELL_CYTOPLASM_E_ATPase_k*1e-13*N_A*Variable__CELL_CYTOPLASM_AC_Enzyme*1e-13*N_A*2/1000/3600/N_A;  // modifiers: Variable__CELL_CYTOPLASM_E_ATPase, Variable__CELL_CYTOPLASM_AC_Enzyme
    Process__CELL_CYTOPLASM_E_ATPase_Name = ATP_phosphohydrolase; Process__CELL_CYTOPLASM_E_ATPase_StepperID = DE1; Process__CELL_CYTOPLASM_E_ATPase_Priority = 0; Process__CELL_CYTOPLASM_E_ATPase_k = 0.356;
  Process__CELL_CYTOPLASM_E_EN: Variable__CELL_CYTOPLASM__2PG -> Variable__CELL_CYTOPLASM_PEP; Variable__CELL_CYTOPLASM_E_EN*1e-13*N_A*((Process__CELL_CYTOPLASM_E_EN_kcatf*(1000000*Variable__CELL_CYTOPLASM__2PG/KmPG)*(1000000*Variable__CELL_CYTOPLASM_Mg/KiMg) - Process__CELL_CYTOPLASM_E_EN_kcatr*(1000000*Variable__CELL_CYTOPLASM_Mg/KmMg)*(1000000*Variable__CELL_CYTOPLASM_PEP/KiPEP))/(1 + 1000000*Variable__CELL_CYTOPLASM__2PG/KiPG + 1000000*Variable__CELL_CYTOPLASM_Mg/KiMg + 1000000*Variable__CELL_CYTOPLASM__2PG/KmPG*(1000000*Variable__CELL_CYTOPLASM_Mg/KiMg) + 1000000*Variable__CELL_CYTOPLASM_PEP/KiPEP + 1000000*Variable__CELL_CYTOPLASM_Mg/KmMg*(1000000*Variable__CELL_CYTOPLASM_PEP/KiPEP)))*(Variable__CELL_CYTOPLASM_AC_Enzyme*1e-13*N_A/1000)/N_A;  // modifiers: Variable__CELL_CYTOPLASM_E_EN, Variable__CELL_CYTOPLASM_AC_Enzyme, Variable__CELL_CYTOPLASM_Mg
    Process__CELL_CYTOPLASM_E_EN_Name = Enolase; Process__CELL_CYTOPLASM_E_EN_StepperID = DE1; Process__CELL_CYTOPLASM_E_EN_Priority = 0; KiMg = 460; KiPEP = 310; KiPG = 140; KmMg = 46; KmPEP = 310; KmPG = 140; Process__CELL_CYTOPLASM_E_EN_kcatf = 190; Process__CELL_CYTOPLASM_E_EN_kcatr = 50;
  Process__CELL_CYTOPLASM_E_G6PDH: Variable__CELL_CYTOPLASM_NADP + Variable__CELL_CYTOPLASM_G6P -> Variable__CELL_CYTOPLASM_GL6P + Variable__CELL_CYTOPLASM_NADPH; Process__CELL_CYTOPLASM_E_G6PDH_Vm*(1000000*Variable__CELL_CYTOPLASM_NADP*1000000*Variable__CELL_CYTOPLASM_G6P/(K_NADP*K_G6P))/(1 + 1000000*Variable__CELL_CYTOPLASM_NADP*(1 + 1000000*Variable__CELL_CYTOPLASM_G6P/K_G6P)/K_NADP + 1000000*Variable__CELL_CYTOPLASM_NADPH/K_NADPH + 1000000*Variable__CELL_CYTOPLASM_MgATP/K_ATP + 1000000*Variable__CELL_CYTOPLASM_f23DPG/K_DPG)*(Variable__CELL_CYTOPLASM_AC_Enzyme*1e-13*N_A/1000/1000000)*1e-13*N_A/N_A;  // modifiers: Variable__CELL_CYTOPLASM_E_G6PDH, Variable__CELL_CYTOPLASM_AC_Enzyme, Variable__CELL_CYTOPLASM_MgATP, Variable__CELL_CYTOPLASM_f23DPG, Variable__CELL_CYTOPLASM_GSH, Variable__CELL_CYTOPLASM_GSSG
    Process__CELL_CYTOPLASM_E_G6PDH_Name = Glucose_6_phosphate_dehydrogenase; Process__CELL_CYTOPLASM_E_G6PDH_StepperID = DE1; Process__CELL_CYTOPLASM_E_G6PDH_Priority = 0; K_ATP = 749; K_DPG = 2289; K_G6P = 66.7; Process__CELL_CYTOPLASM_E_G6PDH_K_GSSG = 0; K_NADP = 3.67; K_NADPH = 3.12; Process__CELL_CYTOPLASM_E_G6PDH_Vm = 64;
  Process__CELL_CYTOPLASM_E_GAPDH: Variable__CELL_CYTOPLASM_GA3P + Variable__CELL_CYTOPLASM_Pi + Variable__CELL_CYTOPLASM_NAD -> Variable__CELL_CYTOPLASM__13DPG + Variable__CELL_CYTOPLASM_NADH; Variable__CELL_CYTOPLASM_E_GAPDH/(Variable__CELL_CYTOPLASM_GA3P/(KiGraP*2.997/(1 + 10^(-1*Variable__CELL_CYTOPLASM_pHi*1e-13*N_A)/10^(-7.5) + 10^(-10)/10^(-1*Variable__CELL_CYTOPLASM_pHi*1e-13*N_A)))*(1 + Variable__CELL_CYTOPLASM_GA3P/KidGraP) + Variable__CELL_CYTOPLASM__13DPG/(Process__CELL_CYTOPLASM_E_GAPDH_KiB13PG*2.997/(1 + 10^(-1*Variable__CELL_CYTOPLASM_pHi*1e-13*N_A)/10^(-7.5) + 10^(-10)/10^(-1*Variable__CELL_CYTOPLASM_pHi*1e-13*N_A)))*(1 + Variable__CELL_CYTOPLASM_GA3P/KidGraP) + Process__CELL_CYTOPLASM_E_GAPDH_KmB13PG*Variable__CELL_CYTOPLASM_NADH/(Process__CELL_CYTOPLASM_E_GAPDH_KiB13PG*2.997/(1 + 10^(-1*Variable__CELL_CYTOPLASM_pHi*1e-13*N_A)/10^(-7.5) + 10^(-10)/10^(-1*Variable__CELL_CYTOPLASM_pHi*1e-13*N_A))*Process__CELL_CYTOPLASM_E_GAPDH_KmNADH*(10^(-7.2)/10^(-1*Variable__CELL_CYTOPLASM_pHi*1e-13*N_A))) + KmGraP*Variable__CELL_CYTOPLASM_NAD*Variable__CELL_CYTOPLASM_Pi/(KiGraP*2.997/(1 + 10^(-1*Variable__CELL_CYTOPLASM_pHi*1e-13*N_A)/10^(-7.5) + 10^(-10)/10^(-1*Variable__CELL_CYTOPLASM_pHi*1e-13*N_A))*Process__CELL_CYTOPLASM_E_GAPDH_KmNAD*KiPhos) + Variable__CELL_CYTOPLASM_NAD*Variable__CELL_CYTOPLASM_GA3P/(Process__CELL_CYTOPLASM_E_GAPDH_KiNAD*(KiGraP*2.997/(1 + 10^(-1*Variable__CELL_CYTOPLASM_pHi*1e-13*N_A)/10^(-7.5) + 10^(-10)/10^(-1*Variable__CELL_CYTOPLASM_pHi*1e-13*N_A)))) + Variable__CELL_CYTOPLASM_Pi*Variable__CELL_CYTOPLASM_GA3P/(KiPhos*(KiGraP*2.997/(1 + 10^(-1*Variable__CELL_CYTOPLASM_pHi*1e-13*N_A)/10^(-7.5) + 10^(-10)/10^(-1*Variable__CELL_CYTOPLASM_pHi*1e-13*N_A))))*(1 + Variable__CELL_CYTOPLASM_GA3P/KidGraP) + Variable__CELL_CYTOPLASM_NAD*Variable__CELL_CYTOPLASM__13DPG/(Process__CELL_CYTOPLASM_E_GAPDH_KiNAD*(Process__CELL_CYTOPLASM_E_GAPDH_KiB13PG*2.997/(1 + 10^(-1*Variable__CELL_CYTOPLASM_pHi*1e-13*N_A)/10^(-7.5) + 10^(-10)/10^(-1*Variable__CELL_CYTOPLASM_pHi*1e-13*N_A)))) + Process__CELL_CYTOPLASM_E_GAPDH_KmB13PG*Variable__CELL_CYTOPLASM_Pi*Variable__CELL_CYTOPLASM_NADH/(KiPhos*(Process__CELL_CYTOPLASM_E_GAPDH_KiB13PG*2.997/(1 + 10^(-1*Variable__CELL_CYTOPLASM_pHi*1e-13*N_A)/10^(-7.5) + 10^(-10)/10^(-1*Variable__CELL_CYTOPLASM_pHi*1e-13*N_A)))*Process__CELL_CYTOPLASM_E_GAPDH_KmNADH*(10^(-7.2)/10^(-1*Variable__CELL_CYTOPLASM_pHi*1e-13*N_A))) + Variable__CELL_CYTOPLASM_GA3P*Variable__CELL_CYTOPLASM_NADH/(KiGraP*2.997/(1 + 10^(-1*Variable__CELL_CYTOPLASM_pHi*1e-13*N_A)/10^(-7.5) + 10^(-10)/10^(-1*Variable__CELL_CYTOPLASM_pHi*1e-13*N_A))*Process__CELL_CYTOPLASM_E_GAPDH_KiNADH*(10^(-7.2)/10^(-1*Variable__CELL_CYTOPLASM_pHi*1e-13*N_A))) + Variable__CELL_CYTOPLASM__13DPG*Variable__CELL_CYTOPLASM_NADH/(Process__CELL_CYTOPLASM_E_GAPDH_KiB13PG*2.997/(1 + 10^(-1*Variable__CELL_CYTOPLASM_pHi*1e-13*N_A)/10^(-7.5) + 10^(-10)/10^(-1*Variable__CELL_CYTOPLASM_pHi*1e-13*N_A))*Process__CELL_CYTOPLASM_E_GAPDH_KmNADH*(10^(-7.2)/10^(-1*Variable__CELL_CYTOPLASM_pHi*1e-13*N_A))) + Variable__CELL_CYTOPLASM_NAD*Variable__CELL_CYTOPLASM_Pi*Variable__CELL_CYTOPLASM_GA3P/(Process__CELL_CYTOPLASM_E_GAPDH_KmNAD*KiPhos*(KiGraP*2.997/(1 + 10^(-1*Variable__CELL_CYTOPLASM_pHi*1e-13*N_A)/10^(-7.5) + 10^(-10)/10^(-1*Variable__CELL_CYTOPLASM_pHi*1e-13*N_A)))) + KmGraP*Variable__CELL_CYTOPLASM_NAD*Variable__CELL_CYTOPLASM_Pi*Variable__CELL_CYTOPLASM__13DPG/(KiGraP*2.997/(1 + 10^(-1*Variable__CELL_CYTOPLASM_pHi*1e-13*N_A)/10^(-7.5) + 10^(-10)/10^(-1*Variable__CELL_CYTOPLASM_pHi*1e-13*N_A))*Process__CELL_CYTOPLASM_E_GAPDH_KmNAD*KiPhos*KidB13PG) + Variable__CELL_CYTOPLASM_Pi*Variable__CELL_CYTOPLASM_GA3P*Variable__CELL_CYTOPLASM_NADH/(KiPhos*(KiGraP*2.997/(1 + 10^(-1*Variable__CELL_CYTOPLASM_pHi*1e-13*N_A)/10^(-7.5) + 10^(-10)/10^(-1*Variable__CELL_CYTOPLASM_pHi*1e-13*N_A)))*Process__CELL_CYTOPLASM_E_GAPDH_KiNADH*(10^(-7.2)/10^(-1*Variable__CELL_CYTOPLASM_pHi*1e-13*N_A))) + Process__CELL_CYTOPLASM_E_GAPDH_KmB13PG*Variable__CELL_CYTOPLASM_Pi*Variable__CELL_CYTOPLASM__13DPG*Variable__CELL_CYTOPLASM_NADH/(Process__CELL_CYTOPLASM_E_GAPDH_KiB13PG*2.997/(1 + 10^(-1*Variable__CELL_CYTOPLASM_pHi*1e-13*N_A)/10^(-7.5) + 10^(-10)/10^(-1*Variable__CELL_CYTOPLASM_pHi*1e-13*N_A))*Process__CELL_CYTOPLASM_E_GAPDH_KmNADH*(10^(-7.2)/10^(-1*Variable__CELL_CYTOPLASM_pHi*1e-13*N_A))*KiPhos*KidB13PG))*(Process__CELL_CYTOPLASM_E_GAPDH_kcatf*2.997/(1 + 10^(-1*Variable__CELL_CYTOPLASM_pHi*1e-13*N_A)/10^(-7.5) + 10^(-10)/10^(-1*Variable__CELL_CYTOPLASM_pHi*1e-13*N_A))*Variable__CELL_CYTOPLASM_GA3P*Variable__CELL_CYTOPLASM_Pi*Variable__CELL_CYTOPLASM_NAD/(Process__CELL_CYTOPLASM_E_GAPDH_KmNAD*KiPhos*(KiGraP*2.997/(1 + 10^(-1*Variable__CELL_CYTOPLASM_pHi*1e-13*N_A)/10^(-7.5) + 10^(-10)/10^(-1*Variable__CELL_CYTOPLASM_pHi*1e-13*N_A)))) - Process__CELL_CYTOPLASM_E_GAPDH_kcatr*2.997/(1 + 10^(-1*Variable__CELL_CYTOPLASM_pHi*1e-13*N_A)/10^(-7.5) + 10^(-10)/10^(-1*Variable__CELL_CYTOPLASM_pHi*1e-13*N_A))*Variable__CELL_CYTOPLASM__13DPG*Variable__CELL_CYTOPLASM_NADH/(Process__CELL_CYTOPLASM_E_GAPDH_KiB13PG*2.997/(1 + 10^(-1*Variable__CELL_CYTOPLASM_pHi*1e-13*N_A)/10^(-7.5) + 10^(-10)/10^(-1*Variable__CELL_CYTOPLASM_pHi*1e-13*N_A))*Process__CELL_CYTOPLASM_E_GAPDH_KmNADH*(10^(-7.2)/10^(-1*Variable__CELL_CYTOPLASM_pHi*1e-13*N_A))))*(1e-13*N_A*Variable__CELL_CYTOPLASM_AC_Enzyme*1e-13*N_A/1000)/N_A;  // modifiers: Variable__CELL_CYTOPLASM_pHi, Variable__CELL_CYTOPLASM_E_GAPDH, Variable__CELL_CYTOPLASM_AC_Enzyme
    Process__CELL_CYTOPLASM_E_GAPDH_Name = Glyceraldehyde_phosphate_dehydrogenase; Process__CELL_CYTOPLASM_E_GAPDH_StepperID = DE1; Process__CELL_CYTOPLASM_E_GAPDH_Priority = 0; Process__CELL_CYTOPLASM_E_GAPDH_KiB13PG = 0.01; KiGraP = 0.065; Process__CELL_CYTOPLASM_E_GAPDH_KiNAD = 4.5e-5; Process__CELL_CYTOPLASM_E_GAPDH_KiNADH = 1e-5; KiPhos = 0.00316; KidB13PG = 1e-6; KidGraP = 3.1e-5; Process__CELL_CYTOPLASM_E_GAPDH_KmB13PG = 6.71e-7; KmGraP = 9.5e-5; Process__CELL_CYTOPLASM_E_GAPDH_KmNAD = 4.5e-5; Process__CELL_CYTOPLASM_E_GAPDH_KmNADH = 3.3e-6; KmPhos = 0.00316; Process__CELL_CYTOPLASM_E_GAPDH_kcatf = 232; Process__CELL_CYTOPLASM_E_GAPDH_kcatr = 2765;
  Process__CELL_CYTOPLASM_E_GLC: -> Variable__CELL_CYTOPLASM_GLC; Variable__CELL_CYTOPLASM_GSH/Variable__CELL_CYTOPLASM_GSSG/(Process__CELL_CYTOPLASM_E_GLC_K_GSSG + Variable__CELL_CYTOPLASM_GSH/Variable__CELL_CYTOPLASM_GSSG)*(Process__CELL_CYTOPLASM_E_GLC_HK/(1 + Variable__CELL_CYTOPLASM_MgATP/Process__CELL_CYTOPLASM_E_GLC_KiMgATP + Variable__CELL_CYTOPLASM_GLC/Process__CELL_CYTOPLASM_E_GLC_KiGlc + Variable__CELL_CYTOPLASM_MgATP*Variable__CELL_CYTOPLASM_GLC/(Process__CELL_CYTOPLASM_E_GLC_KiGlc*Process__CELL_CYTOPLASM_E_GLC_KmMgATP) + Variable__CELL_CYTOPLASM_MgADP/Process__CELL_CYTOPLASM_E_GLC_KiMgADP + Variable__CELL_CYTOPLASM_G6P/Process__CELL_CYTOPLASM_E_GLC_KiGlc6P + Variable__CELL_CYTOPLASM_MgADP*Variable__CELL_CYTOPLASM_G6P/(Process__CELL_CYTOPLASM_E_GLC_KiGlc6P*Process__CELL_CYTOPLASM_E_GLC_KmMgADP) + Variable__CELL_CYTOPLASM_f23DPG*Variable__CELL_CYTOPLASM_GLC/(Process__CELL_CYTOPLASM_E_GLC_KdiB23PG*Process__CELL_CYTOPLASM_E_GLC_KiGlc) + Variable__CELL_CYTOPLASM_GDP*Variable__CELL_CYTOPLASM_GLC/(Process__CELL_CYTOPLASM_E_GLC_KdiGlc16P2*Process__CELL_CYTOPLASM_E_GLC_KiGlc) + Variable__CELL_CYTOPLASM_G6P*Variable__CELL_CYTOPLASM_GLC/(Process__CELL_CYTOPLASM_E_GLC_KdiGlc6P*Process__CELL_CYTOPLASM_E_GLC_KiGlc) + Variable__CELL_CYTOPLASM_GSH*Variable__CELL_CYTOPLASM_GLC/(Process__CELL_CYTOPLASM_E_GLC_KdiGSH*Process__CELL_CYTOPLASM_E_GLC_KiGlc)))*(Process__CELL_CYTOPLASM_E_GLC_kcatf*1.662/(1 + 10^(-1*Variable__CELL_CYTOPLASM_pHi*1e-13*N_A)/10^(-7.02) + 10^(-9.55)/10^(-1*Variable__CELL_CYTOPLASM_pHi*1e-13*N_A))*Variable__CELL_CYTOPLASM_GLC*Variable__CELL_CYTOPLASM_MgATP/(Process__CELL_CYTOPLASM_E_GLC_KiGlc*Process__CELL_CYTOPLASM_E_GLC_KmMgATP) - Process__CELL_CYTOPLASM_E_GLC_kcatr*1.662/(1 + 10^(-1*Variable__CELL_CYTOPLASM_pHi*1e-13*N_A)/10^(-7.02) + 10^(-9.55)/10^(-1*Variable__CELL_CYTOPLASM_pHi*1e-13*N_A))*Variable__CELL_CYTOPLASM_G6P*Variable__CELL_CYTOPLASM_MgADP/(Process__CELL_CYTOPLASM_E_GLC_KiGlc6P*Process__CELL_CYTOPLASM_E_GLC_KmMgADP))*1e-13*N_A*Variable__CELL_CYTOPLASM_AC_Enzyme*1e-13*N_A/1000*Process__CELL_CYTOPLASM_E_GLC_SW/N_A;  // modifiers: Variable__CELL_CYTOPLASM_MgATP, Variable__CELL_CYTOPLASM_pHi, Variable__CELL_CYTOPLASM_f23DPG, Variable__CELL_CYTOPLASM_GDP, Variable__CELL_CYTOPLASM_GSH, Variable__CELL_CYTOPLASM_GSSG, Variable__CELL_CYTOPLASM_AC_Enzyme, Variable__CELL_CYTOPLASM_G6P, Variable__CELL_CYTOPLASM_MgADP
    Process__CELL_CYTOPLASM_E_GLC_Name = Glucose_supply; Process__CELL_CYTOPLASM_E_GLC_StepperID = DE1; Process__CELL_CYTOPLASM_E_GLC_Priority = 0; Process__CELL_CYTOPLASM_E_GLC_HK = 2.5e-8; Process__CELL_CYTOPLASM_E_GLC_K_GSSG = 0; Process__CELL_CYTOPLASM_E_GLC_KdiB23PG = 0.0027; Process__CELL_CYTOPLASM_E_GLC_KdiGSH = 0.003; Process__CELL_CYTOPLASM_E_GLC_KdiGlc16P2 = 1e-5; Process__CELL_CYTOPLASM_E_GLC_KdiGlc6P = 1e-5; Process__CELL_CYTOPLASM_E_GLC_KiGlc = 4.7e-5; Process__CELL_CYTOPLASM_E_GLC_KiGlc6P = 4.7e-5; Process__CELL_CYTOPLASM_E_GLC_KiMgADP = 0.001; Process__CELL_CYTOPLASM_E_GLC_KiMgATP = 0.001; Process__CELL_CYTOPLASM_E_GLC_KmMgADP = 0.001; Process__CELL_CYTOPLASM_E_GLC_KmMgATP = 0.001; Process__CELL_CYTOPLASM_E_GLC_SW = 0; Process__CELL_CYTOPLASM_E_GLC_kcatf = 180; Process__CELL_CYTOPLASM_E_GLC_kcatr = 1.16;
  Process__CELL_CYTOPLASM_E_GSH_S: Variable__CELL_CYTOPLASM_L_GC + Variable__CELL_CYTOPLASM_MgATP -> Variable__CELL_CYTOPLASM_GSH + Variable__CELL_CYTOPLASM_MgADP + Variable__CELL_CYTOPLASM_Pi; 1*Process__CELL_CYTOPLASM_E_GSH_S_Vmf*1e-13*N_A*(1000*Variable__CELL_CYTOPLASM_L_GC*1000*Variable__CELL_CYTOPLASM_glycine*1000*Variable__CELL_CYTOPLASM_MgATP/(Process__CELL_CYTOPLASM_E_GSH_S_alpha*Process__CELL_CYTOPLASM_E_GSH_S_KmA*Process__CELL_CYTOPLASM_E_GSH_S_KmB*Process__CELL_CYTOPLASM_E_GSH_S_KmC))/(1 + 1000*Variable__CELL_CYTOPLASM_L_GC/Process__CELL_CYTOPLASM_E_GSH_S_KmA + 1000*Variable__CELL_CYTOPLASM_L_GC*1000*Variable__CELL_CYTOPLASM_glycine/(Process__CELL_CYTOPLASM_E_GSH_S_KmA*Process__CELL_CYTOPLASM_E_GSH_S_KmB) + 1000*Variable__CELL_CYTOPLASM_L_GC*1000*Variable__CELL_CYTOPLASM_MgATP/(Process__CELL_CYTOPLASM_E_GSH_S_KmA*Process__CELL_CYTOPLASM_E_GSH_S_KmC) + 1000*Variable__CELL_CYTOPLASM_L_GC*1000*Variable__CELL_CYTOPLASM_glycine*1000*Variable__CELL_CYTOPLASM_MgATP/(Process__CELL_CYTOPLASM_E_GSH_S_alpha*Process__CELL_CYTOPLASM_E_GSH_S_KmA*Process__CELL_CYTOPLASM_E_GSH_S_KmB*Process__CELL_CYTOPLASM_E_GSH_S_KmC))*Variable__CELL_CYTOPLASM_AC_Enzyme*1e-13*N_A/1000/1000/3600/N_A;  // modifiers: Variable__CELL_CYTOPLASM_E_GSH_S, Variable__CELL_CYTOPLASM_AC_Enzyme, Variable__CELL_CYTOPLASM_glycine
    Process__CELL_CYTOPLASM_E_GSH_S_Name = Glutathione_synthetase; Process__CELL_CYTOPLASM_E_GSH_S_StepperID = DE1; Process__CELL_CYTOPLASM_E_GSH_S_Priority = 0; Process__CELL_CYTOPLASM_E_GSH_S_KmA = 0.99; Process__CELL_CYTOPLASM_E_GSH_S_KmB = 1.37; Process__CELL_CYTOPLASM_E_GSH_S_KmC = 0.23; Process__CELL_CYTOPLASM_E_GSH_S_Vmf = 88.4; Process__CELL_CYTOPLASM_E_GSH_S_alpha = 2.6;
  Process__CELL_CYTOPLASM_E_GSSGR: Variable__CELL_CYTOPLASM_NADPH + Variable__CELL_CYTOPLASM_GSSG -> Variable__CELL_CYTOPLASM_NADP + 2 Variable__CELL_CYTOPLASM_GSH; Variable__CELL_CYTOPLASM_E_GSSGR*1e-13*N_A*(Process__CELL_CYTOPLASM_E_GSSGR_k1*Process__CELL_CYTOPLASM_E_GSSGR_k3*Process__CELL_CYTOPLASM_E_GSSGR_k5*Process__CELL_CYTOPLASM_E_GSSGR_k7*Process__CELL_CYTOPLASM_E_GSSGR_k9*Process__CELL_CYTOPLASM_E_GSSGR_k11*Variable__CELL_CYTOPLASM_NADPH*Variable__CELL_CYTOPLASM_GSSG - Process__CELL_CYTOPLASM_E_GSSGR_k2*Process__CELL_CYTOPLASM_E_GSSGR_k4*Process__CELL_CYTOPLASM_E_GSSGR_k6*Process__CELL_CYTOPLASM_E_GSSGR_k8*Process__CELL_CYTOPLASM_E_GSSGR_k10*Process__CELL_CYTOPLASM_E_GSSGR_k12*Variable__CELL_CYTOPLASM_GSH*Variable__CELL_CYTOPLASM_GSH*Variable__CELL_CYTOPLASM_NADP)/(Process__CELL_CYTOPLASM_E_GSSGR_k2*Process__CELL_CYTOPLASM_E_GSSGR_k9*Process__CELL_CYTOPLASM_E_GSSGR_k11*(Process__CELL_CYTOPLASM_E_GSSGR_k4*Process__CELL_CYTOPLASM_E_GSSGR_k6 + Process__CELL_CYTOPLASM_E_GSSGR_k4*Process__CELL_CYTOPLASM_E_GSSGR_k7 + Process__CELL_CYTOPLASM_E_GSSGR_k5*Process__CELL_CYTOPLASM_E_GSSGR_k7) + Process__CELL_CYTOPLASM_E_GSSGR_k1*Process__CELL_CYTOPLASM_E_GSSGR_k9*Process__CELL_CYTOPLASM_E_GSSGR_k11*(Process__CELL_CYTOPLASM_E_GSSGR_k4*Process__CELL_CYTOPLASM_E_GSSGR_k6 + Process__CELL_CYTOPLASM_E_GSSGR_k4*Process__CELL_CYTOPLASM_E_GSSGR_k7 + Process__CELL_CYTOPLASM_E_GSSGR_k5*Process__CELL_CYTOPLASM_E_GSSGR_k7)*Variable__CELL_CYTOPLASM_NADPH + Process__CELL_CYTOPLASM_E_GSSGR_k3*Process__CELL_CYTOPLASM_E_GSSGR_k5*Process__CELL_CYTOPLASM_E_GSSGR_k7*Process__CELL_CYTOPLASM_E_GSSGR_k9*Process__CELL_CYTOPLASM_E_GSSGR_k11*Variable__CELL_CYTOPLASM_GSSG + Process__CELL_CYTOPLASM_E_GSSGR_k2*Process__CELL_CYTOPLASM_E_GSSGR_k4*Process__CELL_CYTOPLASM_E_GSSGR_k6*Process__CELL_CYTOPLASM_E_GSSGR_k8*Process__CELL_CYTOPLASM_E_GSSGR_k11*Variable__CELL_CYTOPLASM_GSH + Process__CELL_CYTOPLASM_E_GSSGR_k2*Process__CELL_CYTOPLASM_E_GSSGR_k9*Process__CELL_CYTOPLASM_E_GSSGR_k12*(Process__CELL_CYTOPLASM_E_GSSGR_k4*Process__CELL_CYTOPLASM_E_GSSGR_k6 + Process__CELL_CYTOPLASM_E_GSSGR_k4*Process__CELL_CYTOPLASM_E_GSSGR_k7 + Process__CELL_CYTOPLASM_E_GSSGR_k5*Process__CELL_CYTOPLASM_E_GSSGR_k7)*Variable__CELL_CYTOPLASM_NADP + Process__CELL_CYTOPLASM_E_GSSGR_k1*Process__CELL_CYTOPLASM_E_GSSGR_k3*(Process__CELL_CYTOPLASM_E_GSSGR_k5*Process__CELL_CYTOPLASM_E_GSSGR_k9*Process__CELL_CYTOPLASM_E_GSSGR_k11 + Process__CELL_CYTOPLASM_E_GSSGR_k6*Process__CELL_CYTOPLASM_E_GSSGR_k9*Process__CELL_CYTOPLASM_E_GSSGR_k11 + Process__CELL_CYTOPLASM_E_GSSGR_k7*Process__CELL_CYTOPLASM_E_GSSGR_k9*Process__CELL_CYTOPLASM_E_GSSGR_k11 + Process__CELL_CYTOPLASM_E_GSSGR_k5*Process__CELL_CYTOPLASM_E_GSSGR_k7*Process__CELL_CYTOPLASM_E_GSSGR_k9 + Process__CELL_CYTOPLASM_E_GSSGR_k5*Process__CELL_CYTOPLASM_E_GSSGR_k7*Process__CELL_CYTOPLASM_E_GSSGR_k11)*Variable__CELL_CYTOPLASM_NADPH*Variable__CELL_CYTOPLASM_GSSG + Process__CELL_CYTOPLASM_E_GSSGR_k1*Process__CELL_CYTOPLASM_E_GSSGR_k4*Process__CELL_CYTOPLASM_E_GSSGR_k6*Process__CELL_CYTOPLASM_E_GSSGR_k8*Process__CELL_CYTOPLASM_E_GSSGR_k11*Variable__CELL_CYTOPLASM_NADPH*Variable__CELL_CYTOPLASM_GSH + Process__CELL_CYTOPLASM_E_GSSGR_k3*Process__CELL_CYTOPLASM_E_GSSGR_k5*Process__CELL_CYTOPLASM_E_GSSGR_k7*Process__CELL_CYTOPLASM_E_GSSGR_k9*Process__CELL_CYTOPLASM_E_GSSGR_k12*Variable__CELL_CYTOPLASM_GSSG*Variable__CELL_CYTOPLASM_NADP + Process__CELL_CYTOPLASM_E_GSSGR_k2*Process__CELL_CYTOPLASM_E_GSSGR_k4*Process__CELL_CYTOPLASM_E_GSSGR_k6*Process__CELL_CYTOPLASM_E_GSSGR_k8*Process__CELL_CYTOPLASM_E_GSSGR_k10*Variable__CELL_CYTOPLASM_GSH*Variable__CELL_CYTOPLASM_GSH + (Process__CELL_CYTOPLASM_E_GSSGR_k2*Process__CELL_CYTOPLASM_E_GSSGR_k4*Process__CELL_CYTOPLASM_E_GSSGR_k6*Process__CELL_CYTOPLASM_E_GSSGR_k8*Process__CELL_CYTOPLASM_E_GSSGR_k12 + Process__CELL_CYTOPLASM_E_GSSGR_k2*Process__CELL_CYTOPLASM_E_GSSGR_k10*Process__CELL_CYTOPLASM_E_GSSGR_k12*(Process__CELL_CYTOPLASM_E_GSSGR_k4*Process__CELL_CYTOPLASM_E_GSSGR_k6 + Process__CELL_CYTOPLASM_E_GSSGR_k4*Process__CELL_CYTOPLASM_E_GSSGR_k7 + Process__CELL_CYTOPLASM_E_GSSGR_k5*Process__CELL_CYTOPLASM_E_GSSGR_k7))*Variable__CELL_CYTOPLASM_GSH*Variable__CELL_CYTOPLASM_NADP + (Process__CELL_CYTOPLASM_E_GSSGR_k1*Process__CELL_CYTOPLASM_E_GSSGR_k3*Process__CELL_CYTOPLASM_E_GSSGR_k8*Process__CELL_CYTOPLASM_E_GSSGR_k11*(Process__CELL_CYTOPLASM_E_GSSGR_k5 + Process__CELL_CYTOPLASM_E_GSSGR_k6) + Process__CELL_CYTOPLASM_E_GSSGR_k1*Process__CELL_CYTOPLASM_E_GSSGR_k3*Process__CELL_CYTOPLASM_E_GSSGR_k5*Process__CELL_CYTOPLASM_E_GSSGR_k7*Process__CELL_CYTOPLASM_E_GSSGR_k10)*Variable__CELL_CYTOPLASM_NADPH*Variable__CELL_CYTOPLASM_GSSG*Variable__CELL_CYTOPLASM_GSH + Process__CELL_CYTOPLASM_E_GSSGR_k1*Process__CELL_CYTOPLASM_E_GSSGR_k4*Process__CELL_CYTOPLASM_E_GSSGR_k6*Process__CELL_CYTOPLASM_E_GSSGR_k8*Process__CELL_CYTOPLASM_E_GSSGR_k10*Variable__CELL_CYTOPLASM_NADPH*Variable__CELL_CYTOPLASM_GSH*Variable__CELL_CYTOPLASM_GSH + Process__CELL_CYTOPLASM_E_GSSGR_k3*Process__CELL_CYTOPLASM_E_GSSGR_k5*Process__CELL_CYTOPLASM_E_GSSGR_k7*Process__CELL_CYTOPLASM_E_GSSGR_k10*Process__CELL_CYTOPLASM_E_GSSGR_k12*Variable__CELL_CYTOPLASM_GSSG*Variable__CELL_CYTOPLASM_GSH*Variable__CELL_CYTOPLASM_NADP + Process__CELL_CYTOPLASM_E_GSSGR_k8*Process__CELL_CYTOPLASM_E_GSSGR_k10*Process__CELL_CYTOPLASM_E_GSSGR_k12*(Process__CELL_CYTOPLASM_E_GSSGR_k2*Process__CELL_CYTOPLASM_E_GSSGR_k4 + Process__CELL_CYTOPLASM_E_GSSGR_k2*Process__CELL_CYTOPLASM_E_GSSGR_k5 + Process__CELL_CYTOPLASM_E_GSSGR_k2*Process__CELL_CYTOPLASM_E_GSSGR_k6 + Process__CELL_CYTOPLASM_E_GSSGR_k4*Process__CELL_CYTOPLASM_E_GSSGR_k6)*Variable__CELL_CYTOPLASM_GSH*Variable__CELL_CYTOPLASM_GSH*Variable__CELL_CYTOPLASM_NADP + Process__CELL_CYTOPLASM_E_GSSGR_k1*Process__CELL_CYTOPLASM_E_GSSGR_k3*Process__CELL_CYTOPLASM_E_GSSGR_k8*Process__CELL_CYTOPLASM_E_GSSGR_k10*(Process__CELL_CYTOPLASM_E_GSSGR_k5 + Process__CELL_CYTOPLASM_E_GSSGR_k6)*Variable__CELL_CYTOPLASM_NADPH*Variable__CELL_CYTOPLASM_GSSG*Variable__CELL_CYTOPLASM_GSH*Variable__CELL_CYTOPLASM_GSH + Process__CELL_CYTOPLASM_E_GSSGR_k3*Process__CELL_CYTOPLASM_E_GSSGR_k8*Process__CELL_CYTOPLASM_E_GSSGR_k10*Process__CELL_CYTOPLASM_E_GSSGR_k12*(Process__CELL_CYTOPLASM_E_GSSGR_k5 + Process__CELL_CYTOPLASM_E_GSSGR_k6)*Variable__CELL_CYTOPLASM_GSSG*Variable__CELL_CYTOPLASM_GSH*Variable__CELL_CYTOPLASM_GSH*Variable__CELL_CYTOPLASM_NADP)*Variable__CELL_CYTOPLASM_AC_Enzyme*1e-13*N_A/1000/N_A;  // modifiers: Variable__CELL_CYTOPLASM_E_GSSGR, Variable__CELL_CYTOPLASM_AC_Enzyme
    Process__CELL_CYTOPLASM_E_GSSGR_Name = Glutathione_reductase; Process__CELL_CYTOPLASM_E_GSSGR_StepperID = DE1; Process__CELL_CYTOPLASM_E_GSSGR_Priority = 0; Process__CELL_CYTOPLASM_E_GSSGR_k1 = 85000000; Process__CELL_CYTOPLASM_E_GSSGR_k10 = 50000000; Process__CELL_CYTOPLASM_E_GSSGR_k11 = 7000; Process__CELL_CYTOPLASM_E_GSSGR_k12 = 100000000; Process__CELL_CYTOPLASM_E_GSSGR_k2 = 510; Process__CELL_CYTOPLASM_E_GSSGR_k3 = 100000000; Process__CELL_CYTOPLASM_E_GSSGR_k4 = 560000; Process__CELL_CYTOPLASM_E_GSSGR_k5 = 810; Process__CELL_CYTOPLASM_E_GSSGR_k6 = 1000; Process__CELL_CYTOPLASM_E_GSSGR_k7 = 1000000; Process__CELL_CYTOPLASM_E_GSSGR_k8 = 50000000; Process__CELL_CYTOPLASM_E_GSSGR_k9 = 1000000;
  Process__CELL_CYTOPLASM_E_GSSG_transport: Variable__CELL_CYTOPLASM_GSSG + Variable__CELL_CYTOPLASM_MgATP -> Variable__CELL_CYTOPLASM_MgADP + Variable__CELL_CYTOPLASM_Pi; Vmax2*(1000*Variable__CELL_CYTOPLASM_GSSG/(1000*Variable__CELL_CYTOPLASM_GSSG + Km2))*(1000*Variable__CELL_CYTOPLASM_MgATP/(1000*Variable__CELL_CYTOPLASM_MgATP + Kmatp))*1e-13*N_A*Variable__CELL_CYTOPLASM_AC_Enzyme*1e-13*N_A/1000/1000000/3600/N_A;  // modifiers: Variable__CELL_CYTOPLASM_E_GSSG_transport, Variable__CELL_CYTOPLASM_AC_Enzyme
    Process__CELL_CYTOPLASM_E_GSSG_transport_Name = GSSG_transport; Process__CELL_CYTOPLASM_E_GSSG_transport_StepperID = DE1; Process__CELL_CYTOPLASM_E_GSSG_transport_Priority = 0; Km1 = 7.1; Km2 = 0.1; Kmatp = 0.63; Vmax1 = 20; Vmax2 = 190;
  Process__CELL_CYTOPLASM_E_HGPRT: Variable__CELL_CYTOPLASM_PRPP + Variable__CELL_CYTOPLASM_HXi -> Variable__CELL_CYTOPLASM_IMP + 2 Variable__CELL_CYTOPLASM_Pi; Variable__CELL_CYTOPLASM_AC_Enzyme*1e-13*N_A/1000/1000/3600*(1000*Variable__CELL_CYTOPLASM_PRPP/(Process__CELL_CYTOPLASM_E_HGPRT_KmA + 1000*Variable__CELL_CYTOPLASM_PRPP))*(1000*Variable__CELL_CYTOPLASM_HXi/(Process__CELL_CYTOPLASM_E_HGPRT_KmB + 1000*Variable__CELL_CYTOPLASM_HXi))*Process__CELL_CYTOPLASM_E_HGPRT_Vm*1e-13*N_A*Variable__CELL_CYTOPLASM_E_HGPRT*1e-13*N_A/N_A;  // modifiers: Variable__CELL_CYTOPLASM_E_HGPRT, Variable__CELL_CYTOPLASM_AC_Enzyme
    Process__CELL_CYTOPLASM_E_HGPRT_Name = Hypoxanthine_guanine_phosphoryl_transferase; Process__CELL_CYTOPLASM_E_HGPRT_StepperID = DE1; Process__CELL_CYTOPLASM_E_HGPRT_Priority = 0; Process__CELL_CYTOPLASM_E_HGPRT_KmA = 0.005; Process__CELL_CYTOPLASM_E_HGPRT_KmB = 0.22; Process__CELL_CYTOPLASM_E_HGPRT_Vm = 0.201;
  Process__CELL_CYTOPLASM_E_HK: Variable__CELL_CYTOPLASM_GLC + Variable__CELL_CYTOPLASM_MgATP -> Variable__CELL_CYTOPLASM_G6P + Variable__CELL_CYTOPLASM_MgADP; Variable__CELL_CYTOPLASM_GSH/Variable__CELL_CYTOPLASM_GSSG/(Process__CELL_CYTOPLASM_E_HK_K_GSSG + Variable__CELL_CYTOPLASM_GSH/Variable__CELL_CYTOPLASM_GSSG)*(Process__CELL_CYTOPLASM_E_HK_HK/(1 + Variable__CELL_CYTOPLASM_MgATP/Process__CELL_CYTOPLASM_E_HK_KiMgATP + Variable__CELL_CYTOPLASM_GLC/Process__CELL_CYTOPLASM_E_HK_KiGlc + Variable__CELL_CYTOPLASM_MgATP*Variable__CELL_CYTOPLASM_GLC/(Process__CELL_CYTOPLASM_E_HK_KiGlc*Process__CELL_CYTOPLASM_E_HK_KmMgATP) + Variable__CELL_CYTOPLASM_MgADP/Process__CELL_CYTOPLASM_E_HK_KiMgADP + Variable__CELL_CYTOPLASM_G6P/Process__CELL_CYTOPLASM_E_HK_KiGlc6P + Variable__CELL_CYTOPLASM_MgADP*Variable__CELL_CYTOPLASM_G6P/(Process__CELL_CYTOPLASM_E_HK_KiGlc6P*Process__CELL_CYTOPLASM_E_HK_KmMgADP) + Variable__CELL_CYTOPLASM_f23DPG*Variable__CELL_CYTOPLASM_GLC/(Process__CELL_CYTOPLASM_E_HK_KdiB23PG*Process__CELL_CYTOPLASM_E_HK_KiGlc) + Variable__CELL_CYTOPLASM_GDP*Variable__CELL_CYTOPLASM_GLC/(Process__CELL_CYTOPLASM_E_HK_KdiGlc16P2*Process__CELL_CYTOPLASM_E_HK_KiGlc) + Variable__CELL_CYTOPLASM_G6P*Variable__CELL_CYTOPLASM_GLC/(Process__CELL_CYTOPLASM_E_HK_KdiGlc6P*Process__CELL_CYTOPLASM_E_HK_KiGlc) + Variable__CELL_CYTOPLASM_GSH*Variable__CELL_CYTOPLASM_GLC/(Process__CELL_CYTOPLASM_E_HK_KdiGSH*Process__CELL_CYTOPLASM_E_HK_KiGlc)))*(Process__CELL_CYTOPLASM_E_HK_kcatf*1.662/(1 + 10^(-1*Variable__CELL_CYTOPLASM_pHi*1e-13*N_A)/10^(-7.02) + 10^(-9.55)/10^(-1*Variable__CELL_CYTOPLASM_pHi*1e-13*N_A))*Variable__CELL_CYTOPLASM_GLC*Variable__CELL_CYTOPLASM_MgATP/(Process__CELL_CYTOPLASM_E_HK_KiGlc*Process__CELL_CYTOPLASM_E_HK_KmMgATP) - Process__CELL_CYTOPLASM_E_HK_kcatr*1.662/(1 + 10^(-1*Variable__CELL_CYTOPLASM_pHi*1e-13*N_A)/10^(-7.02) + 10^(-9.55)/10^(-1*Variable__CELL_CYTOPLASM_pHi*1e-13*N_A))*Variable__CELL_CYTOPLASM_G6P*Variable__CELL_CYTOPLASM_MgADP/(Process__CELL_CYTOPLASM_E_HK_KiGlc6P*Process__CELL_CYTOPLASM_E_HK_KmMgADP))*1e-13*N_A*Variable__CELL_CYTOPLASM_AC_Enzyme*1e-13*N_A/1000/N_A;  // modifiers: Variable__CELL_CYTOPLASM_pHi, Variable__CELL_CYTOPLASM_f23DPG, Variable__CELL_CYTOPLASM_GDP, Variable__CELL_CYTOPLASM_GSH, Variable__CELL_CYTOPLASM_GSSG, Variable__CELL_CYTOPLASM_AC_Enzyme
    Process__CELL_CYTOPLASM_E_HK_Name = Hexokinase; Process__CELL_CYTOPLASM_E_HK_Priority = 0; Process__CELL_CYTOPLASM_E_HK_StepperID = DE1; Process__CELL_CYTOPLASM_E_HK_HK = 2.5e-8; Process__CELL_CYTOPLASM_E_HK_K_GSSG = 0; Process__CELL_CYTOPLASM_E_HK_KdiB23PG = 0.0027; Process__CELL_CYTOPLASM_E_HK_KdiGSH = 0.003; Process__CELL_CYTOPLASM_E_HK_KdiGlc16P2 = 1e-5; Process__CELL_CYTOPLASM_E_HK_KdiGlc6P = 1e-5; Process__CELL_CYTOPLASM_E_HK_KiGlc = 4.7e-5; Process__CELL_CYTOPLASM_E_HK_KiGlc6P = 4.7e-5; Process__CELL_CYTOPLASM_E_HK_KiMgADP = 0.001; Process__CELL_CYTOPLASM_E_HK_KiMgATP = 0.001; Process__CELL_CYTOPLASM_E_HK_KmMgADP = 0.001; Process__CELL_CYTOPLASM_E_HK_KmMgATP = 0.001; Process__CELL_CYTOPLASM_E_HK_kcatf = 180; Process__CELL_CYTOPLASM_E_HK_kcatr = 1.16;
  Process__CELL_CYTOPLASM_E_IMPase: Variable__CELL_CYTOPLASM_IMP -> Variable__CELL_CYTOPLASM_INO + Variable__CELL_CYTOPLASM_Pi; Process__CELL_CYTOPLASM_E_IMPase_k*Variable__CELL_CYTOPLASM_IMP*1e-13*N_A*(Variable__CELL_CYTOPLASM_AC_Purine*1e-13*N_A/1000/3600)/N_A;  // modifiers: Variable__CELL_CYTOPLASM_E_IMPase, Variable__CELL_CYTOPLASM_AC_Purine
    Process__CELL_CYTOPLASM_E_IMPase_Name = Inosine_monophosphatase; Process__CELL_CYTOPLASM_E_IMPase_StepperID = DE1; Process__CELL_CYTOPLASM_E_IMPase_Priority = 0; Process__CELL_CYTOPLASM_E_IMPase_k = 0.09;
  Process__CELL_CYTOPLASM_E_LDH: Variable__CELL_CYTOPLASM_PYRi + Variable__CELL_CYTOPLASM_NADH -> Variable__CELL_CYTOPLASM_LACi + Variable__CELL_CYTOPLASM_NAD; 1*((Kcatf*(1000000*Variable__CELL_CYTOPLASM_NADH/Process__CELL_CYTOPLASM_E_LDH_KiNADH)*(1000000*Variable__CELL_CYTOPLASM_PYRi/KmPYR) - Kcatr*(1000000*Variable__CELL_CYTOPLASM_NAD/Process__CELL_CYTOPLASM_E_LDH_KiNAD)*(1000000*Variable__CELL_CYTOPLASM_LACi/KmLAC))/((1 + 1000000*Variable__CELL_CYTOPLASM_PYRi/KmPYR*(Process__CELL_CYTOPLASM_E_LDH_KmNADH/Process__CELL_CYTOPLASM_E_LDH_KiNADH) + 1000000*Variable__CELL_CYTOPLASM_LACi/KmLAC*(Process__CELL_CYTOPLASM_E_LDH_KmNAD/Process__CELL_CYTOPLASM_E_LDH_KiNAD))*(1 + 1000000*Variable__CELL_CYTOPLASM_PYRi/KibPYR) + 1000000*Variable__CELL_CYTOPLASM_NADH/Process__CELL_CYTOPLASM_E_LDH_KiNADH + 1000000*Variable__CELL_CYTOPLASM_NAD/Process__CELL_CYTOPLASM_E_LDH_KiNAD + 1000000*Variable__CELL_CYTOPLASM_NADH/Process__CELL_CYTOPLASM_E_LDH_KiNADH*(1000000*Variable__CELL_CYTOPLASM_PYRi/KmPYR) + 1000000*Variable__CELL_CYTOPLASM_NADH/Process__CELL_CYTOPLASM_E_LDH_KiNADH*(1000000*Variable__CELL_CYTOPLASM_LACi/KmLAC)*(Process__CELL_CYTOPLASM_E_LDH_KmNAD/Process__CELL_CYTOPLASM_E_LDH_KiNAD) + 1000000*Variable__CELL_CYTOPLASM_NAD/Process__CELL_CYTOPLASM_E_LDH_KiNAD*(1000000*Variable__CELL_CYTOPLASM_LACi/KmLAC)*(Process__CELL_CYTOPLASM_E_LDH_KmNADH/Process__CELL_CYTOPLASM_E_LDH_KiNADH) + 1000000*Variable__CELL_CYTOPLASM_LACi/KmLAC*(1000000*Variable__CELL_CYTOPLASM_NAD/Process__CELL_CYTOPLASM_E_LDH_KiNAD) + 1000000*Variable__CELL_CYTOPLASM_NADH/Process__CELL_CYTOPLASM_E_LDH_KiNADH*(1000000*Variable__CELL_CYTOPLASM_PYRi/KmPYR)*(1000000*Variable__CELL_CYTOPLASM_LACi/KiLAC) + 1000000*Variable__CELL_CYTOPLASM_PYRi/KiaPYR*(1000000*Variable__CELL_CYTOPLASM_LACi/KmLAC)*(1000000*Variable__CELL_CYTOPLASM_NAD/Process__CELL_CYTOPLASM_E_LDH_KiNAD)))*Variable__CELL_CYTOPLASM_E_LDH*1e-13*N_A*(Variable__CELL_CYTOPLASM_AC_Enzyme*1e-13*N_A/1000)/N_A;  // modifiers: Variable__CELL_CYTOPLASM_E_LDH, Variable__CELL_CYTOPLASM_AC_Enzyme, Variable__CELL_CYTOPLASM_pHi
    Process__CELL_CYTOPLASM_E_LDH_Name = Lactate_dehydrogenase; Process__CELL_CYTOPLASM_E_LDH_StepperID = DE1; Process__CELL_CYTOPLASM_E_LDH_Priority = 0; Kcatf = 458; Kcatr = 115; KiLAC = 7330; Process__CELL_CYTOPLASM_E_LDH_KiNAD = 503; Process__CELL_CYTOPLASM_E_LDH_KiNADH = 2.45; KiaPYR = 228; KibPYR = 101; KmLAC = 1070; Process__CELL_CYTOPLASM_E_LDH_KmNAD = 107; Process__CELL_CYTOPLASM_E_LDH_KmNADH = 8.44; KmPYR = 137;
  Process__CELL_CYTOPLASM_E_LDH2: Variable__CELL_CYTOPLASM_PYRi + Variable__CELL_CYTOPLASM_NADPH -> Variable__CELL_CYTOPLASM_LACi + Variable__CELL_CYTOPLASM_NADP; Variable__CELL_CYTOPLASM_AC_Enzyme*1e-13*N_A*(1/(1 + Variable__CELL_CYTOPLASM_PYRi/KmPyr + Variable__CELL_CYTOPLASM_LACi/KmLac))*(kf*Variable__CELL_CYTOPLASM_PYRi*Variable__CELL_CYTOPLASM_NADPH/KmPyr - kr*Variable__CELL_CYTOPLASM_LACi*Variable__CELL_CYTOPLASM_NADP/KmLac)*1e-13*N_A/1000/N_A;  // modifiers: Variable__CELL_CYTOPLASM_AC_Enzyme
    Process__CELL_CYTOPLASM_E_LDH2_Name = Lactate_dehydrogenase2; Process__CELL_CYTOPLASM_E_LDH2_StepperID = DE1; Process__CELL_CYTOPLASM_E_LDH2_Priority = 0; KmLac = 0.000414; KmPyr = 0.000414; kf = 0.00346; kr = 5.43e-7;
  Process__CELL_CYTOPLASM_E_L_GCS: Variable__CELL_CYTOPLASM_MgATP -> Variable__CELL_CYTOPLASM_MgADP + Variable__CELL_CYTOPLASM_L_GC + Variable__CELL_CYTOPLASM_Pi; 1*Process__CELL_CYTOPLASM_E_L_GCS_Vmf*1e-13*N_A*(1000*Variable__CELL_CYTOPLASM_glutamate*1000*Variable__CELL_CYTOPLASM_cysteine*1000*Variable__CELL_CYTOPLASM_MgATP/(Process__CELL_CYTOPLASM_E_L_GCS_alpha*Process__CELL_CYTOPLASM_E_L_GCS_KmA*(1 + 1000*Variable__CELL_CYTOPLASM_GSH/Process__CELL_CYTOPLASM_E_L_GCS_Ki)*Process__CELL_CYTOPLASM_E_L_GCS_KmB*Process__CELL_CYTOPLASM_E_L_GCS_KmC)/(1 + 1000*Variable__CELL_CYTOPLASM_glutamate/Process__CELL_CYTOPLASM_E_L_GCS_KmA + 1000*Variable__CELL_CYTOPLASM_glutamate*1000*Variable__CELL_CYTOPLASM_cysteine/(Process__CELL_CYTOPLASM_E_L_GCS_KmA*Process__CELL_CYTOPLASM_E_L_GCS_KmB) + 1000*Variable__CELL_CYTOPLASM_glutamate*1000*Variable__CELL_CYTOPLASM_MgATP/(Process__CELL_CYTOPLASM_E_L_GCS_KmA*Process__CELL_CYTOPLASM_E_L_GCS_KmC) + 1000*Variable__CELL_CYTOPLASM_glutamate*1000*Variable__CELL_CYTOPLASM_cysteine*1000*Variable__CELL_CYTOPLASM_MgATP/(Process__CELL_CYTOPLASM_E_L_GCS_alpha*Process__CELL_CYTOPLASM_E_L_GCS_KmA*Process__CELL_CYTOPLASM_E_L_GCS_KmB*Process__CELL_CYTOPLASM_E_L_GCS_KmC)))*Variable__CELL_CYTOPLASM_AC_Enzyme*1e-13*N_A/1000/1000/3600/N_A;  // modifiers: Variable__CELL_CYTOPLASM_E_L_GCS, Variable__CELL_CYTOPLASM_AC_Enzyme, Variable__CELL_CYTOPLASM_GSH, Variable__CELL_CYTOPLASM_glutamate, Variable__CELL_CYTOPLASM_cysteine
    Process__CELL_CYTOPLASM_E_L_GCS_Name = L_glutamyl_cysteine_synthetase; Process__CELL_CYTOPLASM_E_L_GCS_StepperID = DE1; Process__CELL_CYTOPLASM_E_L_GCS_Priority = 0; Process__CELL_CYTOPLASM_E_L_GCS_Ki = 3.4; Process__CELL_CYTOPLASM_E_L_GCS_KmA = 0.4; Process__CELL_CYTOPLASM_E_L_GCS_KmB = 1.8; Process__CELL_CYTOPLASM_E_L_GCS_KmC = 0.1; Process__CELL_CYTOPLASM_E_L_GCS_Vmf = 50; Process__CELL_CYTOPLASM_E_L_GCS_alpha = 0.2;
  Process__CELL_CYTOPLASM_E_PFK: Variable__CELL_CYTOPLASM_F6P + Variable__CELL_CYTOPLASM_MgATP -> Variable__CELL_CYTOPLASM_FDP + Variable__CELL_CYTOPLASM_MgADP; Variable__CELL_CYTOPLASM_E_PFK/((1 + (10^(-1*Variable__CELL_CYTOPLASM_pHi*1e-13*N_A)/Ka)^n*(1 + Variable__CELL_CYTOPLASM_fATP/Process__CELL_CYTOPLASM_E_PFK_KTATP)^4*(1 + Variable__CELL_CYTOPLASM_Mg/KTMg)^4*(1 + Variable__CELL_CYTOPLASM_f23DPG/KTB23PG)^4/((1 + Variable__CELL_CYTOPLASM_F6P/KmFru6P + Variable__CELL_CYTOPLASM_FDP/KmFru16P2)^4*(1 + Variable__CELL_CYTOPLASM_fAMP/KRAMP)^4*(1 + Variable__CELL_CYTOPLASM_Pi/KRPhos)^4*(1 + Variable__CELL_CYTOPLASM_GDP/KRGlc16P2)^4))*(1 + Variable__CELL_CYTOPLASM_F6P/KmFru6P + Variable__CELL_CYTOPLASM_MgATP/Process__CELL_CYTOPLASM_E_PFK_KmMgATP + Variable__CELL_CYTOPLASM_F6P*Variable__CELL_CYTOPLASM_MgATP/(KmFru6P*Process__CELL_CYTOPLASM_E_PFK_KmMgATP) + Variable__CELL_CYTOPLASM_FDP/KmFru16P2 + Variable__CELL_CYTOPLASM_MgADP/Process__CELL_CYTOPLASM_E_PFK_KmMgADP + Variable__CELL_CYTOPLASM_FDP*Variable__CELL_CYTOPLASM_MgADP/(KmFru16P2*Process__CELL_CYTOPLASM_E_PFK_KmMgADP)))*(Process__CELL_CYTOPLASM_E_PFK_kcatf*Variable__CELL_CYTOPLASM_F6P*Variable__CELL_CYTOPLASM_MgATP/(KmFru6P*Process__CELL_CYTOPLASM_E_PFK_KmMgATP) - Process__CELL_CYTOPLASM_E_PFK_kcatf*Variable__CELL_CYTOPLASM_FDP*Variable__CELL_CYTOPLASM_MgADP/(KmFru16P2*Process__CELL_CYTOPLASM_E_PFK_KmMgADP))*(Variable__CELL_CYTOPLASM_GSH/Variable__CELL_CYTOPLASM_GSSG/(Process__CELL_CYTOPLASM_E_PFK_K_GSSG + Variable__CELL_CYTOPLASM_GSH/Variable__CELL_CYTOPLASM_GSSG))*1e-13*N_A*Variable__CELL_CYTOPLASM_AC_Enzyme*1e-13*N_A/1000/N_A;  // modifiers: Variable__CELL_CYTOPLASM_E_PFK, Variable__CELL_CYTOPLASM_pHi, Variable__CELL_CYTOPLASM_fATP, Variable__CELL_CYTOPLASM_Mg, Variable__CELL_CYTOPLASM_f23DPG, Variable__CELL_CYTOPLASM_fAMP, Variable__CELL_CYTOPLASM_Pi, Variable__CELL_CYTOPLASM_GDP, Variable__CELL_CYTOPLASM_AC_Enzyme, Variable__CELL_CYTOPLASM_GSH, Variable__CELL_CYTOPLASM_GSSG
    Process__CELL_CYTOPLASM_E_PFK_Name = Phosphofructokinase; Process__CELL_CYTOPLASM_E_PFK_StepperID = DE1; Process__CELL_CYTOPLASM_E_PFK_Priority = 0; KRAMP = 3.5e-5; KRGlc16P2 = 1.51e-5; KRPhos = 0.000431; Process__CELL_CYTOPLASM_E_PFK_KTATP = 9.8e-6; KTB23PG = 0.00144; KTMg = 0.00044; Process__CELL_CYTOPLASM_E_PFK_K_GSSG = 0; Ka = 8.912509e-8; KmFru16P2 = 0.00042; KmFru6P = 0.00027; Process__CELL_CYTOPLASM_E_PFK_KmMgADP = 0.00054; Process__CELL_CYTOPLASM_E_PFK_KmMgATP = 6.8e-5; Process__CELL_CYTOPLASM_E_PFK_kcatf = 822; Process__CELL_CYTOPLASM_E_PFK_kcatr = 36; n = 2;
  Process__CELL_CYTOPLASM_E_PGI: Variable__CELL_CYTOPLASM_G6P -> Variable__CELL_CYTOPLASM_F6P; Variable__CELL_CYTOPLASM_E_PGI*1e-13*N_A*(Process__CELL_CYTOPLASM_E_PGI_kcatf*1000000*Variable__CELL_CYTOPLASM_G6P/Process__CELL_CYTOPLASM_E_PGI_KmA - Process__CELL_CYTOPLASM_E_PGI_kcatr*1000000*Variable__CELL_CYTOPLASM_F6P/Process__CELL_CYTOPLASM_E_PGI_KmP)/(1 + 1000000*Variable__CELL_CYTOPLASM_G6P/Process__CELL_CYTOPLASM_E_PGI_KmA + 1000000*Variable__CELL_CYTOPLASM_F6P/Process__CELL_CYTOPLASM_E_PGI_KmP)*Variable__CELL_CYTOPLASM_AC_Enzyme*1e-13*N_A/1000/N_A;  // modifiers: Variable__CELL_CYTOPLASM_E_PGI, Variable__CELL_CYTOPLASM_AC_Enzyme
    Process__CELL_CYTOPLASM_E_PGI_Name = Phosphoglucoisomerase; Process__CELL_CYTOPLASM_E_PGI_StepperID = DE1; Process__CELL_CYTOPLASM_E_PGI_Priority = 0; Process__CELL_CYTOPLASM_E_PGI_KmA = 181; Process__CELL_CYTOPLASM_E_PGI_KmP = 71; Process__CELL_CYTOPLASM_E_PGI_kcatf = 1470; Process__CELL_CYTOPLASM_E_PGI_kcatr = 1760;
  Process__CELL_CYTOPLASM_E_PGK: Variable__CELL_CYTOPLASM__13DPG + Variable__CELL_CYTOPLASM_MgADP -> Variable__CELL_CYTOPLASM__3PG + Variable__CELL_CYTOPLASM_MgATP; PGK/(1 + Variable__CELL_CYTOPLASM_MgADP/Process__CELL_CYTOPLASM_E_PGK_KiMgADP + Variable__CELL_CYTOPLASM__13DPG/Process__CELL_CYTOPLASM_E_PGK_KiB13PG + Variable__CELL_CYTOPLASM_MgADP*Variable__CELL_CYTOPLASM__13DPG/(Process__CELL_CYTOPLASM_E_PGK_KiMgADP*Process__CELL_CYTOPLASM_E_PGK_KmB13PG) + Variable__CELL_CYTOPLASM_MgATP/Process__CELL_CYTOPLASM_E_PGK_KiMgATP + Variable__CELL_CYTOPLASM__3PG/KiP3GA + Variable__CELL_CYTOPLASM_MgATP*Variable__CELL_CYTOPLASM__3PG/(Process__CELL_CYTOPLASM_E_PGK_KiMgATP*Process__CELL_CYTOPLASM_E_PGK_KmP3GA))*(Process__CELL_CYTOPLASM_E_PGK_kcatf*Variable__CELL_CYTOPLASM__13DPG*Variable__CELL_CYTOPLASM_MgADP/(Process__CELL_CYTOPLASM_E_PGK_KiMgADP*Process__CELL_CYTOPLASM_E_PGK_KmB13PG) - Process__CELL_CYTOPLASM_E_PGK_kcatr*Variable__CELL_CYTOPLASM__3PG*Variable__CELL_CYTOPLASM_MgATP/(Process__CELL_CYTOPLASM_E_PGK_KiMgATP*Process__CELL_CYTOPLASM_E_PGK_KmP3GA))*1e-13*N_A*Variable__CELL_CYTOPLASM_AC_Enzyme*1e-13*N_A/1000/N_A;  // modifiers: Variable__CELL_CYTOPLASM_AC_Enzyme
    Process__CELL_CYTOPLASM_E_PGK_Name = Phosphoglycerate_kinase; Process__CELL_CYTOPLASM_E_PGK_StepperID = DE1; Process__CELL_CYTOPLASM_E_PGK_Priority = 0; Process__CELL_CYTOPLASM_E_PGK_KiB13PG = 1.6e-6; Process__CELL_CYTOPLASM_E_PGK_KiMgADP = 8e-5; Process__CELL_CYTOPLASM_E_PGK_KiMgATP = 0.00013; KiP3GA = 0.000205; Process__CELL_CYTOPLASM_E_PGK_KmB13PG = 2e-6; Process__CELL_CYTOPLASM_E_PGK_KmMgADP = 0.0001; Process__CELL_CYTOPLASM_E_PGK_KmMgATP = 0.001; Process__CELL_CYTOPLASM_E_PGK_KmP3GA = 0.0011; PGK = 2.74e-6; Process__CELL_CYTOPLASM_E_PGK_kcatf = 2290; Process__CELL_CYTOPLASM_E_PGK_kcatr = 917;
  Process__CELL_CYTOPLASM_E_PGM: Variable__CELL_CYTOPLASM__3PG -> Variable__CELL_CYTOPLASM__2PG; PGM/(1 + Variable__CELL_CYTOPLASM__3PG/Process__CELL_CYTOPLASM_E_PGM_KmP3GA + Variable__CELL_CYTOPLASM__2PG/KmP2GA)*(Process__CELL_CYTOPLASM_E_PGM_kcatf*Variable__CELL_CYTOPLASM__3PG/Process__CELL_CYTOPLASM_E_PGM_KmP3GA - Process__CELL_CYTOPLASM_E_PGM_kcatr*Variable__CELL_CYTOPLASM__2PG/KmP2GA)*1e-13*N_A*Variable__CELL_CYTOPLASM_AC_Enzyme*1e-13*N_A/1000/N_A;  // modifiers: Variable__CELL_CYTOPLASM_AC_Enzyme
    Process__CELL_CYTOPLASM_E_PGM_Name = Phosphoglycerate_mutase; Process__CELL_CYTOPLASM_E_PGM_StepperID = DE1; Process__CELL_CYTOPLASM_E_PGM_Priority = 0; KmP2GA = 4.6e-5; Process__CELL_CYTOPLASM_E_PGM_KmP3GA = 0.000168; PGM = 4.1e-7; Process__CELL_CYTOPLASM_E_PGM_kcatf = 795; Process__CELL_CYTOPLASM_E_PGM_kcatr = 714;
  Process__CELL_CYTOPLASM_E_PK: Variable__CELL_CYTOPLASM_PEP + Variable__CELL_CYTOPLASM_MgADP -> Variable__CELL_CYTOPLASM_PYRi + Variable__CELL_CYTOPLASM_MgATP; PK/((1 + 10^(-6.8)/10^(-1*Variable__CELL_CYTOPLASM_pHi*1e-13*N_A)*(1 + Variable__CELL_CYTOPLASM_fATP/Process__CELL_CYTOPLASM_E_PK_KTATP)^4/((1 + Variable__CELL_CYTOPLASM_PEP/KRPEP + Variable__CELL_CYTOPLASM_PYRi/KRPyr)^4*(1 + Variable__CELL_CYTOPLASM_FDP/KRF16P2 + Variable__CELL_CYTOPLASM_GDP/KRG16P2)^4))*(1 + Variable__CELL_CYTOPLASM_PEP/KRPEP + Variable__CELL_CYTOPLASM_MgADP/KRMgADP + Variable__CELL_CYTOPLASM_PEP*Variable__CELL_CYTOPLASM_MgADP/(KRPEP*KRMgADP) + Variable__CELL_CYTOPLASM_PYRi/KRPyr + Variable__CELL_CYTOPLASM_MgATP/KRMgATP + Variable__CELL_CYTOPLASM_PYRi*Variable__CELL_CYTOPLASM_MgATP/(KRPyr*KRMgATP)))*(Process__CELL_CYTOPLASM_E_PK_kcatf*Variable__CELL_CYTOPLASM_PEP*Variable__CELL_CYTOPLASM_MgADP/(KRPEP*KRMgADP) - Process__CELL_CYTOPLASM_E_PK_kcatr*Variable__CELL_CYTOPLASM_PYRi*Variable__CELL_CYTOPLASM_MgATP/(KRMgATP*KRPyr))*1e-13*N_A*Variable__CELL_CYTOPLASM_AC_Enzyme*1e-13*N_A/1000/N_A;  // modifiers: Variable__CELL_CYTOPLASM_pHi, Variable__CELL_CYTOPLASM_fATP, Variable__CELL_CYTOPLASM_FDP, Variable__CELL_CYTOPLASM_GDP, Variable__CELL_CYTOPLASM_AC_Enzyme
    Process__CELL_CYTOPLASM_E_PK_Name = Pyruvate_kinase; Process__CELL_CYTOPLASM_E_PK_StepperID = DE1; Process__CELL_CYTOPLASM_E_PK_Priority = 0; KRF16P2 = 5e-6; KRG16P2 = 0.0001; KRMgADP = 0.000474; KRMgATP = 0.003; KRPEP = 0.000225; KRPyr = 0.002; Process__CELL_CYTOPLASM_E_PK_KTATP = 0.00339; PK = 8.7e-8; Process__CELL_CYTOPLASM_E_PK_kcatf = 1386; Process__CELL_CYTOPLASM_E_PK_kcatr = 3.26;
  Process__CELL_CYTOPLASM_E_PNPase: Variable__CELL_CYTOPLASM_HXi + Variable__CELL_CYTOPLASM_R1P -> Variable__CELL_CYTOPLASM_INO + Variable__CELL_CYTOPLASM_Pi; Et*(Process__CELL_CYTOPLASM_E_PNPase_k1*Process__CELL_CYTOPLASM_E_PNPase_k2*Process__CELL_CYTOPLASM_E_PNPase_k3*Variable__CELL_CYTOPLASM_HXi*1e-13*N_A*Variable__CELL_CYTOPLASM_R1P*1e-13*N_A - kd1*kd2*kd3*Variable__CELL_CYTOPLASM_INO*1e-13*N_A*Variable__CELL_CYTOPLASM_Pi*1e-13*N_A)/(kd1*Process__CELL_CYTOPLASM_E_PNPase_k3 + Process__CELL_CYTOPLASM_E_PNPase_k1*Process__CELL_CYTOPLASM_E_PNPase_k3*Variable__CELL_CYTOPLASM_HXi*1e-13*N_A + kd1*kd2*Variable__CELL_CYTOPLASM_INO*1e-13*N_A + kd1*kd3*Variable__CELL_CYTOPLASM_Pi*1e-13*N_A + Process__CELL_CYTOPLASM_E_PNPase_k1*Process__CELL_CYTOPLASM_E_PNPase_k2*Variable__CELL_CYTOPLASM_HXi*1e-13*N_A*Variable__CELL_CYTOPLASM_R1P*1e-13*N_A + Process__CELL_CYTOPLASM_E_PNPase_k1*kd2*Variable__CELL_CYTOPLASM_HXi*1e-13*N_A*Variable__CELL_CYTOPLASM_INO*1e-13*N_A + Process__CELL_CYTOPLASM_E_PNPase_k2*kd3*Variable__CELL_CYTOPLASM_R1P*1e-13*N_A*Variable__CELL_CYTOPLASM_Pi*1e-13*N_A + kd2*kd3*Variable__CELL_CYTOPLASM_INO*1e-13*N_A*Variable__CELL_CYTOPLASM_Pi*1e-13*N_A)*(1e-13*N_A*Variable__CELL_CYTOPLASM_AC_Purine*1e-13*N_A/1000)/N_A;  // modifiers: Variable__CELL_CYTOPLASM_AC_Purine
    Process__CELL_CYTOPLASM_E_PNPase_Name = Purine_nucleoside_phosphorylase; Process__CELL_CYTOPLASM_E_PNPase_StepperID = DE1; Process__CELL_CYTOPLASM_E_PNPase_Priority = 0; Et = 1.489e-5; Process__CELL_CYTOPLASM_E_PNPase_k1 = 587000; Process__CELL_CYTOPLASM_E_PNPase_k2 = 2240; Process__CELL_CYTOPLASM_E_PNPase_k3 = 29.33; kd1 = 23.9; kd2 = 105000; kd3 = 613000;
  Process__CELL_CYTOPLASM_E_PRM: Variable__CELL_CYTOPLASM_R1P -> Variable__CELL_CYTOPLASM_R5P; (Process__CELL_CYTOPLASM_E_PRM_Kma*Variable__CELL_CYTOPLASM_R1P - Process__CELL_CYTOPLASM_E_PRM_Kmd*Variable__CELL_CYTOPLASM_R5P)*1e-13*N_A*Variable__CELL_CYTOPLASM_AC_Purine*1e-13*N_A/1000/N_A;  // modifiers: Variable__CELL_CYTOPLASM_AC_Purine
    Process__CELL_CYTOPLASM_E_PRM_Name = Phosphoribosyl_pyrophosphate_synthetase; Process__CELL_CYTOPLASM_E_PRM_StepperID = DE1; Process__CELL_CYTOPLASM_E_PRM_Priority = 0; Process__CELL_CYTOPLASM_E_PRM_Kma = 7.25; Process__CELL_CYTOPLASM_E_PRM_Kmd = 100;
  Process__CELL_CYTOPLASM_E_PRPPsyn: Variable__CELL_CYTOPLASM_R5P + Variable__CELL_CYTOPLASM_MgATP -> Variable__CELL_CYTOPLASM_PRPP + Variable__CELL_CYTOPLASM_fAMP + Variable__CELL_CYTOPLASM_Mg; Process__CELL_CYTOPLASM_E_PRPPsyn_Vm*Vr*(1000*Variable__CELL_CYTOPLASM_R5P*1000*Variable__CELL_CYTOPLASM_MgATP - 1000*Variable__CELL_CYTOPLASM_PRPP*1000*Variable__CELL_CYTOPLASM_fAMP/Keq)/(Vr*Kr5p*1000*Variable__CELL_CYTOPLASM_MgATP + Vr*Katp*1000*Variable__CELL_CYTOPLASM_R5P + Process__CELL_CYTOPLASM_E_PRPPsyn_Vm*Kamp*1000*Variable__CELL_CYTOPLASM_PRPP/Keq + Process__CELL_CYTOPLASM_E_PRPPsyn_Vm*Kprpp*1000*Variable__CELL_CYTOPLASM_fAMP/Keq + Vr*1000*Variable__CELL_CYTOPLASM_R5P*1000*Variable__CELL_CYTOPLASM_MgATP + Process__CELL_CYTOPLASM_E_PRPPsyn_Vm*1000*Variable__CELL_CYTOPLASM_PRPP)*Variable__CELL_CYTOPLASM_AC_Purine*1e-13*N_A/1000/1000/3600*1e-13*N_A/N_A;  // modifiers: Variable__CELL_CYTOPLASM_E_PRPPsyn, Variable__CELL_CYTOPLASM_AC_Purine
    Process__CELL_CYTOPLASM_E_PRPPsyn_Name = Phosphoribosyl_pyrophosphate_synthetase; Process__CELL_CYTOPLASM_E_PRPPsyn_StepperID = DE1; Process__CELL_CYTOPLASM_E_PRPPsyn_Priority = 0; Kamp = 0.275; Katp = 0.17; Keq = 28.6; Kprpp = 0.09; Kr5p = 0.65; Kv = 7.5; Process__CELL_CYTOPLASM_E_PRPPsyn_Vm = 0.554; Vr = 0.07386667;
  Process__CELL_CYTOPLASM_E_R5PI: Variable__CELL_CYTOPLASM_RU5P -> Variable__CELL_CYTOPLASM_R5P; Process__CELL_CYTOPLASM_E_R5PI_Ru5P/(1 + Variable__CELL_CYTOPLASM_RU5P/((Process__CELL_CYTOPLASM_E_R5PI_k2 + Process__CELL_CYTOPLASM_E_R5PI_k3)/Process__CELL_CYTOPLASM_E_R5PI_k1) + Variable__CELL_CYTOPLASM_R5P/((Process__CELL_CYTOPLASM_E_R5PI_k2 + Process__CELL_CYTOPLASM_E_R5PI_k3)/Process__CELL_CYTOPLASM_E_R5PI_k4))*(Process__CELL_CYTOPLASM_E_R5PI_k3*Variable__CELL_CYTOPLASM_RU5P/((Process__CELL_CYTOPLASM_E_R5PI_k2 + Process__CELL_CYTOPLASM_E_R5PI_k3)/Process__CELL_CYTOPLASM_E_R5PI_k1) - Process__CELL_CYTOPLASM_E_R5PI_k2*Variable__CELL_CYTOPLASM_R5P/((Process__CELL_CYTOPLASM_E_R5PI_k2 + Process__CELL_CYTOPLASM_E_R5PI_k3)/Process__CELL_CYTOPLASM_E_R5PI_k4))*1e-13*N_A*Variable__CELL_CYTOPLASM_AC_Enzyme*1e-13*N_A/1000/N_A;  // modifiers: Variable__CELL_CYTOPLASM_AC_Enzyme
    Process__CELL_CYTOPLASM_E_R5PI_Name = Ribose_5_phosphate_isomerase; Process__CELL_CYTOPLASM_E_R5PI_StepperID = DE1; Process__CELL_CYTOPLASM_E_R5PI_Priority = 0; Process__CELL_CYTOPLASM_E_R5PI_Ru5P = 1.42e-5; Process__CELL_CYTOPLASM_E_R5PI_k1 = 60900; Process__CELL_CYTOPLASM_E_R5PI_k2 = 33.3; Process__CELL_CYTOPLASM_E_R5PI_k3 = 14.2; Process__CELL_CYTOPLASM_E_R5PI_k4 = 21600;
  Process__CELL_CYTOPLASM_E_TA: Variable__CELL_CYTOPLASM_S7P + Variable__CELL_CYTOPLASM_GA3P -> Variable__CELL_CYTOPLASM_E4P + Variable__CELL_CYTOPLASM_F6P; (Process__CELL_CYTOPLASM_E_TA_k1*Process__CELL_CYTOPLASM_E_TA_k3*Process__CELL_CYTOPLASM_E_TA_k5*Process__CELL_CYTOPLASM_E_TA_k7*Variable__CELL_CYTOPLASM_S7P*Variable__CELL_CYTOPLASM_GA3P - Process__CELL_CYTOPLASM_E_TA_k2*Process__CELL_CYTOPLASM_E_TA_k4*Process__CELL_CYTOPLASM_E_TA_k6*Process__CELL_CYTOPLASM_E_TA_k8*Variable__CELL_CYTOPLASM_E4P*Variable__CELL_CYTOPLASM_F6P)/(Process__CELL_CYTOPLASM_E_TA_k1*Process__CELL_CYTOPLASM_E_TA_k3*(Process__CELL_CYTOPLASM_E_TA_k6 + Process__CELL_CYTOPLASM_E_TA_k7)*Variable__CELL_CYTOPLASM_S7P + Process__CELL_CYTOPLASM_E_TA_k5*Process__CELL_CYTOPLASM_E_TA_k7*(Process__CELL_CYTOPLASM_E_TA_k2 + Process__CELL_CYTOPLASM_E_TA_k3)*Variable__CELL_CYTOPLASM_GA3P + Process__CELL_CYTOPLASM_E_TA_k2*Process__CELL_CYTOPLASM_E_TA_k4*(Process__CELL_CYTOPLASM_E_TA_k6 + Process__CELL_CYTOPLASM_E_TA_k7)*Variable__CELL_CYTOPLASM_E4P + Process__CELL_CYTOPLASM_E_TA_k6*Process__CELL_CYTOPLASM_E_TA_k8*(Process__CELL_CYTOPLASM_E_TA_k2 + Process__CELL_CYTOPLASM_E_TA_k3)*Variable__CELL_CYTOPLASM_F6P + Process__CELL_CYTOPLASM_E_TA_k1*Process__CELL_CYTOPLASM_E_TA_k5*(Process__CELL_CYTOPLASM_E_TA_k3 + Process__CELL_CYTOPLASM_E_TA_k7)*Variable__CELL_CYTOPLASM_S7P*Variable__CELL_CYTOPLASM_GA3P + Process__CELL_CYTOPLASM_E_TA_k4*Process__CELL_CYTOPLASM_E_TA_k8*(Process__CELL_CYTOPLASM_E_TA_k2 + Process__CELL_CYTOPLASM_E_TA_k6)*Variable__CELL_CYTOPLASM_E4P*Variable__CELL_CYTOPLASM_F6P + Process__CELL_CYTOPLASM_E_TA_k5*Process__CELL_CYTOPLASM_E_TA_k8*(Process__CELL_CYTOPLASM_E_TA_k2 + Process__CELL_CYTOPLASM_E_TA_k3)*Variable__CELL_CYTOPLASM_GA3P*Variable__CELL_CYTOPLASM_F6P + Process__CELL_CYTOPLASM_E_TA_k1*Process__CELL_CYTOPLASM_E_TA_k4*(Process__CELL_CYTOPLASM_E_TA_k6 + Process__CELL_CYTOPLASM_E_TA_k7)*Variable__CELL_CYTOPLASM_S7P*Variable__CELL_CYTOPLASM_E4P)*Variable__CELL_CYTOPLASM_E_TA*1e-13*N_A*(Variable__CELL_CYTOPLASM_AC_Enzyme*1e-13*N_A/1000)/N_A;  // modifiers: Variable__CELL_CYTOPLASM_E_TA, Variable__CELL_CYTOPLASM_AC_Enzyme
    Process__CELL_CYTOPLASM_E_TA_Name = Transaldolase; Process__CELL_CYTOPLASM_E_TA_StepperID = DE1; Process__CELL_CYTOPLASM_E_TA_Priority = 0; Process__CELL_CYTOPLASM_E_TA_k1 = 21600; Process__CELL_CYTOPLASM_E_TA_k2 = 45.3; Process__CELL_CYTOPLASM_E_TA_k3 = 16.3; Process__CELL_CYTOPLASM_E_TA_k4 = 30000; Process__CELL_CYTOPLASM_E_TA_k5 = 490000; Process__CELL_CYTOPLASM_E_TA_k6 = 60; Process__CELL_CYTOPLASM_E_TA_k7 = 17; Process__CELL_CYTOPLASM_E_TA_k8 = 79000;
  Process__CELL_CYTOPLASM_E_TK1: Variable__CELL_CYTOPLASM_X5P + Variable__CELL_CYTOPLASM_R5P -> Variable__CELL_CYTOPLASM_GA3P + Variable__CELL_CYTOPLASM_S7P; (Process__CELL_CYTOPLASM_E_TK1_k1*Process__CELL_CYTOPLASM_E_TK1_k3*Process__CELL_CYTOPLASM_E_TK1_k5*Process__CELL_CYTOPLASM_E_TK1_k7*Variable__CELL_CYTOPLASM_X5P*Variable__CELL_CYTOPLASM_R5P - Process__CELL_CYTOPLASM_E_TK1_k2*Process__CELL_CYTOPLASM_E_TK1_k4*Process__CELL_CYTOPLASM_E_TK1_k6*Process__CELL_CYTOPLASM_E_TK1_k8*Variable__CELL_CYTOPLASM_GA3P*Variable__CELL_CYTOPLASM_S7P)/(Process__CELL_CYTOPLASM_E_TK1_k1*Process__CELL_CYTOPLASM_E_TK1_k3*(Process__CELL_CYTOPLASM_E_TK1_k6 + Process__CELL_CYTOPLASM_E_TK1_k7)*Variable__CELL_CYTOPLASM_X5P + Process__CELL_CYTOPLASM_E_TK1_k5*Process__CELL_CYTOPLASM_E_TK1_k7*(Process__CELL_CYTOPLASM_E_TK1_k2 + Process__CELL_CYTOPLASM_E_TK1_k3)*Variable__CELL_CYTOPLASM_R5P + Process__CELL_CYTOPLASM_E_TK1_k2*Process__CELL_CYTOPLASM_E_TK1_k4*(Process__CELL_CYTOPLASM_E_TK1_k6 + Process__CELL_CYTOPLASM_E_TK1_k7)*Variable__CELL_CYTOPLASM_GA3P + Process__CELL_CYTOPLASM_E_TK1_k6*Process__CELL_CYTOPLASM_E_TK1_k8*(Process__CELL_CYTOPLASM_E_TK1_k2 + Process__CELL_CYTOPLASM_E_TK1_k3)*Variable__CELL_CYTOPLASM_S7P + Process__CELL_CYTOPLASM_E_TK1_k1*Process__CELL_CYTOPLASM_E_TK1_k5*(Process__CELL_CYTOPLASM_E_TK1_k3 + Process__CELL_CYTOPLASM_E_TK1_k7)*Variable__CELL_CYTOPLASM_X5P*Variable__CELL_CYTOPLASM_R5P + Process__CELL_CYTOPLASM_E_TK1_k4*Process__CELL_CYTOPLASM_E_TK1_k8*(Process__CELL_CYTOPLASM_E_TK1_k2 + Process__CELL_CYTOPLASM_E_TK1_k6)*Variable__CELL_CYTOPLASM_GA3P*Variable__CELL_CYTOPLASM_S7P + Process__CELL_CYTOPLASM_E_TK1_k5*Process__CELL_CYTOPLASM_E_TK1_k8*(Process__CELL_CYTOPLASM_E_TK1_k2 + Process__CELL_CYTOPLASM_E_TK1_k3)*Variable__CELL_CYTOPLASM_R5P*Variable__CELL_CYTOPLASM_S7P + Process__CELL_CYTOPLASM_E_TK1_k1*Process__CELL_CYTOPLASM_E_TK1_k4*(Process__CELL_CYTOPLASM_E_TK1_k6 + Process__CELL_CYTOPLASM_E_TK1_k7)*Variable__CELL_CYTOPLASM_X5P*Variable__CELL_CYTOPLASM_GA3P)*Variable__CELL_CYTOPLASM_E_TK1*1e-13*N_A*(Variable__CELL_CYTOPLASM_AC_Enzyme*1e-13*N_A/1000)/N_A;  // modifiers: Variable__CELL_CYTOPLASM_E_TK1, Variable__CELL_CYTOPLASM_AC_Enzyme
    Process__CELL_CYTOPLASM_E_TK1_Name = Transketolase_I; Process__CELL_CYTOPLASM_E_TK1_StepperID = DE1; Process__CELL_CYTOPLASM_E_TK1_Priority = 0; Process__CELL_CYTOPLASM_E_TK1_k1 = 216000; Process__CELL_CYTOPLASM_E_TK1_k2 = 38; Process__CELL_CYTOPLASM_E_TK1_k3 = 34; Process__CELL_CYTOPLASM_E_TK1_k4 = 156000; Process__CELL_CYTOPLASM_E_TK1_k5 = 329000; Process__CELL_CYTOPLASM_E_TK1_k6 = 175; Process__CELL_CYTOPLASM_E_TK1_k7 = 40; Process__CELL_CYTOPLASM_E_TK1_k8 = 44800;
  Process__CELL_CYTOPLASM_E_TK2: Variable__CELL_CYTOPLASM_X5P + Variable__CELL_CYTOPLASM_E4P -> Variable__CELL_CYTOPLASM_GA3P + Variable__CELL_CYTOPLASM_F6P; (Process__CELL_CYTOPLASM_E_TK2_k1*Process__CELL_CYTOPLASM_E_TK2_k3*Process__CELL_CYTOPLASM_E_TK2_k5*Process__CELL_CYTOPLASM_E_TK2_k7*Variable__CELL_CYTOPLASM_X5P*Variable__CELL_CYTOPLASM_E4P - Process__CELL_CYTOPLASM_E_TK2_k2*Process__CELL_CYTOPLASM_E_TK2_k4*Process__CELL_CYTOPLASM_E_TK2_k6*Process__CELL_CYTOPLASM_E_TK2_k8*Variable__CELL_CYTOPLASM_GA3P*Variable__CELL_CYTOPLASM_F6P)/(Process__CELL_CYTOPLASM_E_TK2_k1*Process__CELL_CYTOPLASM_E_TK2_k3*(Process__CELL_CYTOPLASM_E_TK2_k6 + Process__CELL_CYTOPLASM_E_TK2_k7)*Variable__CELL_CYTOPLASM_X5P + Process__CELL_CYTOPLASM_E_TK2_k5*Process__CELL_CYTOPLASM_E_TK2_k7*(Process__CELL_CYTOPLASM_E_TK2_k2 + Process__CELL_CYTOPLASM_E_TK2_k3)*Variable__CELL_CYTOPLASM_E4P + Process__CELL_CYTOPLASM_E_TK2_k2*Process__CELL_CYTOPLASM_E_TK2_k4*(Process__CELL_CYTOPLASM_E_TK2_k6 + Process__CELL_CYTOPLASM_E_TK2_k7)*Variable__CELL_CYTOPLASM_GA3P + Process__CELL_CYTOPLASM_E_TK2_k6*Process__CELL_CYTOPLASM_E_TK2_k8*(Process__CELL_CYTOPLASM_E_TK2_k2 + Process__CELL_CYTOPLASM_E_TK2_k3)*Variable__CELL_CYTOPLASM_F6P + Process__CELL_CYTOPLASM_E_TK2_k1*Process__CELL_CYTOPLASM_E_TK2_k5*(Process__CELL_CYTOPLASM_E_TK2_k3 + Process__CELL_CYTOPLASM_E_TK2_k7)*Variable__CELL_CYTOPLASM_X5P*Variable__CELL_CYTOPLASM_E4P + Process__CELL_CYTOPLASM_E_TK2_k4*Process__CELL_CYTOPLASM_E_TK2_k8*(Process__CELL_CYTOPLASM_E_TK2_k2 + Process__CELL_CYTOPLASM_E_TK2_k6)*Variable__CELL_CYTOPLASM_GA3P*Variable__CELL_CYTOPLASM_F6P + Process__CELL_CYTOPLASM_E_TK2_k5*Process__CELL_CYTOPLASM_E_TK2_k8*(Process__CELL_CYTOPLASM_E_TK2_k2 + Process__CELL_CYTOPLASM_E_TK2_k3)*Variable__CELL_CYTOPLASM_E4P*Variable__CELL_CYTOPLASM_F6P + Process__CELL_CYTOPLASM_E_TK2_k1*Process__CELL_CYTOPLASM_E_TK2_k4*(Process__CELL_CYTOPLASM_E_TK2_k6 + Process__CELL_CYTOPLASM_E_TK2_k7)*Variable__CELL_CYTOPLASM_X5P*Variable__CELL_CYTOPLASM_GA3P)*Variable__CELL_CYTOPLASM_E_TK2*1e-13*N_A*(Variable__CELL_CYTOPLASM_AC_Enzyme*1e-13*N_A/1000)/N_A;  // modifiers: Variable__CELL_CYTOPLASM_E_TK2, Variable__CELL_CYTOPLASM_AC_Enzyme
    Process__CELL_CYTOPLASM_E_TK2_Name = Transketolase_II; Process__CELL_CYTOPLASM_E_TK2_StepperID = DE1; Process__CELL_CYTOPLASM_E_TK2_Priority = 0; Process__CELL_CYTOPLASM_E_TK2_k1 = 216000; Process__CELL_CYTOPLASM_E_TK2_k2 = 38; Process__CELL_CYTOPLASM_E_TK2_k3 = 34; Process__CELL_CYTOPLASM_E_TK2_k4 = 156000; Process__CELL_CYTOPLASM_E_TK2_k5 = 2240000; Process__CELL_CYTOPLASM_E_TK2_k6 = 175; Process__CELL_CYTOPLASM_E_TK2_k7 = 40; Process__CELL_CYTOPLASM_E_TK2_k8 = 21300;
  Process__CELL_CYTOPLASM_E_TPI: Variable__CELL_CYTOPLASM_DHAP -> Variable__CELL_CYTOPLASM_GA3P; Variable__CELL_CYTOPLASM_E_TPI*1e-13*N_A*(Process__CELL_CYTOPLASM_E_TPI_kcatf*1000000*Variable__CELL_CYTOPLASM_DHAP/Process__CELL_CYTOPLASM_E_TPI_KmA - Process__CELL_CYTOPLASM_E_TPI_kcatr*1000000*Variable__CELL_CYTOPLASM_GA3P/Process__CELL_CYTOPLASM_E_TPI_KmP)/(1 + 1000000*Variable__CELL_CYTOPLASM_DHAP/Process__CELL_CYTOPLASM_E_TPI_KmA + 1000000*Variable__CELL_CYTOPLASM_GA3P/Process__CELL_CYTOPLASM_E_TPI_KmP)*Variable__CELL_CYTOPLASM_AC_Enzyme*1e-13*N_A/1000/N_A;  // modifiers: Variable__CELL_CYTOPLASM_E_TPI, Variable__CELL_CYTOPLASM_AC_Enzyme
    Process__CELL_CYTOPLASM_E_TPI_Name = Triose_phosphate_isomerase; Process__CELL_CYTOPLASM_E_TPI_StepperID = DE1; Process__CELL_CYTOPLASM_E_TPI_Priority = 0; Process__CELL_CYTOPLASM_E_TPI_KmA = 162.4; Process__CELL_CYTOPLASM_E_TPI_KmP = 446; Process__CELL_CYTOPLASM_E_TPI_kcatf = 1280; Process__CELL_CYTOPLASM_E_TPI_kcatr = 14560;
  Process__CELL_CYTOPLASM_E_X5PI: Variable__CELL_CYTOPLASM_RU5P -> Variable__CELL_CYTOPLASM_X5P; Process__CELL_CYTOPLASM_E_X5PI_Ru5P/(1 + Variable__CELL_CYTOPLASM_RU5P/((Process__CELL_CYTOPLASM_E_X5PI_k2 + Process__CELL_CYTOPLASM_E_X5PI_k3)/Process__CELL_CYTOPLASM_E_X5PI_k1) + Variable__CELL_CYTOPLASM_X5P/((Process__CELL_CYTOPLASM_E_X5PI_k2 + Process__CELL_CYTOPLASM_E_X5PI_k3)/Process__CELL_CYTOPLASM_E_X5PI_k4))*(Process__CELL_CYTOPLASM_E_X5PI_k3*Variable__CELL_CYTOPLASM_RU5P/((Process__CELL_CYTOPLASM_E_X5PI_k2 + Process__CELL_CYTOPLASM_E_X5PI_k3)/Process__CELL_CYTOPLASM_E_X5PI_k1) - Process__CELL_CYTOPLASM_E_X5PI_k2*Variable__CELL_CYTOPLASM_X5P/((Process__CELL_CYTOPLASM_E_X5PI_k2 + Process__CELL_CYTOPLASM_E_X5PI_k3)/Process__CELL_CYTOPLASM_E_X5PI_k4))*1e-13*N_A*Variable__CELL_CYTOPLASM_AC_Enzyme*1e-13*N_A/1000/N_A;  // modifiers: Variable__CELL_CYTOPLASM_AC_Enzyme
    Process__CELL_CYTOPLASM_E_X5PI_Name = Xylulose_5_phosphate_isomerase; Process__CELL_CYTOPLASM_E_X5PI_StepperID = DE1; Process__CELL_CYTOPLASM_E_X5PI_Priority = 0; Process__CELL_CYTOPLASM_E_X5PI_Ru5P = 4.22e-6; Process__CELL_CYTOPLASM_E_X5PI_k1 = 3910000; Process__CELL_CYTOPLASM_E_X5PI_k2 = 438; Process__CELL_CYTOPLASM_E_X5PI_k3 = 305; Process__CELL_CYTOPLASM_E_X5PI_k4 = 1490000;
  Process__CELL_CYTOPLASM_Mg13DPG: Variable__CELL_CYTOPLASM_Mg + Variable__CELL_CYTOPLASM__13DPG -> Variable__CELL_CYTOPLASM_Mg13DPG; (Process__CELL_CYTOPLASM_Mg13DPG_kmgbpga*(3.2*0.001*(Process__CELL_CYTOPLASM_Mg13DPG_Kmgbpg + 10^(-1*Variable__CELL_CYTOPLASM_pHi*1e-13*N_A)*Process__CELL_CYTOPLASM_Mg13DPG_Khbpg*Process__CELL_CYTOPLASM_Mg13DPG_Kmghbpg)/(1 + 10^(-1*Variable__CELL_CYTOPLASM_pHi*1e-13*N_A)*Process__CELL_CYTOPLASM_Mg13DPG_Khbpg + 10^(-2*Variable__CELL_CYTOPLASM_pHi*1e-13*N_A)*Process__CELL_CYTOPLASM_Mg13DPG_Khbpg*Process__CELL_CYTOPLASM_Mg13DPG_Kh2bpg + Variable__CELL_CYTOPLASM_Ki*Process__CELL_CYTOPLASM_Mg13DPG_Kkbpg + Variable__CELL_CYTOPLASM_Ki*10^(-1*Variable__CELL_CYTOPLASM_pHi*1e-13*N_A)*Process__CELL_CYTOPLASM_Mg13DPG_Khbpg*Process__CELL_CYTOPLASM_Mg13DPG_Kkhbpg))*Variable__CELL_CYTOPLASM_Mg*Variable__CELL_CYTOPLASM__13DPG - Process__CELL_CYTOPLASM_Mg13DPG_kmgbpgd*Variable__CELL_CYTOPLASM_Mg13DPG)*1e-13*N_A*Variable__CELL_CYTOPLASM_AC_Enzyme*1e-13*N_A/1000/N_A;  // modifiers: Variable__CELL_CYTOPLASM_pHi, Variable__CELL_CYTOPLASM_Ki, Variable__CELL_CYTOPLASM_AC_Enzyme
    Process__CELL_CYTOPLASM_Mg13DPG_Name = Mg_13DPG_binding_process; Process__CELL_CYTOPLASM_Mg13DPG_StepperID = DE1; Process__CELL_CYTOPLASM_Mg13DPG_Priority = 0; Process__CELL_CYTOPLASM_Mg13DPG_Kh2bpg = 4270000; Process__CELL_CYTOPLASM_Mg13DPG_Khbpg = 162000000; Process__CELL_CYTOPLASM_Mg13DPG_Kkbpg = 85.1; Process__CELL_CYTOPLASM_Mg13DPG_Kkhbpg = 8.9; Process__CELL_CYTOPLASM_Mg13DPG_Kmgbpg = 7410; Process__CELL_CYTOPLASM_Mg13DPG_Kmghbpg = 513; Process__CELL_CYTOPLASM_Mg13DPG_kmgbpga = 228000; Process__CELL_CYTOPLASM_Mg13DPG_kmgbpgd = 1200;
  Process__CELL_CYTOPLASM_Mg23DPG: Variable__CELL_CYTOPLASM_Mg + Variable__CELL_CYTOPLASM_f23DPG -> Variable__CELL_CYTOPLASM_Mg23DPG; (Process__CELL_CYTOPLASM_Mg23DPG_kmgbpga*(3.2*0.001*(Process__CELL_CYTOPLASM_Mg23DPG_Kmgbpg + 10^(-1*Variable__CELL_CYTOPLASM_pHi*1e-13*N_A)*Process__CELL_CYTOPLASM_Mg23DPG_Khbpg*Process__CELL_CYTOPLASM_Mg23DPG_Kmghbpg)/(1 + 10^(-1*Variable__CELL_CYTOPLASM_pHi*1e-13*N_A)*Process__CELL_CYTOPLASM_Mg23DPG_Khbpg + 10^(-2*Variable__CELL_CYTOPLASM_pHi*1e-13*N_A)*Process__CELL_CYTOPLASM_Mg23DPG_Khbpg*Process__CELL_CYTOPLASM_Mg23DPG_Kh2bpg + Variable__CELL_CYTOPLASM_Ki*Process__CELL_CYTOPLASM_Mg23DPG_Kkbpg + Variable__CELL_CYTOPLASM_Ki*10^(-1*Variable__CELL_CYTOPLASM_pHi*1e-13*N_A)*Process__CELL_CYTOPLASM_Mg23DPG_Khbpg*Process__CELL_CYTOPLASM_Mg23DPG_Kkhbpg))*Variable__CELL_CYTOPLASM_Mg*Variable__CELL_CYTOPLASM_f23DPG - Process__CELL_CYTOPLASM_Mg23DPG_kmgbpgd*Variable__CELL_CYTOPLASM_Mg23DPG)*1e-13*N_A*Variable__CELL_CYTOPLASM_AC_Enzyme*1e-13*N_A/1000/N_A;  // modifiers: Variable__CELL_CYTOPLASM_pHi, Variable__CELL_CYTOPLASM_Ki, Variable__CELL_CYTOPLASM_AC_Enzyme
    Process__CELL_CYTOPLASM_Mg23DPG_Name = Mg_23DPG_binding_process; Process__CELL_CYTOPLASM_Mg23DPG_StepperID = DE1; Process__CELL_CYTOPLASM_Mg23DPG_Priority = 0; Process__CELL_CYTOPLASM_Mg23DPG_Kh2bpg = 4270000; Process__CELL_CYTOPLASM_Mg23DPG_Khbpg = 162000000; Process__CELL_CYTOPLASM_Mg23DPG_Kkbpg = 85.1; Process__CELL_CYTOPLASM_Mg23DPG_Kkhbpg = 8.9; Process__CELL_CYTOPLASM_Mg23DPG_Kmgbpg = 7410; Process__CELL_CYTOPLASM_Mg23DPG_Kmghbpg = 513; Process__CELL_CYTOPLASM_Mg23DPG_kmgbpga = 804000; Process__CELL_CYTOPLASM_Mg23DPG_kmgbpgd = 1200;
  Process__CELL_CYTOPLASM_MgADP: Variable__CELL_CYTOPLASM_Mg + Variable__CELL_CYTOPLASM_fADP -> Variable__CELL_CYTOPLASM_MgADP; (kmgadpa*((Kmgadp + 10^(-1*Variable__CELL_CYTOPLASM_pHi*1e-13*N_A)*Khadp*Kmghadp)/(1 + 10^(-1*Variable__CELL_CYTOPLASM_pHi*1e-13*N_A)*Khadp + Variable__CELL_CYTOPLASM_Ki*Kkadp))*Variable__CELL_CYTOPLASM_Mg*Variable__CELL_CYTOPLASM_fADP - kmgadpd*Variable__CELL_CYTOPLASM_MgADP)*1e-13*N_A*Variable__CELL_CYTOPLASM_AC_Enzyme*1e-13*N_A/1000/N_A;  // modifiers: Variable__CELL_CYTOPLASM_pHi, Variable__CELL_CYTOPLASM_Ki, Variable__CELL_CYTOPLASM_AC_Enzyme
    Process__CELL_CYTOPLASM_MgADP_Name = Mg_ADP_binding_process; Process__CELL_CYTOPLASM_MgADP_StepperID = DE1; Process__CELL_CYTOPLASM_MgADP_Priority = 0; Khadp = 5420000; Kkadp = 4.8; Kmgadp = 3290; Kmghadp = 107; kmgadpa = 1711.2; kmgadpd = 1200;
  Process__CELL_CYTOPLASM_MgAMP: Variable__CELL_CYTOPLASM_Mg + Variable__CELL_CYTOPLASM_fAMP -> Variable__CELL_CYTOPLASM_MgAMP; (Process__CELL_CYTOPLASM_MgAMP_Kma*Variable__CELL_CYTOPLASM_Mg*Variable__CELL_CYTOPLASM_fAMP - Process__CELL_CYTOPLASM_MgAMP_Kmd*Variable__CELL_CYTOPLASM_MgAMP)*1e-13*N_A*Variable__CELL_CYTOPLASM_AC_Enzyme*1e-13*N_A/1000/N_A;  // modifiers: Variable__CELL_CYTOPLASM_AC_Enzyme
    Process__CELL_CYTOPLASM_MgAMP_Name = Mg_AMP_binding_process; Process__CELL_CYTOPLASM_MgAMP_StepperID = DE1; Process__CELL_CYTOPLASM_MgAMP_Priority = 0; Process__CELL_CYTOPLASM_MgAMP_Kma = 54054; Process__CELL_CYTOPLASM_MgAMP_Kmd = 1200;
  Process__CELL_CYTOPLASM_MgATP: Variable__CELL_CYTOPLASM_Mg + Variable__CELL_CYTOPLASM_fATP -> Variable__CELL_CYTOPLASM_MgATP; (kmgatpa*((Kmgatp + 10^(-1*Variable__CELL_CYTOPLASM_pHi*1e-13*N_A)*Khatp*Kmghatp)/(1 + 10^(-1*Variable__CELL_CYTOPLASM_pHi*1e-13*N_A)*Khatp + Variable__CELL_CYTOPLASM_Ki*Kkatp))*Variable__CELL_CYTOPLASM_Mg*Variable__CELL_CYTOPLASM_fATP - kmgatpd*Variable__CELL_CYTOPLASM_MgATP)*1e-13*N_A*Variable__CELL_CYTOPLASM_AC_Enzyme*1e-13*N_A/1000/N_A;  // modifiers: Variable__CELL_CYTOPLASM_pHi, Variable__CELL_CYTOPLASM_Ki, Variable__CELL_CYTOPLASM_AC_Enzyme
    Process__CELL_CYTOPLASM_MgATP_Name = Mg_ATP_binding_process; Process__CELL_CYTOPLASM_MgATP_StepperID = DE1; Process__CELL_CYTOPLASM_MgATP_Priority = 0; Khatp = 9070000; Kkatp = 14; Kmgatp = 43200; Kmghatp = 748; kmgatpa = 2620.8; kmgatpd = 1200;
  Process__CELL_CYTOPLASM_MgFru16P2: Variable__CELL_CYTOPLASM_Mg + Variable__CELL_CYTOPLASM_FDP -> Variable__CELL_CYTOPLASM_MgFDP; (Process__CELL_CYTOPLASM_MgFru16P2_kmgf16p2a*(8.3*0.001*(Process__CELL_CYTOPLASM_MgFru16P2_Kmgfru16p2 + 10^(-1*Variable__CELL_CYTOPLASM_pHi*1e-13*N_A)*Process__CELL_CYTOPLASM_MgFru16P2_Khf*Process__CELL_CYTOPLASM_MgFru16P2_Kmghf)/(1 + 10^(-1*Variable__CELL_CYTOPLASM_pHi*1e-13*N_A)*Process__CELL_CYTOPLASM_MgFru16P2_Khf + 10^(-2*Variable__CELL_CYTOPLASM_pHi*1e-13*N_A)*Process__CELL_CYTOPLASM_MgFru16P2_Khf*Process__CELL_CYTOPLASM_MgFru16P2_Kh2f + Variable__CELL_CYTOPLASM_Ki*Process__CELL_CYTOPLASM_MgFru16P2_Kkf + Variable__CELL_CYTOPLASM_Ki*10^(-1*Variable__CELL_CYTOPLASM_pHi*1e-13*N_A)*Process__CELL_CYTOPLASM_MgFru16P2_Khf*Process__CELL_CYTOPLASM_MgFru16P2_Kkhf))*Variable__CELL_CYTOPLASM_Mg*Variable__CELL_CYTOPLASM_FDP - Process__CELL_CYTOPLASM_MgFru16P2_kmgf16p2d*Variable__CELL_CYTOPLASM_MgFDP)*1e-13*N_A*Variable__CELL_CYTOPLASM_AC_Enzyme*1e-13*N_A/1000/N_A;  // modifiers: Variable__CELL_CYTOPLASM_pHi, Variable__CELL_CYTOPLASM_Ki, Variable__CELL_CYTOPLASM_AC_Enzyme
    Process__CELL_CYTOPLASM_MgFru16P2_Name = Mg_Fru16P2_binding_process; Process__CELL_CYTOPLASM_MgFru16P2_StepperID = DE1; Process__CELL_CYTOPLASM_MgFru16P2_Priority = 0; Process__CELL_CYTOPLASM_MgFru16P2_Kh2f = 1120000; Process__CELL_CYTOPLASM_MgFru16P2_Khf = 7560000; Process__CELL_CYTOPLASM_MgFru16P2_Kkf = 10.7; Process__CELL_CYTOPLASM_MgFru16P2_Kkhf = 3.3; Process__CELL_CYTOPLASM_MgFru16P2_Kmgfru16p2 = 363; Process__CELL_CYTOPLASM_MgFru16P2_Kmghf = 89; Process__CELL_CYTOPLASM_MgFru16P2_kmgf16p2a = 480000; Process__CELL_CYTOPLASM_MgFru16P2_kmgf16p2d = 1200;
  Process__CELL_CYTOPLASM_MgGlc16P2: Variable__CELL_CYTOPLASM_Mg + Variable__CELL_CYTOPLASM_GDP -> Variable__CELL_CYTOPLASM_MgGDP; (Process__CELL_CYTOPLASM_MgGlc16P2_kmgf16p2a*(8.3*0.001*(Process__CELL_CYTOPLASM_MgGlc16P2_Kmgfru16p2 + 10^(-1*Variable__CELL_CYTOPLASM_pHi*1e-13*N_A)*Process__CELL_CYTOPLASM_MgGlc16P2_Khf*Process__CELL_CYTOPLASM_MgGlc16P2_Kmghf)/(1 + 10^(-1*Variable__CELL_CYTOPLASM_pHi*1e-13*N_A)*Process__CELL_CYTOPLASM_MgGlc16P2_Khf + 10^(-2*Variable__CELL_CYTOPLASM_pHi*1e-13*N_A)*Process__CELL_CYTOPLASM_MgGlc16P2_Khf*Process__CELL_CYTOPLASM_MgGlc16P2_Kh2f + Variable__CELL_CYTOPLASM_Ki*Process__CELL_CYTOPLASM_MgGlc16P2_Kkf + Variable__CELL_CYTOPLASM_Ki*10^(-1*Variable__CELL_CYTOPLASM_pHi*1e-13*N_A)*Process__CELL_CYTOPLASM_MgGlc16P2_Khf*Process__CELL_CYTOPLASM_MgGlc16P2_Kkhf))*Variable__CELL_CYTOPLASM_Mg*Variable__CELL_CYTOPLASM_GDP - Process__CELL_CYTOPLASM_MgGlc16P2_kmgf16p2d*Variable__CELL_CYTOPLASM_MgGDP)*1e-13*N_A*Variable__CELL_CYTOPLASM_AC_Enzyme*1e-13*N_A/1000/N_A;  // modifiers: Variable__CELL_CYTOPLASM_pHi, Variable__CELL_CYTOPLASM_Ki, Variable__CELL_CYTOPLASM_AC_Enzyme
    Process__CELL_CYTOPLASM_MgGlc16P2_Name = Mg_Glc16P2_binding_process; Process__CELL_CYTOPLASM_MgGlc16P2_StepperID = DE1; Process__CELL_CYTOPLASM_MgGlc16P2_Priority = 0; Process__CELL_CYTOPLASM_MgGlc16P2_Kh2f = 1120000; Process__CELL_CYTOPLASM_MgGlc16P2_Khf = 7560000; Process__CELL_CYTOPLASM_MgGlc16P2_Kkf = 10.7; Process__CELL_CYTOPLASM_MgGlc16P2_Kkhf = 3.3; Process__CELL_CYTOPLASM_MgGlc16P2_Kmgfru16p2 = 363; Process__CELL_CYTOPLASM_MgGlc16P2_Kmghf = 89; Process__CELL_CYTOPLASM_MgGlc16P2_kmgf16p2a = 480000; Process__CELL_CYTOPLASM_MgGlc16P2_kmgf16p2d = 1200;
  Process__CELL_CYTOPLASM_MgPhos: Variable__CELL_CYTOPLASM_Mg + Variable__CELL_CYTOPLASM_Pi -> Variable__CELL_CYTOPLASM_MgPi; (kmgphosa*((1 + 10^(-7.2)*Khphos + 0.15*Kkphos)/(1 + 10^(-1*Variable__CELL_CYTOPLASM_pHi*1e-13*N_A)*Khphos + Variable__CELL_CYTOPLASM_Ki*Kkphos))*Variable__CELL_CYTOPLASM_Mg*Variable__CELL_CYTOPLASM_Pi - kmgphosd*Variable__CELL_CYTOPLASM_MgPi)*1e-13*N_A*Variable__CELL_CYTOPLASM_AC_Enzyme*1e-13*N_A/1000/N_A;  // modifiers: Variable__CELL_CYTOPLASM_pHi, Variable__CELL_CYTOPLASM_Ki, Variable__CELL_CYTOPLASM_AC_Enzyme
    Process__CELL_CYTOPLASM_MgPhos_Name = Mg_Phos_binding_process; Process__CELL_CYTOPLASM_MgPhos_StepperID = DE1; Process__CELL_CYTOPLASM_MgPhos_Priority = 0; Khphos = 5680000; Kkphos = 3; kmgphosa = 40800; kmgphosd = 1200;
  Process__CELL_CYTOPLASM_OX: 2 Variable__CELL_CYTOPLASM_GSH -> Variable__CELL_CYTOPLASM_GSSG; Process__CELL_CYTOPLASM_OX_k*Variable__CELL_CYTOPLASM_GSH*1e-13*N_A*Variable__CELL_CYTOPLASM_AC_Enzyme*1e-13*N_A/1000/N_A;  // modifiers: Variable__CELL_CYTOPLASM_AC_Enzyme
    Process__CELL_CYTOPLASM_OX_Name = Glutathione_turnover; Process__CELL_CYTOPLASM_OX_StepperID = DE1; Process__CELL_CYTOPLASM_OX_Priority = 0; Process__CELL_CYTOPLASM_OX_k = 2.38e-5;
  Process__CELL_CYTOPLASM_OXNADH: Variable__CELL_CYTOPLASM_NADH -> Variable__CELL_CYTOPLASM_NAD; (Process__CELL_CYTOPLASM_OXNADH_Kma*Variable__CELL_CYTOPLASM_NADH - Process__CELL_CYTOPLASM_OXNADH_Kmd*Variable__CELL_CYTOPLASM_NAD)*1e-13*N_A*Variable__CELL_CYTOPLASM_AC_Enzyme*1e-13*N_A/1000/N_A;  // modifiers: Variable__CELL_CYTOPLASM_AC_Enzyme
    Process__CELL_CYTOPLASM_OXNADH_Name = Non_glycolytic_NADH_consumption_process; Process__CELL_CYTOPLASM_OXNADH_StepperID = DE1; Process__CELL_CYTOPLASM_OXNADH_Priority = 0; Process__CELL_CYTOPLASM_OXNADH_Kma = 0.0163; Process__CELL_CYTOPLASM_OXNADH_Kmd = 0;
  Process__CELL_CYTOPLASM_PNPase2: Variable__CELL_CYTOPLASM_GUO + Variable__CELL_CYTOPLASM_Pi -> Variable__CELL_CYTOPLASM_GUA + Variable__CELL_CYTOPLASM_R1P; Process__CELL_CYTOPLASM_PNPase2_k*Variable__CELL_CYTOPLASM_GUO*Variable__CELL_CYTOPLASM_Pi/N_A;  // modifiers: Variable__CELL_CYTOPLASM_pHi
    Process__CELL_CYTOPLASM_PNPase2_StepperID = DE1; Process__CELL_CYTOPLASM_PNPase2_Priority = 0; Process__CELL_CYTOPLASM_PNPase2_k = 1e8;
  Process__CELL_CYTOPLASM_band3ALD: Variable__CELL_CYTOPLASM_band3 + Variable__CELL_CYTOPLASM_E_ALD -> Variable__CELL_CYTOPLASM_band3ALD; (Process__CELL_CYTOPLASM_band3ALD_Kma*Variable__CELL_CYTOPLASM_band3*Variable__CELL_CYTOPLASM_E_ALD*Variable__CELL_CYTOPLASM_band3_ka*1e-13*N_A - Process__CELL_CYTOPLASM_band3ALD_Kmd*Variable__CELL_CYTOPLASM_band3ALD*Variable__CELL_CYTOPLASM_band3_kd*1e-13*N_A)*(Variable__CELL_CYTOPLASM_AC_Enzyme*1e-13*N_A/1000)*1e-13*N_A/N_A;  // modifiers: Variable__CELL_CYTOPLASM_band3_ka, Variable__CELL_CYTOPLASM_band3_kd, Variable__CELL_CYTOPLASM_AC_Enzyme
    Process__CELL_CYTOPLASM_band3ALD_Name = band3_ALD_binding_process; Process__CELL_CYTOPLASM_band3ALD_StepperID = DE1; Process__CELL_CYTOPLASM_band3ALD_Priority = 0; Process__CELL_CYTOPLASM_band3ALD_Kma = 1200000000; Process__CELL_CYTOPLASM_band3ALD_Kmd = 1200;
  Process__CELL_CYTOPLASM_band3GAPDH: Variable__CELL_CYTOPLASM_band3 + Variable__CELL_CYTOPLASM_E_GAPDH -> Variable__CELL_CYTOPLASM_band3GAPDH; (Process__CELL_CYTOPLASM_band3GAPDH_Kma*Variable__CELL_CYTOPLASM_band3*Variable__CELL_CYTOPLASM_E_GAPDH*Variable__CELL_CYTOPLASM_band3_ka*1e-13*N_A - Process__CELL_CYTOPLASM_band3GAPDH_Kmd*Variable__CELL_CYTOPLASM_band3GAPDH*Variable__CELL_CYTOPLASM_band3_kd*1e-13*N_A)*(Variable__CELL_CYTOPLASM_AC_Enzyme*1e-13*N_A/1000)*1e-13*N_A/N_A;  // modifiers: Variable__CELL_CYTOPLASM_band3_ka, Variable__CELL_CYTOPLASM_band3_kd, Variable__CELL_CYTOPLASM_AC_Enzyme
    Process__CELL_CYTOPLASM_band3GAPDH_Name = band3_GAPDH_binding_process; Process__CELL_CYTOPLASM_band3GAPDH_StepperID = DE1; Process__CELL_CYTOPLASM_band3GAPDH_Priority = 0; Process__CELL_CYTOPLASM_band3GAPDH_Kma = 2400000000; Process__CELL_CYTOPLASM_band3GAPDH_Kmd = 1200;
  Process__CELL_CYTOPLASM_band3PFK: Variable__CELL_CYTOPLASM_band3 + Variable__CELL_CYTOPLASM_E_PFK -> Variable__CELL_CYTOPLASM_band3PFK; (Process__CELL_CYTOPLASM_band3PFK_Kma*Variable__CELL_CYTOPLASM_band3*Variable__CELL_CYTOPLASM_E_PFK*Variable__CELL_CYTOPLASM_band3_ka*1e-13*N_A - Process__CELL_CYTOPLASM_band3PFK_Kmd*Variable__CELL_CYTOPLASM_band3PFK*Variable__CELL_CYTOPLASM_band3_kd*1e-13*N_A)*(Variable__CELL_CYTOPLASM_AC_Enzyme*1e-13*N_A/1000)*1e-13*N_A/N_A;  // modifiers: Variable__CELL_CYTOPLASM_band3_ka, Variable__CELL_CYTOPLASM_band3_kd, Variable__CELL_CYTOPLASM_AC_Enzyme
    Process__CELL_CYTOPLASM_band3PFK_Name = band3_PFK_binding_process; Process__CELL_CYTOPLASM_band3PFK_StepperID = DE1; Process__CELL_CYTOPLASM_band3PFK_Priority = 0; Process__CELL_CYTOPLASM_band3PFK_Kma = 6000000000; Process__CELL_CYTOPLASM_band3PFK_Kmd = 1200;
  Process__CELL_CYTOPLASM_band3deoxyHb: Variable__CELL_CYTOPLASM_band3 + Variable__CELL_CYTOPLASM_deoxyHb -> Variable__CELL_CYTOPLASM_band3deoxyHb; (Process__CELL_CYTOPLASM_band3deoxyHb_Kma*Variable__CELL_CYTOPLASM_band3*Variable__CELL_CYTOPLASM_deoxyHb*Variable__CELL_CYTOPLASM_band3_ka*1e-13*N_A - Process__CELL_CYTOPLASM_band3deoxyHb_Kmd*Variable__CELL_CYTOPLASM_band3deoxyHb*Variable__CELL_CYTOPLASM_band3_kd*1e-13*N_A)*(Variable__CELL_CYTOPLASM_AC_Enzyme*1e-13*N_A/1000)*1e-13*N_A/N_A;  // modifiers: Variable__CELL_CYTOPLASM_band3_ka, Variable__CELL_CYTOPLASM_band3_kd, Variable__CELL_CYTOPLASM_AC_Enzyme
    Process__CELL_CYTOPLASM_band3deoxyHb_Name = band3_deoxyHb_binding_process; Process__CELL_CYTOPLASM_band3deoxyHb_StepperID = DE1; Process__CELL_CYTOPLASM_band3deoxyHb_Priority = 0; Process__CELL_CYTOPLASM_band3deoxyHb_Kma = 12000000; Process__CELL_CYTOPLASM_band3deoxyHb_Kmd = 1200;
  Process__CELL_CYTOPLASM_band3deoxyHb13DPG: Variable__CELL_CYTOPLASM_band3 + Variable__CELL_CYTOPLASM_deoxyHb13DPG -> Variable__CELL_CYTOPLASM_band3deoxyHb13DPG; (Process__CELL_CYTOPLASM_band3deoxyHb13DPG_Kma*Variable__CELL_CYTOPLASM_band3*Variable__CELL_CYTOPLASM_deoxyHb13DPG*Variable__CELL_CYTOPLASM_band3_ka*1e-13*N_A - Process__CELL_CYTOPLASM_band3deoxyHb13DPG_Kmd*Variable__CELL_CYTOPLASM_band3deoxyHb13DPG*Variable__CELL_CYTOPLASM_band3_kd*1e-13*N_A)*(Variable__CELL_CYTOPLASM_AC_Enzyme*1e-13*N_A/1000)*1e-13*N_A/N_A;  // modifiers: Variable__CELL_CYTOPLASM_band3_ka, Variable__CELL_CYTOPLASM_band3_kd, Variable__CELL_CYTOPLASM_AC_Enzyme
    Process__CELL_CYTOPLASM_band3deoxyHb13DPG_Name = band3_deoxyHb13DPG_binding_process; Process__CELL_CYTOPLASM_band3deoxyHb13DPG_StepperID = DE1; Process__CELL_CYTOPLASM_band3deoxyHb13DPG_Priority = 0; Process__CELL_CYTOPLASM_band3deoxyHb13DPG_Kma = 12000000; Process__CELL_CYTOPLASM_band3deoxyHb13DPG_Kmd = 1200;
  Process__CELL_CYTOPLASM_band3deoxyHb23DPG: Variable__CELL_CYTOPLASM_band3 + Variable__CELL_CYTOPLASM_deoxyHb23DPG -> Variable__CELL_CYTOPLASM_band3deoxyHb23DPG; (Process__CELL_CYTOPLASM_band3deoxyHb23DPG_Kma*Variable__CELL_CYTOPLASM_band3*Variable__CELL_CYTOPLASM_deoxyHb23DPG*Variable__CELL_CYTOPLASM_band3_ka*1e-13*N_A - Process__CELL_CYTOPLASM_band3deoxyHb23DPG_Kmd*Variable__CELL_CYTOPLASM_band3deoxyHb23DPG*Variable__CELL_CYTOPLASM_band3_kd*1e-13*N_A)*(Variable__CELL_CYTOPLASM_AC_Enzyme*1e-13*N_A/1000)*1e-13*N_A/N_A;  // modifiers: Variable__CELL_CYTOPLASM_band3_ka, Variable__CELL_CYTOPLASM_band3_kd, Variable__CELL_CYTOPLASM_AC_Enzyme
    Process__CELL_CYTOPLASM_band3deoxyHb23DPG_Name = band3_deoxyHb23DPG_binding_process; Process__CELL_CYTOPLASM_band3deoxyHb23DPG_StepperID = DE1; Process__CELL_CYTOPLASM_band3deoxyHb23DPG_Priority = 0; Process__CELL_CYTOPLASM_band3deoxyHb23DPG_Kma = 12000000; Process__CELL_CYTOPLASM_band3deoxyHb23DPG_Kmd = 1200;
  Process__CELL_CYTOPLASM_band3deoxyHbADP: Variable__CELL_CYTOPLASM_band3 + Variable__CELL_CYTOPLASM_deoxyHbADP -> Variable__CELL_CYTOPLASM_band3deoxyHbADP; (Process__CELL_CYTOPLASM_band3deoxyHbADP_Kma*Variable__CELL_CYTOPLASM_band3*Variable__CELL_CYTOPLASM_deoxyHbADP*Variable__CELL_CYTOPLASM_band3_ka*1e-13*N_A - Process__CELL_CYTOPLASM_band3deoxyHbADP_Kmd*Variable__CELL_CYTOPLASM_band3deoxyHbADP*Variable__CELL_CYTOPLASM_band3_kd*1e-13*N_A)*(Variable__CELL_CYTOPLASM_AC_Enzyme*1e-13*N_A/1000)*1e-13*N_A/N_A;  // modifiers: Variable__CELL_CYTOPLASM_band3_ka, Variable__CELL_CYTOPLASM_band3_kd, Variable__CELL_CYTOPLASM_AC_Enzyme
    Process__CELL_CYTOPLASM_band3deoxyHbADP_Name = band3_deoxyHb_binding_process; Process__CELL_CYTOPLASM_band3deoxyHbADP_StepperID = DE1; Process__CELL_CYTOPLASM_band3deoxyHbADP_Priority = 0; Process__CELL_CYTOPLASM_band3deoxyHbADP_Kma = 12000000; Process__CELL_CYTOPLASM_band3deoxyHbADP_Kmd = 1200;
  Process__CELL_CYTOPLASM_band3deoxyHbATP: Variable__CELL_CYTOPLASM_band3 + Variable__CELL_CYTOPLASM_deoxyHbATP -> Variable__CELL_CYTOPLASM_band3deoxyHbATP; (Process__CELL_CYTOPLASM_band3deoxyHbATP_Kma*Variable__CELL_CYTOPLASM_band3*Variable__CELL_CYTOPLASM_deoxyHbATP*Variable__CELL_CYTOPLASM_band3_ka*1e-13*N_A - Process__CELL_CYTOPLASM_band3deoxyHbATP_Kmd*Variable__CELL_CYTOPLASM_band3deoxyHbATP*Variable__CELL_CYTOPLASM_band3_kd*1e-13*N_A)*(Variable__CELL_CYTOPLASM_AC_Enzyme*1e-13*N_A/1000)*1e-13*N_A/N_A;  // modifiers: Variable__CELL_CYTOPLASM_band3_ka, Variable__CELL_CYTOPLASM_band3_kd, Variable__CELL_CYTOPLASM_AC_Enzyme
    Process__CELL_CYTOPLASM_band3deoxyHbATP_Name = band3_deoxyHbATP_binding_process; Process__CELL_CYTOPLASM_band3deoxyHbATP_StepperID = DE1; Process__CELL_CYTOPLASM_band3deoxyHbATP_Priority = 0; Process__CELL_CYTOPLASM_band3deoxyHbATP_Kma = 12000000; Process__CELL_CYTOPLASM_band3deoxyHbATP_Kmd = 1200;
  Process__CELL_CYTOPLASM_band3deoxyHbFDP: Variable__CELL_CYTOPLASM_band3 + Variable__CELL_CYTOPLASM_deoxyHbFDP -> Variable__CELL_CYTOPLASM_band3deoxyHbFDP; (Process__CELL_CYTOPLASM_band3deoxyHbFDP_Kma*Variable__CELL_CYTOPLASM_band3*Variable__CELL_CYTOPLASM_deoxyHbFDP*Variable__CELL_CYTOPLASM_band3_ka*1e-13*N_A - Process__CELL_CYTOPLASM_band3deoxyHbFDP_Kmd*Variable__CELL_CYTOPLASM_band3deoxyHbFDP*Variable__CELL_CYTOPLASM_band3_kd*1e-13*N_A)*(Variable__CELL_CYTOPLASM_AC_Enzyme*1e-13*N_A/1000)*1e-13*N_A/N_A;  // modifiers: Variable__CELL_CYTOPLASM_band3_ka, Variable__CELL_CYTOPLASM_band3_kd, Variable__CELL_CYTOPLASM_AC_Enzyme
    Process__CELL_CYTOPLASM_band3deoxyHbFDP_Name = band3_deoxyHbFDP_binding_process; Process__CELL_CYTOPLASM_band3deoxyHbFDP_StepperID = DE1; Process__CELL_CYTOPLASM_band3deoxyHbFDP_Priority = 0; Process__CELL_CYTOPLASM_band3deoxyHbFDP_Kma = 12000000; Process__CELL_CYTOPLASM_band3deoxyHbFDP_Kmd = 1200;
  Process__CELL_CYTOPLASM_band3deoxyHbGDP: Variable__CELL_CYTOPLASM_band3 + Variable__CELL_CYTOPLASM_deoxyHbGDP -> Variable__CELL_CYTOPLASM_band3deoxyHbGDP; (Process__CELL_CYTOPLASM_band3deoxyHbGDP_Kma*Variable__CELL_CYTOPLASM_band3*Variable__CELL_CYTOPLASM_deoxyHbGDP*Variable__CELL_CYTOPLASM_band3_ka*1e-13*N_A - Process__CELL_CYTOPLASM_band3deoxyHbGDP_Kmd*Variable__CELL_CYTOPLASM_band3deoxyHbGDP*Variable__CELL_CYTOPLASM_band3_kd*1e-13*N_A)*(Variable__CELL_CYTOPLASM_AC_Enzyme*1e-13*N_A/1000)*1e-13*N_A/N_A;  // modifiers: Variable__CELL_CYTOPLASM_band3_ka, Variable__CELL_CYTOPLASM_band3_kd, Variable__CELL_CYTOPLASM_AC_Enzyme
    Process__CELL_CYTOPLASM_band3deoxyHbGDP_Name = band3_deoxyHbGDP_binding_process; Process__CELL_CYTOPLASM_band3deoxyHbGDP_StepperID = DE1; Process__CELL_CYTOPLASM_band3deoxyHbGDP_Priority = 0; Process__CELL_CYTOPLASM_band3deoxyHbGDP_Kma = 12000000; Process__CELL_CYTOPLASM_band3deoxyHbGDP_Kmd = 1200;
  Process__CELL_CYTOPLASM_band3deoxyHbMgATP: Variable__CELL_CYTOPLASM_band3 + Variable__CELL_CYTOPLASM_deoxyHbMgATP -> Variable__CELL_CYTOPLASM_band3deoxyHbMgATP; (Process__CELL_CYTOPLASM_band3deoxyHbMgATP_Kma*Variable__CELL_CYTOPLASM_band3*Variable__CELL_CYTOPLASM_deoxyHbMgATP*Variable__CELL_CYTOPLASM_band3_ka*1e-13*N_A - Process__CELL_CYTOPLASM_band3deoxyHbMgATP_Kmd*Variable__CELL_CYTOPLASM_band3deoxyHbMgATP*Variable__CELL_CYTOPLASM_band3_kd*1e-13*N_A)*(Variable__CELL_CYTOPLASM_AC_Enzyme*1e-13*N_A/1000)*1e-13*N_A/N_A;  // modifiers: Variable__CELL_CYTOPLASM_band3_ka, Variable__CELL_CYTOPLASM_band3_kd, Variable__CELL_CYTOPLASM_AC_Enzyme
    Process__CELL_CYTOPLASM_band3deoxyHbMgATP_Name = band3_deoxyHbMgATP_binding_process; Process__CELL_CYTOPLASM_band3deoxyHbMgATP_StepperID = DE1; Process__CELL_CYTOPLASM_band3deoxyHbMgATP_Priority = 0; Process__CELL_CYTOPLASM_band3deoxyHbMgATP_Kma = 12000000; Process__CELL_CYTOPLASM_band3deoxyHbMgATP_Kmd = 1200;
  Process__CELL_CYTOPLASM_band3oxyHb: Variable__CELL_CYTOPLASM_band3 + Variable__CELL_CYTOPLASM_oxyHb -> Variable__CELL_CYTOPLASM_band3oxyHb; (Process__CELL_CYTOPLASM_band3oxyHb_Kma*Variable__CELL_CYTOPLASM_band3*Variable__CELL_CYTOPLASM_oxyHb*Variable__CELL_CYTOPLASM_band3_ka*1e-13*N_A - Process__CELL_CYTOPLASM_band3oxyHb_Kmd*Variable__CELL_CYTOPLASM_band3oxyHb*Variable__CELL_CYTOPLASM_band3_kd*1e-13*N_A)*(Variable__CELL_CYTOPLASM_AC_Enzyme*1e-13*N_A/1000)*1e-13*N_A/N_A;  // modifiers: Variable__CELL_CYTOPLASM_band3_ka, Variable__CELL_CYTOPLASM_band3_kd, Variable__CELL_CYTOPLASM_AC_Enzyme
    Process__CELL_CYTOPLASM_band3oxyHb_Name = band3_oxyHb_binding_process; Process__CELL_CYTOPLASM_band3oxyHb_StepperID = DE1; Process__CELL_CYTOPLASM_band3oxyHb_Priority = 0; Process__CELL_CYTOPLASM_band3oxyHb_Kma = 120000; Process__CELL_CYTOPLASM_band3oxyHb_Kmd = 1200;
  Process__CELL_CYTOPLASM_band3oxyHb13DPG: Variable__CELL_CYTOPLASM_band3 + Variable__CELL_CYTOPLASM_oxyHb13DPG -> Variable__CELL_CYTOPLASM_band3oxyHb13DPG; (Process__CELL_CYTOPLASM_band3oxyHb13DPG_Kma*Variable__CELL_CYTOPLASM_band3*Variable__CELL_CYTOPLASM_oxyHb13DPG*Variable__CELL_CYTOPLASM_band3_ka*1e-13*N_A - Process__CELL_CYTOPLASM_band3oxyHb13DPG_Kmd*Variable__CELL_CYTOPLASM_band3oxyHb13DPG*Variable__CELL_CYTOPLASM_band3_kd*1e-13*N_A)*(Variable__CELL_CYTOPLASM_AC_Enzyme*1e-13*N_A/1000)*1e-13*N_A/N_A;  // modifiers: Variable__CELL_CYTOPLASM_band3_ka, Variable__CELL_CYTOPLASM_band3_kd, Variable__CELL_CYTOPLASM_AC_Enzyme
    Process__CELL_CYTOPLASM_band3oxyHb13DPG_Name = band3_oxyHb13DPG_binding_process; Process__CELL_CYTOPLASM_band3oxyHb13DPG_StepperID = DE1; Process__CELL_CYTOPLASM_band3oxyHb13DPG_Priority = 0; Process__CELL_CYTOPLASM_band3oxyHb13DPG_Kma = 120000; Process__CELL_CYTOPLASM_band3oxyHb13DPG_Kmd = 1200;
  Process__CELL_CYTOPLASM_band3oxyHb23DPG: Variable__CELL_CYTOPLASM_band3 + Variable__CELL_CYTOPLASM_oxyHb23DPG -> Variable__CELL_CYTOPLASM_band3oxyHb23DPG; (Process__CELL_CYTOPLASM_band3oxyHb23DPG_Kma*Variable__CELL_CYTOPLASM_band3*Variable__CELL_CYTOPLASM_oxyHb23DPG*Variable__CELL_CYTOPLASM_band3_ka*1e-13*N_A - Process__CELL_CYTOPLASM_band3oxyHb23DPG_Kmd*Variable__CELL_CYTOPLASM_band3oxyHb23DPG*Variable__CELL_CYTOPLASM_band3_kd*1e-13*N_A)*(Variable__CELL_CYTOPLASM_AC_Enzyme*1e-13*N_A/1000)*1e-13*N_A/N_A;  // modifiers: Variable__CELL_CYTOPLASM_band3_ka, Variable__CELL_CYTOPLASM_band3_kd, Variable__CELL_CYTOPLASM_AC_Enzyme
    Process__CELL_CYTOPLASM_band3oxyHb23DPG_Name = band3_oxyHb23DPG_binding_process; Process__CELL_CYTOPLASM_band3oxyHb23DPG_StepperID = DE1; Process__CELL_CYTOPLASM_band3oxyHb23DPG_Priority = 0; Process__CELL_CYTOPLASM_band3oxyHb23DPG_Kma = 120000; Process__CELL_CYTOPLASM_band3oxyHb23DPG_Kmd = 1200;
  Process__CELL_CYTOPLASM_band3oxyHbADP: Variable__CELL_CYTOPLASM_band3 + Variable__CELL_CYTOPLASM_oxyHbADP -> Variable__CELL_CYTOPLASM_band3oxyHbADP; (Process__CELL_CYTOPLASM_band3oxyHbADP_Kma*Variable__CELL_CYTOPLASM_band3*Variable__CELL_CYTOPLASM_oxyHbADP*Variable__CELL_CYTOPLASM_band3_ka*1e-13*N_A - Process__CELL_CYTOPLASM_band3oxyHbADP_Kmd*Variable__CELL_CYTOPLASM_band3oxyHbADP*Variable__CELL_CYTOPLASM_band3_kd*1e-13*N_A)*(Variable__CELL_CYTOPLASM_AC_Enzyme*1e-13*N_A/1000)*1e-13*N_A/N_A;  // modifiers: Variable__CELL_CYTOPLASM_band3_ka, Variable__CELL_CYTOPLASM_band3_kd, Variable__CELL_CYTOPLASM_AC_Enzyme
    Process__CELL_CYTOPLASM_band3oxyHbADP_Name = band3_oxyHbADP_binding_process; Process__CELL_CYTOPLASM_band3oxyHbADP_StepperID = DE1; Process__CELL_CYTOPLASM_band3oxyHbADP_Priority = 0; Process__CELL_CYTOPLASM_band3oxyHbADP_Kma = 120000; Process__CELL_CYTOPLASM_band3oxyHbADP_Kmd = 1200;
  Process__CELL_CYTOPLASM_band3oxyHbATP: Variable__CELL_CYTOPLASM_band3 + Variable__CELL_CYTOPLASM_oxyHbATP -> Variable__CELL_CYTOPLASM_band3oxyHbATP; (Process__CELL_CYTOPLASM_band3oxyHbATP_Kma*Variable__CELL_CYTOPLASM_band3*Variable__CELL_CYTOPLASM_oxyHbATP*Variable__CELL_CYTOPLASM_band3_ka*1e-13*N_A - Process__CELL_CYTOPLASM_band3oxyHbATP_Kmd*Variable__CELL_CYTOPLASM_band3oxyHbATP*Variable__CELL_CYTOPLASM_band3_kd*1e-13*N_A)*(Variable__CELL_CYTOPLASM_AC_Enzyme*1e-13*N_A/1000)*1e-13*N_A/N_A;  // modifiers: Variable__CELL_CYTOPLASM_band3_ka, Variable__CELL_CYTOPLASM_band3_kd, Variable__CELL_CYTOPLASM_AC_Enzyme
    Process__CELL_CYTOPLASM_band3oxyHbATP_Name = band3_oxyHbATP_binding_process; Process__CELL_CYTOPLASM_band3oxyHbATP_StepperID = DE1; Process__CELL_CYTOPLASM_band3oxyHbATP_Priority = 0; Process__CELL_CYTOPLASM_band3oxyHbATP_Kma = 120000; Process__CELL_CYTOPLASM_band3oxyHbATP_Kmd = 1200;
  Process__CELL_CYTOPLASM_band3oxyHbMgATP: Variable__CELL_CYTOPLASM_band3 + Variable__CELL_CYTOPLASM_oxyHbMgATP -> Variable__CELL_CYTOPLASM_band3oxyHbMgATP; (Process__CELL_CYTOPLASM_band3oxyHbMgATP_Kma*Variable__CELL_CYTOPLASM_band3*Variable__CELL_CYTOPLASM_oxyHbMgATP*Variable__CELL_CYTOPLASM_band3_ka*1e-13*N_A - Process__CELL_CYTOPLASM_band3oxyHbMgATP_Kmd*Variable__CELL_CYTOPLASM_band3oxyHbMgATP*Variable__CELL_CYTOPLASM_band3_kd*1e-13*N_A)*(Variable__CELL_CYTOPLASM_AC_Enzyme*1e-13*N_A/1000)*1e-13*N_A/N_A;  // modifiers: Variable__CELL_CYTOPLASM_band3_ka, Variable__CELL_CYTOPLASM_band3_kd, Variable__CELL_CYTOPLASM_AC_Enzyme
    Process__CELL_CYTOPLASM_band3oxyHbMgATP_Name = band3_oxyHbMgATP_binding_process; Process__CELL_CYTOPLASM_band3oxyHbMgATP_StepperID = DE1; Process__CELL_CYTOPLASM_band3oxyHbMgATP_Priority = 0; Process__CELL_CYTOPLASM_band3oxyHbMgATP_Kma = 120000; Process__CELL_CYTOPLASM_band3oxyHbMgATP_Kmd = 1200;
  Process__CELL_CYTOPLASM_deoxyHb13DPG: Variable__CELL_CYTOPLASM_deoxyHb + Variable__CELL_CYTOPLASM__13DPG -> Variable__CELL_CYTOPLASM_deoxyHb13DPG; (Process__CELL_CYTOPLASM_deoxyHb13DPG_ka*((1 + 2*Process__CELL_CYTOPLASM_deoxyHb13DPG_Kahb/10^(-7.2) + (Process__CELL_CYTOPLASM_deoxyHb13DPG_Kahb/10^(-7.2))^2)/(1 + 2*Process__CELL_CYTOPLASM_deoxyHb13DPG_Kahb/10^(-1*Variable__CELL_CYTOPLASM_pHi*1e-13*N_A) + (Process__CELL_CYTOPLASM_deoxyHb13DPG_Kahb/10^(-1*Variable__CELL_CYTOPLASM_pHi*1e-13*N_A))^2))*Variable__CELL_CYTOPLASM_deoxyHb*Variable__CELL_CYTOPLASM__13DPG - Process__CELL_CYTOPLASM_deoxyHb13DPG_kd*Variable__CELL_CYTOPLASM_deoxyHb13DPG)*(Variable__CELL_CYTOPLASM_AC_Enzyme*1e-13*N_A/1000)*1e-13*N_A/N_A;  // modifiers: Variable__CELL_CYTOPLASM_pHi, Variable__CELL_CYTOPLASM_AC_Enzyme
    Process__CELL_CYTOPLASM_deoxyHb13DPG_Name = deoxyHb_13DPG_binding_process; Process__CELL_CYTOPLASM_deoxyHb13DPG_StepperID = DE1; Process__CELL_CYTOPLASM_deoxyHb13DPG_Priority = 0; Process__CELL_CYTOPLASM_deoxyHb13DPG_Kahb = 1e-6; Process__CELL_CYTOPLASM_deoxyHb13DPG_ka = 1860000; Process__CELL_CYTOPLASM_deoxyHb13DPG_kd = 1200;
  Process__CELL_CYTOPLASM_deoxyHb23DPG: Variable__CELL_CYTOPLASM_deoxyHb + Variable__CELL_CYTOPLASM_f23DPG -> Variable__CELL_CYTOPLASM_deoxyHb23DPG; (Process__CELL_CYTOPLASM_deoxyHb23DPG_ka*((1 + 2*Process__CELL_CYTOPLASM_deoxyHb23DPG_Kahb/10^(-7.2) + (Process__CELL_CYTOPLASM_deoxyHb23DPG_Kahb/10^(-7.2))^2)/(1 + 2*Process__CELL_CYTOPLASM_deoxyHb23DPG_Kahb/10^(-1*Variable__CELL_CYTOPLASM_pHi*1e-13*N_A) + (Process__CELL_CYTOPLASM_deoxyHb23DPG_Kahb/10^(-1*Variable__CELL_CYTOPLASM_pHi*1e-13*N_A))^2))*Variable__CELL_CYTOPLASM_deoxyHb*Variable__CELL_CYTOPLASM_f23DPG - Process__CELL_CYTOPLASM_deoxyHb23DPG_kd*Variable__CELL_CYTOPLASM_deoxyHb23DPG)*(Variable__CELL_CYTOPLASM_AC_Enzyme*1e-13*N_A/1000)*1e-13*N_A/N_A;  // modifiers: Variable__CELL_CYTOPLASM_pHi, Variable__CELL_CYTOPLASM_AC_Enzyme
    Process__CELL_CYTOPLASM_deoxyHb23DPG_Name = deoxyHb_23DPG_binding_process; Process__CELL_CYTOPLASM_deoxyHb23DPG_StepperID = DE1; Process__CELL_CYTOPLASM_deoxyHb23DPG_Priority = 0; Process__CELL_CYTOPLASM_deoxyHb23DPG_Kahb = 1e-6; Process__CELL_CYTOPLASM_deoxyHb23DPG_ka = 6000000; Process__CELL_CYTOPLASM_deoxyHb23DPG_kd = 1200;
  Process__CELL_CYTOPLASM_deoxyHbADP: Variable__CELL_CYTOPLASM_deoxyHb + Variable__CELL_CYTOPLASM_fADP -> Variable__CELL_CYTOPLASM_deoxyHbADP; (Process__CELL_CYTOPLASM_deoxyHbADP_ka*((1 + 2*Process__CELL_CYTOPLASM_deoxyHbADP_Kahb/10^(-7.2) + (Process__CELL_CYTOPLASM_deoxyHbADP_Kahb/10^(-7.2))^2)/(1 + 2*Process__CELL_CYTOPLASM_deoxyHbADP_Kahb/10^(-1*Variable__CELL_CYTOPLASM_pHi*1e-13*N_A) + (Process__CELL_CYTOPLASM_deoxyHbADP_Kahb/10^(-1*Variable__CELL_CYTOPLASM_pHi*1e-13*N_A))^2))*Variable__CELL_CYTOPLASM_deoxyHb*Variable__CELL_CYTOPLASM_fADP - Process__CELL_CYTOPLASM_deoxyHbADP_kd*Variable__CELL_CYTOPLASM_deoxyHbADP)*(Variable__CELL_CYTOPLASM_AC_Enzyme*1e-13*N_A/1000)*1e-13*N_A/N_A;  // modifiers: Variable__CELL_CYTOPLASM_pHi, Variable__CELL_CYTOPLASM_AC_Enzyme
    Process__CELL_CYTOPLASM_deoxyHbADP_Name = deoxyHb_ADP_binding_process; Process__CELL_CYTOPLASM_deoxyHbADP_StepperID = DE1; Process__CELL_CYTOPLASM_deoxyHbADP_Priority = 0; Process__CELL_CYTOPLASM_deoxyHbADP_Kahb = 1e-6; Process__CELL_CYTOPLASM_deoxyHbADP_ka = 1440000; Process__CELL_CYTOPLASM_deoxyHbADP_kd = 1200;
  Process__CELL_CYTOPLASM_deoxyHbATP: Variable__CELL_CYTOPLASM_deoxyHb + Variable__CELL_CYTOPLASM_fATP -> Variable__CELL_CYTOPLASM_deoxyHbATP; (Process__CELL_CYTOPLASM_deoxyHbATP_ka*((1 + 2*Process__CELL_CYTOPLASM_deoxyHbATP_Kahb/10^(-7.2) + (Process__CELL_CYTOPLASM_deoxyHbATP_Kahb/10^(-7.2))^2)/(1 + 2*Process__CELL_CYTOPLASM_deoxyHbATP_Kahb/10^(-1*Variable__CELL_CYTOPLASM_pHi*1e-13*N_A) + (Process__CELL_CYTOPLASM_deoxyHbATP_Kahb/10^(-1*Variable__CELL_CYTOPLASM_pHi*1e-13*N_A))^2))*Variable__CELL_CYTOPLASM_deoxyHb*Variable__CELL_CYTOPLASM_fATP - Process__CELL_CYTOPLASM_deoxyHbATP_kd*Variable__CELL_CYTOPLASM_deoxyHbATP)*(Variable__CELL_CYTOPLASM_AC_Enzyme*1e-13*N_A/1000)*1e-13*N_A/N_A;  // modifiers: Variable__CELL_CYTOPLASM_pHi, Variable__CELL_CYTOPLASM_AC_Enzyme
    Process__CELL_CYTOPLASM_deoxyHbATP_Name = deoxyHb_ADP_binding_process; Process__CELL_CYTOPLASM_deoxyHbATP_StepperID = DE1; Process__CELL_CYTOPLASM_deoxyHbATP_Priority = 0; Process__CELL_CYTOPLASM_deoxyHbATP_Kahb = 1e-6; Process__CELL_CYTOPLASM_deoxyHbATP_ka = 3120000; Process__CELL_CYTOPLASM_deoxyHbATP_kd = 1200;
  Process__CELL_CYTOPLASM_deoxyHbFDP: Variable__CELL_CYTOPLASM_deoxyHb + Variable__CELL_CYTOPLASM_FDP -> Variable__CELL_CYTOPLASM_deoxyHbFDP; (Process__CELL_CYTOPLASM_deoxyHbFDP_ka*((1 + 2*Process__CELL_CYTOPLASM_deoxyHbFDP_Kahb/10^(-7.2) + (Process__CELL_CYTOPLASM_deoxyHbFDP_Kahb/10^(-7.2))^2)/(1 + 2*Process__CELL_CYTOPLASM_deoxyHbFDP_Kahb/10^(-1*Variable__CELL_CYTOPLASM_pHi*1e-13*N_A) + (Process__CELL_CYTOPLASM_deoxyHbFDP_Kahb/10^(-1*Variable__CELL_CYTOPLASM_pHi*1e-13*N_A))^2))*Variable__CELL_CYTOPLASM_deoxyHb*Variable__CELL_CYTOPLASM_FDP - Process__CELL_CYTOPLASM_deoxyHbFDP_kd*Variable__CELL_CYTOPLASM_deoxyHbFDP)*(Variable__CELL_CYTOPLASM_AC_Enzyme*1e-13*N_A/1000)*1e-13*N_A/N_A;  // modifiers: Variable__CELL_CYTOPLASM_pHi, Variable__CELL_CYTOPLASM_AC_Enzyme
    Process__CELL_CYTOPLASM_deoxyHbFDP_Name = deoxyHb_FDP_binding_process; Process__CELL_CYTOPLASM_deoxyHbFDP_StepperID = DE1; Process__CELL_CYTOPLASM_deoxyHbFDP_Priority = 0; Process__CELL_CYTOPLASM_deoxyHbFDP_Kahb = 1e-6; Process__CELL_CYTOPLASM_deoxyHbFDP_ka = 1212000; Process__CELL_CYTOPLASM_deoxyHbFDP_kd = 1200;
  Process__CELL_CYTOPLASM_deoxyHbGDP: Variable__CELL_CYTOPLASM_deoxyHb + Variable__CELL_CYTOPLASM_GDP -> Variable__CELL_CYTOPLASM_deoxyHbGDP; (Process__CELL_CYTOPLASM_deoxyHbGDP_ka*((1 + 2*Process__CELL_CYTOPLASM_deoxyHbGDP_Kahb/10^(-7.2) + (Process__CELL_CYTOPLASM_deoxyHbGDP_Kahb/10^(-7.2))^2)/(1 + 2*Process__CELL_CYTOPLASM_deoxyHbGDP_Kahb/10^(-1*Variable__CELL_CYTOPLASM_pHi*1e-13*N_A) + (Process__CELL_CYTOPLASM_deoxyHbGDP_Kahb/10^(-1*Variable__CELL_CYTOPLASM_pHi*1e-13*N_A))^2))*Variable__CELL_CYTOPLASM_deoxyHb*Variable__CELL_CYTOPLASM_GDP - Process__CELL_CYTOPLASM_deoxyHbGDP_kd*Variable__CELL_CYTOPLASM_deoxyHbGDP)*(Variable__CELL_CYTOPLASM_AC_Enzyme*1e-13*N_A/1000)*1e-13*N_A/N_A;  // modifiers: Variable__CELL_CYTOPLASM_pHi, Variable__CELL_CYTOPLASM_AC_Enzyme
    Process__CELL_CYTOPLASM_deoxyHbGDP_Name = deoxyHb_GDP_binding_process; Process__CELL_CYTOPLASM_deoxyHbGDP_StepperID = DE1; Process__CELL_CYTOPLASM_deoxyHbGDP_Priority = 0; Process__CELL_CYTOPLASM_deoxyHbGDP_Kahb = 1e-6; Process__CELL_CYTOPLASM_deoxyHbGDP_ka = 1212000; Process__CELL_CYTOPLASM_deoxyHbGDP_kd = 1200;
  Process__CELL_CYTOPLASM_deoxyHbMgATP: Variable__CELL_CYTOPLASM_deoxyHb + Variable__CELL_CYTOPLASM_MgATP -> Variable__CELL_CYTOPLASM_deoxyHbMgATP; (Process__CELL_CYTOPLASM_deoxyHbMgATP_ka*((1 + 2*Process__CELL_CYTOPLASM_deoxyHbMgATP_Kahb/10^(-7.2) + (Process__CELL_CYTOPLASM_deoxyHbMgATP_Kahb/10^(-7.2))^2)/(1 + 2*Process__CELL_CYTOPLASM_deoxyHbMgATP_Kahb/10^(-1*Variable__CELL_CYTOPLASM_pHi*1e-13*N_A) + (Process__CELL_CYTOPLASM_deoxyHbMgATP_Kahb/10^(-1*Variable__CELL_CYTOPLASM_pHi*1e-13*N_A))^2))*Variable__CELL_CYTOPLASM_deoxyHb*Variable__CELL_CYTOPLASM_MgATP - Process__CELL_CYTOPLASM_deoxyHbMgATP_kd*Variable__CELL_CYTOPLASM_deoxyHbMgATP)*(Variable__CELL_CYTOPLASM_AC_Enzyme*1e-13*N_A/1000)*1e-13*N_A/N_A;  // modifiers: Variable__CELL_CYTOPLASM_pHi, Variable__CELL_CYTOPLASM_AC_Enzyme
    Process__CELL_CYTOPLASM_deoxyHbMgATP_Name = deoxyHb_MgATP_binding_process; Process__CELL_CYTOPLASM_deoxyHbMgATP_StepperID = DE1; Process__CELL_CYTOPLASM_deoxyHbMgATP_Priority = 0; Process__CELL_CYTOPLASM_deoxyHbMgATP_Kahb = 1e-6; Process__CELL_CYTOPLASM_deoxyHbMgATP_ka = 168000; Process__CELL_CYTOPLASM_deoxyHbMgATP_kd = 1200;
  Process__CELL_CYTOPLASM_deoxyTOoxy: Variable__CELL_CYTOPLASM_deoxyHb -> Variable__CELL_CYTOPLASM_oxyHb; Variable__CELL_CYTOPLASM_deoxyHb*1e-13*N_A*Process__CELL_CYTOPLASM_deoxyTOoxy_k/N_A;
    Process__CELL_CYTOPLASM_deoxyTOoxy_Name = deoxyHb_to_oxyHb; Process__CELL_CYTOPLASM_deoxyTOoxy_StepperID = DE1; Process__CELL_CYTOPLASM_deoxyTOoxy_Priority = 0; Process__CELL_CYTOPLASM_deoxyTOoxy_k = 0.00001;
  Process__CELL_CYTOPLASM_oxyHb13DPG: Variable__CELL_CYTOPLASM_oxyHb + Variable__CELL_CYTOPLASM__13DPG -> Variable__CELL_CYTOPLASM_oxyHb13DPG; (Process__CELL_CYTOPLASM_oxyHb13DPG_ka*((1 + 2*Process__CELL_CYTOPLASM_oxyHb13DPG_Kahb/10^(-7.2) + (Process__CELL_CYTOPLASM_oxyHb13DPG_Kahb/10^(-7.2))^2)/(1 + 2*Process__CELL_CYTOPLASM_oxyHb13DPG_Kahb/10^(-1*Variable__CELL_CYTOPLASM_pHi*1e-13*N_A) + (Process__CELL_CYTOPLASM_oxyHb13DPG_Kahb/10^(-1*Variable__CELL_CYTOPLASM_pHi*1e-13*N_A))^2))*Variable__CELL_CYTOPLASM_oxyHb*Variable__CELL_CYTOPLASM__13DPG - Process__CELL_CYTOPLASM_oxyHb13DPG_kd*Variable__CELL_CYTOPLASM_oxyHb13DPG)*(Variable__CELL_CYTOPLASM_AC_Enzyme*1e-13*N_A/1000)*1e-13*N_A/N_A;  // modifiers: Variable__CELL_CYTOPLASM_pHi, Variable__CELL_CYTOPLASM_AC_Enzyme
    Process__CELL_CYTOPLASM_oxyHb13DPG_Name = oxyHb_13DPG_binding_process; Process__CELL_CYTOPLASM_oxyHb13DPG_StepperID = DE1; Process__CELL_CYTOPLASM_oxyHb13DPG_Priority = 0; Process__CELL_CYTOPLASM_oxyHb13DPG_Kahb = 1e-6; Process__CELL_CYTOPLASM_oxyHb13DPG_ka = 380000; Process__CELL_CYTOPLASM_oxyHb13DPG_kd = 1200;
  Process__CELL_CYTOPLASM_oxyHb23DPG: Variable__CELL_CYTOPLASM_oxyHb + Variable__CELL_CYTOPLASM_f23DPG -> Variable__CELL_CYTOPLASM_oxyHb23DPG; (Process__CELL_CYTOPLASM_oxyHb23DPG_ka*((1 + 2*Process__CELL_CYTOPLASM_oxyHb23DPG_Kahb/10^(-7.2) + (Process__CELL_CYTOPLASM_oxyHb23DPG_Kahb/10^(-7.2))^2)/(1 + 2*Process__CELL_CYTOPLASM_oxyHb23DPG_Kahb/10^(-1*Variable__CELL_CYTOPLASM_pHi*1e-13*N_A) + (Process__CELL_CYTOPLASM_oxyHb23DPG_Kahb/10^(-1*Variable__CELL_CYTOPLASM_pHi*1e-13*N_A))^2))*Variable__CELL_CYTOPLASM_oxyHb*Variable__CELL_CYTOPLASM_f23DPG - Process__CELL_CYTOPLASM_oxyHb23DPG_kd*Variable__CELL_CYTOPLASM_oxyHb23DPG)*(Variable__CELL_CYTOPLASM_AC_Enzyme*1e-13*N_A/1000)*1e-13*N_A/N_A;  // modifiers: Variable__CELL_CYTOPLASM_pHi, Variable__CELL_CYTOPLASM_AC_Enzyme
    Process__CELL_CYTOPLASM_oxyHb23DPG_Name = oxyHb_23DPG_binding_process; Process__CELL_CYTOPLASM_oxyHb23DPG_StepperID = DE1; Process__CELL_CYTOPLASM_oxyHb23DPG_Priority = 0; Process__CELL_CYTOPLASM_oxyHb23DPG_Kahb = 1e-6; Process__CELL_CYTOPLASM_oxyHb23DPG_ka = 300000; Process__CELL_CYTOPLASM_oxyHb23DPG_kd = 1200;
  Process__CELL_CYTOPLASM_oxyHbADP: Variable__CELL_CYTOPLASM_oxyHb + Variable__CELL_CYTOPLASM_fADP -> Variable__CELL_CYTOPLASM_oxyHbADP; (Process__CELL_CYTOPLASM_oxyHbADP_ka*((1 + 2*Process__CELL_CYTOPLASM_oxyHbADP_Kahb/10^(-7.2) + (Process__CELL_CYTOPLASM_oxyHbADP_Kahb/10^(-7.2))^2)/(1 + 2*Process__CELL_CYTOPLASM_oxyHbADP_Kahb/10^(-1*Variable__CELL_CYTOPLASM_pHi*1e-13*N_A) + (Process__CELL_CYTOPLASM_oxyHbADP_Kahb/10^(-1*Variable__CELL_CYTOPLASM_pHi*1e-13*N_A))^2))*Variable__CELL_CYTOPLASM_oxyHb*Variable__CELL_CYTOPLASM_fADP - Process__CELL_CYTOPLASM_oxyHbADP_kd*Variable__CELL_CYTOPLASM_oxyHbADP)*(Variable__CELL_CYTOPLASM_AC_Enzyme*1e-13*N_A/1000)*1e-13*N_A/N_A;  // modifiers: Variable__CELL_CYTOPLASM_pHi, Variable__CELL_CYTOPLASM_AC_Enzyme
    Process__CELL_CYTOPLASM_oxyHbADP_Name = oxyHb_ADP_binding_process; Process__CELL_CYTOPLASM_oxyHbADP_StepperID = DE1; Process__CELL_CYTOPLASM_oxyHbADP_Priority = 0; Process__CELL_CYTOPLASM_oxyHbADP_Kahb = 1e-6; Process__CELL_CYTOPLASM_oxyHbADP_ka = 300000; Process__CELL_CYTOPLASM_oxyHbADP_kd = 1200;
  Process__CELL_CYTOPLASM_oxyHbATP: Variable__CELL_CYTOPLASM_oxyHb + Variable__CELL_CYTOPLASM_fATP -> Variable__CELL_CYTOPLASM_oxyHbATP; (Process__CELL_CYTOPLASM_oxyHbATP_ka*((1 + 2*Process__CELL_CYTOPLASM_oxyHbATP_Kahb/10^(-7.2) + (Process__CELL_CYTOPLASM_oxyHbATP_Kahb/10^(-7.2))^2)/(1 + 2*Process__CELL_CYTOPLASM_oxyHbATP_Kahb/10^(-1*Variable__CELL_CYTOPLASM_pHi*1e-13*N_A) + (Process__CELL_CYTOPLASM_oxyHbATP_Kahb/10^(-1*Variable__CELL_CYTOPLASM_pHi*1e-13*N_A))^2))*Variable__CELL_CYTOPLASM_oxyHb*Variable__CELL_CYTOPLASM_fATP - Process__CELL_CYTOPLASM_oxyHbATP_kd*Variable__CELL_CYTOPLASM_oxyHbATP)*(Variable__CELL_CYTOPLASM_AC_Enzyme*1e-13*N_A/1000)*1e-13*N_A/N_A;  // modifiers: Variable__CELL_CYTOPLASM_pHi, Variable__CELL_CYTOPLASM_AC_Enzyme
    Process__CELL_CYTOPLASM_oxyHbATP_Name = oxyHb_ATP_binding_process; Process__CELL_CYTOPLASM_oxyHbATP_StepperID = DE1; Process__CELL_CYTOPLASM_oxyHbATP_Priority = 0; Process__CELL_CYTOPLASM_oxyHbATP_Kahb = 1e-6; Process__CELL_CYTOPLASM_oxyHbATP_ka = 432000; Process__CELL_CYTOPLASM_oxyHbATP_kd = 1200;
  Process__CELL_CYTOPLASM_oxyHbMgATP: Variable__CELL_CYTOPLASM_oxyHb + Variable__CELL_CYTOPLASM_MgATP -> Variable__CELL_CYTOPLASM_oxyHbMgATP; (Process__CELL_CYTOPLASM_oxyHbMgATP_ka*((1 + 2*Process__CELL_CYTOPLASM_oxyHbMgATP_Kahb/10^(-7.2) + (Process__CELL_CYTOPLASM_oxyHbMgATP_Kahb/10^(-7.2))^2)/(1 + 2*Process__CELL_CYTOPLASM_oxyHbMgATP_Kahb/10^(-1*Variable__CELL_CYTOPLASM_pHi*1e-13*N_A) + (Process__CELL_CYTOPLASM_oxyHbMgATP_Kahb/10^(-1*Variable__CELL_CYTOPLASM_pHi*1e-13*N_A))^2))*Variable__CELL_CYTOPLASM_oxyHb*Variable__CELL_CYTOPLASM_MgATP - Process__CELL_CYTOPLASM_oxyHbMgATP_kd*Variable__CELL_CYTOPLASM_oxyHbMgATP)*(Variable__CELL_CYTOPLASM_AC_Enzyme*1e-13*N_A/1000)*1e-13*N_A/N_A;  // modifiers: Variable__CELL_CYTOPLASM_pHi, Variable__CELL_CYTOPLASM_AC_Enzyme
    Process__CELL_CYTOPLASM_oxyHbMgATP_Name = oxyHb_MgATP_binding_process; Process__CELL_CYTOPLASM_oxyHbMgATP_StepperID = DE1; Process__CELL_CYTOPLASM_oxyHbMgATP_Priority = 0; Process__CELL_CYTOPLASM_oxyHbMgATP_Kahb = 1e-6; Process__CELL_CYTOPLASM_oxyHbMgATP_ka = 46800; Process__CELL_CYTOPLASM_oxyHbMgATP_kd = 1200;
  Process__CELL_CYTOPLASM_oxyTOdeoxy: Variable__CELL_CYTOPLASM_oxyHb -> Variable__CELL_CYTOPLASM_deoxyHb; Variable__CELL_CYTOPLASM_oxyHb*1e-13*N_A*Process__CELL_CYTOPLASM_oxyTOdeoxy_k/N_A;
    Process__CELL_CYTOPLASM_oxyTOdeoxy_Name = oxyHb_to_deoxyHb; Process__CELL_CYTOPLASM_oxyTOdeoxy_StepperID = DE1; Process__CELL_CYTOPLASM_oxyTOdeoxy_Priority = 0; Process__CELL_CYTOPLASM_oxyTOdeoxy_k = 0;
  Process__CELL_CYTOPLASM_pH_modified: Variable__CELL_CYTOPLASM_pHi -> ; (b*b - 4*a*(c - Variable__CELL_CYTOPLASM_pHi*1e-13*N_A))^0.5*Process__CELL_CYTOPLASM_pH_modified_k/N_A;
    Process__CELL_CYTOPLASM_pH_modified_StepperID = DE1; Process__CELL_CYTOPLASM_pH_modified_Priority = 0; a = 8.12964098e-14; b = -5.22312442e-7; c = 7.60206619; Process__CELL_CYTOPLASM_pH_modified_k = 1;
  Process__CELL_MEMBRANE_E_ADEtr: Variable__CELL_CYTOPLASM_ADE -> Variable__ENVIRONMENT_ADEe; Process__CELL_MEMBRANE_E_ADEtr_Vm*(1000*Variable__CELL_CYTOPLASM_ADE/(Process__CELL_MEMBRANE_E_ADEtr_Km + 1000*Variable__CELL_CYTOPLASM_ADE) - 1000*Variable__ENVIRONMENT_ADEe/(Process__CELL_MEMBRANE_E_ADEtr_Km + 1000*Variable__ENVIRONMENT_ADEe))*1e-13*N_A*(Variable__CELL_CYTOPLASM_AC_Enzyme*1e-13*N_A/1000/1000/3600)/N_A;  // modifiers: Variable__CELL_MEMBRANE_E_ADEtr, Variable__CELL_CYTOPLASM_AC_Enzyme
    Process__CELL_MEMBRANE_E_ADEtr_Name = Adenine_transport_process; Process__CELL_MEMBRANE_E_ADEtr_StepperID = DE1; Process__CELL_MEMBRANE_E_ADEtr_Priority = 0; Process__CELL_MEMBRANE_E_ADEtr_Km = 2.6; Process__CELL_MEMBRANE_E_ADEtr_Vm = 90;
  Process__CELL_MEMBRANE_E_ADEtrSUB: Variable__ENVIRONMENT_ADEe -> ; Process__CELL_MEMBRANE_E_ADEtrSUB_Vm*(1000*Variable__CELL_CYTOPLASM_ADE/(Process__CELL_MEMBRANE_E_ADEtrSUB_Km + 1000*Variable__CELL_CYTOPLASM_ADE) - 1000*Variable__ENVIRONMENT_ADEe/(Process__CELL_MEMBRANE_E_ADEtrSUB_Km + 1000*Variable__ENVIRONMENT_ADEe))*1e-13*N_A*(Variable__CELL_CYTOPLASM_AC_Enzyme*1e-13*N_A/1000/1000/3600)*Process__CELL_MEMBRANE_E_ADEtrSUB_SW/N_A;  // modifiers: Variable__CELL_CYTOPLASM_ADE, Variable__CELL_MEMBRANE_E_ADEtr, Variable__CELL_CYTOPLASM_AC_Enzyme
    Process__CELL_MEMBRANE_E_ADEtrSUB_Name = Adenine_transport_process2; Process__CELL_MEMBRANE_E_ADEtrSUB_StepperID = DE1; Process__CELL_MEMBRANE_E_ADEtrSUB_Priority = 0; Process__CELL_MEMBRANE_E_ADEtrSUB_Km = 2.6; Process__CELL_MEMBRANE_E_ADEtrSUB_SW = 0; Process__CELL_MEMBRANE_E_ADEtrSUB_Vm = 90;
  Process__CELL_MEMBRANE_E_ADEtrSUB_efflux: -> Variable__ENVIRONMENT_ADEe_ef; Process__CELL_MEMBRANE_E_ADEtrSUB_efflux_Vm*(1000*Variable__CELL_CYTOPLASM_ADE/(Process__CELL_MEMBRANE_E_ADEtrSUB_efflux_Km + 1000*Variable__CELL_CYTOPLASM_ADE) - 1000*Variable__ENVIRONMENT_ADEe/(Process__CELL_MEMBRANE_E_ADEtrSUB_efflux_Km + 1000*Variable__ENVIRONMENT_ADEe))*1e-13*N_A*(Variable__CELL_CYTOPLASM_AC_Enzyme*1e-13*N_A/1000/1000/3600)*Process__CELL_MEMBRANE_E_ADEtrSUB_efflux_SW/N_A;  // modifiers: Variable__CELL_CYTOPLASM_ADE, Variable__CELL_MEMBRANE_E_ADEtr, Variable__CELL_CYTOPLASM_AC_Enzyme, Variable__ENVIRONMENT_ADEe
    Process__CELL_MEMBRANE_E_ADEtrSUB_efflux_Name = adenine_efflux_calc; Process__CELL_MEMBRANE_E_ADEtrSUB_efflux_StepperID = DE1; Process__CELL_MEMBRANE_E_ADEtrSUB_efflux_Priority = 0; Process__CELL_MEMBRANE_E_ADEtrSUB_efflux_Km = 2.6; Process__CELL_MEMBRANE_E_ADEtrSUB_efflux_SW = 0; Process__CELL_MEMBRANE_E_ADEtrSUB_efflux_Vm = 90;
  Process__CELL_MEMBRANE_E_ADOtr: Variable__CELL_CYTOPLASM_ADO -> Variable__ENVIRONMENT_ADOe; Process__CELL_MEMBRANE_E_ADOtr_Vm*(1000*Variable__CELL_CYTOPLASM_ADO/(Process__CELL_MEMBRANE_E_ADOtr_Km + 1000*Variable__CELL_CYTOPLASM_ADO) - 1000*Variable__ENVIRONMENT_ADOe/(Process__CELL_MEMBRANE_E_ADOtr_Km + 1000*Variable__ENVIRONMENT_ADOe))*1e-13*N_A*(Variable__CELL_CYTOPLASM_AC_Enzyme*1e-13*N_A/1000/1000/3600)/N_A;  // modifiers: Variable__CELL_MEMBRANE_E_ADOtr, Variable__CELL_CYTOPLASM_AC_Enzyme
    Process__CELL_MEMBRANE_E_ADOtr_Name = adenosine_transport_process; Process__CELL_MEMBRANE_E_ADOtr_StepperID = DE1; Process__CELL_MEMBRANE_E_ADOtr_Priority = 0; Process__CELL_MEMBRANE_E_ADOtr_Km = 0.12; Process__CELL_MEMBRANE_E_ADOtr_Vm = 61.2;
  Process__CELL_MEMBRANE_E_ADOtrSUB: Variable__ENVIRONMENT_ADOe -> ; Process__CELL_MEMBRANE_E_ADOtrSUB_Vm*(1000*Variable__CELL_CYTOPLASM_ADO/(Process__CELL_MEMBRANE_E_ADOtrSUB_Km + 1000*Variable__CELL_CYTOPLASM_ADO) - 1000*Variable__ENVIRONMENT_ADOe/(Process__CELL_MEMBRANE_E_ADOtrSUB_Km + 1000*Variable__ENVIRONMENT_ADOe))*1e-13*N_A*(Variable__CELL_CYTOPLASM_AC_Enzyme*1e-13*N_A/1000/1000/3600)*Process__CELL_MEMBRANE_E_ADOtrSUB_SW/N_A;  // modifiers: Variable__CELL_CYTOPLASM_ADO, Variable__CELL_MEMBRANE_E_ADOtr, Variable__CELL_CYTOPLASM_AC_Enzyme
    Process__CELL_MEMBRANE_E_ADOtrSUB_Name = adenosine_transport_process2; Process__CELL_MEMBRANE_E_ADOtrSUB_StepperID = DE1; Process__CELL_MEMBRANE_E_ADOtrSUB_Priority = 0; Process__CELL_MEMBRANE_E_ADOtrSUB_Km = 0.12; Process__CELL_MEMBRANE_E_ADOtrSUB_SW = 0; Process__CELL_MEMBRANE_E_ADOtrSUB_Vm = 61.2;
  Process__CELL_MEMBRANE_E_ADOtrSUB_efflux: -> Variable__ENVIRONMENT_ADOe_ef; Process__CELL_MEMBRANE_E_ADOtrSUB_efflux_Vm*(1000*Variable__CELL_CYTOPLASM_ADO/(Process__CELL_MEMBRANE_E_ADOtrSUB_efflux_Km + 1000*Variable__CELL_CYTOPLASM_ADO) - 1000*Variable__ENVIRONMENT_ADOe/(Process__CELL_MEMBRANE_E_ADOtrSUB_efflux_Km + 1000*Variable__ENVIRONMENT_ADOe))*1e-13*N_A*(Variable__CELL_CYTOPLASM_AC_Enzyme*1e-13*N_A/1000/1000/3600)*Process__CELL_MEMBRANE_E_ADOtrSUB_efflux_SW/N_A;  // modifiers: Variable__CELL_CYTOPLASM_ADO, Variable__CELL_MEMBRANE_E_ADOtr, Variable__CELL_CYTOPLASM_AC_Enzyme, Variable__ENVIRONMENT_ADOe
    Process__CELL_MEMBRANE_E_ADOtrSUB_efflux_Name = adenosine_efflux_calc; Process__CELL_MEMBRANE_E_ADOtrSUB_efflux_StepperID = DE1; Process__CELL_MEMBRANE_E_ADOtrSUB_efflux_Priority = 0; Process__CELL_MEMBRANE_E_ADOtrSUB_efflux_Km = 0.12; Process__CELL_MEMBRANE_E_ADOtrSUB_efflux_SW = 0; Process__CELL_MEMBRANE_E_ADOtrSUB_efflux_Vm = 61.2;
  Process__CELL_MEMBRANE_E_HXtr: Variable__CELL_CYTOPLASM_HXi -> Variable__ENVIRONMENT_HXe; (Process__CELL_MEMBRANE_E_HXtr_Pm*1000*Variable__CELL_CYTOPLASM_HXi + Process__CELL_MEMBRANE_E_HXtr_Vm*(1000*Variable__CELL_CYTOPLASM_HXi/(1000*Variable__CELL_CYTOPLASM_HXi + Process__CELL_MEMBRANE_E_HXtr_Km)) - Process__CELL_MEMBRANE_E_HXtr_Vmin*1000*Variable__ENVIRONMENT_HXe/(Process__CELL_MEMBRANE_E_HXtr_Kmin*(1 + 1000*Variable__ENVIRONMENT_ADEe/Process__CELL_MEMBRANE_E_HXtr_Ki) + 1000*Variable__ENVIRONMENT_HXe))*1e-13*N_A*(Variable__CELL_CYTOPLASM_AC_Enzyme*1e-13*N_A/1000/1000/3600)/N_A;  // modifiers: Variable__CELL_MEMBRANE_E_HXtr, Variable__CELL_CYTOPLASM_AC_Enzyme, Variable__ENVIRONMENT_ADEe
    Process__CELL_MEMBRANE_E_HXtr_Name = Hypoxanthine_transport_process; Process__CELL_MEMBRANE_E_HXtr_StepperID = DE1; Process__CELL_MEMBRANE_E_HXtr_Priority = 0; Process__CELL_MEMBRANE_E_HXtr_Ki = 0.012; Process__CELL_MEMBRANE_E_HXtr_Km = 0.4; Process__CELL_MEMBRANE_E_HXtr_Kmin = 0.18; Process__CELL_MEMBRANE_E_HXtr_Pm = 37.8; Process__CELL_MEMBRANE_E_HXtr_Vm = 151.6; Process__CELL_MEMBRANE_E_HXtr_Vmin = 100.8;
  Process__CELL_MEMBRANE_E_HXtrSUB: Variable__ENVIRONMENT_HXe -> ; (Process__CELL_MEMBRANE_E_HXtrSUB_Pm*1000*Variable__CELL_CYTOPLASM_HXi + Process__CELL_MEMBRANE_E_HXtrSUB_Vm*(1000*Variable__CELL_CYTOPLASM_HXi/(1000*Variable__CELL_CYTOPLASM_HXi + Process__CELL_MEMBRANE_E_HXtrSUB_Km)) - Process__CELL_MEMBRANE_E_HXtrSUB_Vmin*1000*Variable__ENVIRONMENT_HXe/(Process__CELL_MEMBRANE_E_HXtrSUB_Kmin*(1 + 1000*Variable__ENVIRONMENT_ADEe/Process__CELL_MEMBRANE_E_HXtrSUB_Ki) + 1000*Variable__ENVIRONMENT_HXe))*1e-13*N_A*(Variable__CELL_CYTOPLASM_AC_Enzyme*1e-13*N_A/1000/1000/3600)*Process__CELL_MEMBRANE_E_HXtrSUB_SW/N_A;  // modifiers: Variable__CELL_CYTOPLASM_HXi, Variable__CELL_MEMBRANE_E_HXtr, Variable__CELL_CYTOPLASM_AC_Enzyme, Variable__ENVIRONMENT_ADEe
    Process__CELL_MEMBRANE_E_HXtrSUB_Name = Hypoxanthine_transport_process2; Process__CELL_MEMBRANE_E_HXtrSUB_StepperID = DE1; Process__CELL_MEMBRANE_E_HXtrSUB_Priority = 0; Process__CELL_MEMBRANE_E_HXtrSUB_Ki = 0.012; Process__CELL_MEMBRANE_E_HXtrSUB_Km = 0.4; Process__CELL_MEMBRANE_E_HXtrSUB_Kmin = 0.18; Process__CELL_MEMBRANE_E_HXtrSUB_Pm = 37.8; Process__CELL_MEMBRANE_E_HXtrSUB_Vm = 151.6; Process__CELL_MEMBRANE_E_HXtrSUB_Vmin = 100.8; Process__CELL_MEMBRANE_E_HXtrSUB_SW = 0;
  Process__CELL_MEMBRANE_E_HXtrSUB_efflux: -> Variable__ENVIRONMENT_HXe_ef; (Process__CELL_MEMBRANE_E_HXtrSUB_efflux_Pm*1000*Variable__CELL_CYTOPLASM_HXi + Process__CELL_MEMBRANE_E_HXtrSUB_efflux_Vm*(1000*Variable__CELL_CYTOPLASM_HXi/(1000*Variable__CELL_CYTOPLASM_HXi + Process__CELL_MEMBRANE_E_HXtrSUB_efflux_Km)) - Process__CELL_MEMBRANE_E_HXtrSUB_efflux_Vmin*1000*Variable__ENVIRONMENT_HXe/(Process__CELL_MEMBRANE_E_HXtrSUB_efflux_Kmin*(1 + 1000*Variable__ENVIRONMENT_ADEe/Process__CELL_MEMBRANE_E_HXtrSUB_efflux_Ki) + 1000*Variable__ENVIRONMENT_HXe))*1e-13*N_A*(Variable__CELL_CYTOPLASM_AC_Enzyme*1e-13*N_A/1000/1000/3600)*Process__CELL_MEMBRANE_E_HXtrSUB_efflux_SW/N_A;  // modifiers: Variable__CELL_CYTOPLASM_HXi, Variable__CELL_MEMBRANE_E_HXtr, Variable__CELL_CYTOPLASM_AC_Enzyme, Variable__ENVIRONMENT_ADEe, Variable__ENVIRONMENT_HXe
    Process__CELL_MEMBRANE_E_HXtrSUB_efflux_Name = Hypoxanthine_efflux_calc; Process__CELL_MEMBRANE_E_HXtrSUB_efflux_StepperID = DE1; Process__CELL_MEMBRANE_E_HXtrSUB_efflux_Priority = 0; Process__CELL_MEMBRANE_E_HXtrSUB_efflux_Ki = 0.012; Process__CELL_MEMBRANE_E_HXtrSUB_efflux_Km = 0.4; Process__CELL_MEMBRANE_E_HXtrSUB_efflux_Kmin = 0.18; Process__CELL_MEMBRANE_E_HXtrSUB_efflux_Pm = 37.8; Process__CELL_MEMBRANE_E_HXtrSUB_efflux_Vm = 151.6; Process__CELL_MEMBRANE_E_HXtrSUB_efflux_Vmin = 100.8; Process__CELL_MEMBRANE_E_HXtrSUB_efflux_SW = 0;
  Process__CELL_MEMBRANE_E_INOtr: Variable__CELL_CYTOPLASM_INO -> Variable__ENVIRONMENT_INOe; Process__CELL_MEMBRANE_E_INOtr_Vm*(1000*Variable__CELL_CYTOPLASM_INO/(Process__CELL_MEMBRANE_E_INOtr_Km + 1000*Variable__CELL_CYTOPLASM_INO) - 1000*Variable__ENVIRONMENT_INOe/(Process__CELL_MEMBRANE_E_INOtr_Km + 1000*Variable__ENVIRONMENT_INOe))*1e-13*N_A*(Variable__CELL_CYTOPLASM_AC_Enzyme*1e-13*N_A/1000/1000/3600)/N_A;  // modifiers: Variable__CELL_MEMBRANE_E_INOtr, Variable__CELL_CYTOPLASM_AC_Enzyme
    Process__CELL_MEMBRANE_E_INOtr_Name = Inosine_transport_process; Process__CELL_MEMBRANE_E_INOtr_StepperID = DE1; Process__CELL_MEMBRANE_E_INOtr_Priority = 0; Process__CELL_MEMBRANE_E_INOtr_Km = 0.12; Process__CELL_MEMBRANE_E_INOtr_Vm = 61.2;
  Process__CELL_MEMBRANE_E_INOtrSUB: Variable__ENVIRONMENT_INOe -> ; Process__CELL_MEMBRANE_E_INOtrSUB_Vm*(1000*Variable__CELL_CYTOPLASM_INO/(Process__CELL_MEMBRANE_E_INOtrSUB_Km + 1000*Variable__CELL_CYTOPLASM_INO) - 1000*Variable__ENVIRONMENT_INOe/(Process__CELL_MEMBRANE_E_INOtrSUB_Km + 1000*Variable__ENVIRONMENT_INOe))*1e-13*N_A*(Variable__CELL_CYTOPLASM_AC_Enzyme*1e-13*N_A/1000/1000/3600)*Process__CELL_MEMBRANE_E_INOtrSUB_SW/N_A;  // modifiers: Variable__CELL_CYTOPLASM_INO, Variable__CELL_MEMBRANE_E_INOtr, Variable__CELL_CYTOPLASM_AC_Enzyme
    Process__CELL_MEMBRANE_E_INOtrSUB_Name = Inosine_transport_process2; Process__CELL_MEMBRANE_E_INOtrSUB_StepperID = DE1; Process__CELL_MEMBRANE_E_INOtrSUB_Priority = 0; Process__CELL_MEMBRANE_E_INOtrSUB_Km = 0.12; Process__CELL_MEMBRANE_E_INOtrSUB_SW = 0; Process__CELL_MEMBRANE_E_INOtrSUB_Vm = 61.2;
  Process__CELL_MEMBRANE_E_INOtrSUB_efflux: -> Variable__ENVIRONMENT_INOe_ef; Process__CELL_MEMBRANE_E_INOtrSUB_efflux_Vm*(1000*Variable__CELL_CYTOPLASM_INO/(Process__CELL_MEMBRANE_E_INOtrSUB_efflux_Km + 1000*Variable__CELL_CYTOPLASM_INO) - 1000*Variable__ENVIRONMENT_INOe/(Process__CELL_MEMBRANE_E_INOtrSUB_efflux_Km + 1000*Variable__ENVIRONMENT_INOe))*1e-13*N_A*(Variable__CELL_CYTOPLASM_AC_Enzyme*1e-13*N_A/1000/1000/3600)*Process__CELL_MEMBRANE_E_INOtrSUB_efflux_SW/N_A;  // modifiers: Variable__CELL_CYTOPLASM_INO, Variable__CELL_MEMBRANE_E_INOtr, Variable__CELL_CYTOPLASM_AC_Enzyme, Variable__ENVIRONMENT_INOe
    Process__CELL_MEMBRANE_E_INOtrSUB_efflux_Name = Inosine_efflux_calc; Process__CELL_MEMBRANE_E_INOtrSUB_efflux_StepperID = DE1; Process__CELL_MEMBRANE_E_INOtrSUB_efflux_Priority = 0; Process__CELL_MEMBRANE_E_INOtrSUB_efflux_Km = 0.12; Process__CELL_MEMBRANE_E_INOtrSUB_efflux_SW = 0; Process__CELL_MEMBRANE_E_INOtrSUB_efflux_Vm = 61.2;
  Process__CELL_MEMBRANE_E_K_Leak: Variable__ENVIRONMENT_Ke -> Variable__CELL_CYTOPLASM_Ki; (Process__CELL_MEMBRANE_E_K_Leak_Kx*Process__CELL_MEMBRANE_E_K_Leak_z*ln(Process__CELL_MEMBRANE_E_K_Leak_r)*(1000*Variable__ENVIRONMENT_Ke - Process__CELL_MEMBRANE_E_K_Leak_r*1000*Variable__CELL_CYTOPLASM_Ki)/(Process__CELL_MEMBRANE_E_K_Leak_r - 1) + Process__CELL_MEMBRANE_E_K_Leak_Vm*(1000*Variable__ENVIRONMENT_Ke/(Process__CELL_MEMBRANE_E_K_Leak_Km + 1000*Variable__ENVIRONMENT_Ke) - Process__CELL_MEMBRANE_E_K_Leak_r*1000*Variable__CELL_CYTOPLASM_Ki/(Process__CELL_MEMBRANE_E_K_Leak_Km + Process__CELL_MEMBRANE_E_K_Leak_r*1000*Variable__CELL_CYTOPLASM_Ki)))*1e-13*N_A*Variable__CELL_CYTOPLASM_AC_Purine*1e-13*N_A/1000/1000/3600/N_A;  // modifiers: Variable__CELL_MEMBRANE_E_K_Leak, Variable__CELL_CYTOPLASM_AC_Purine
    Process__CELL_MEMBRANE_E_K_Leak_Name = Potassium_leakage_process; Process__CELL_MEMBRANE_E_K_Leak_StepperID = DE1; Process__CELL_MEMBRANE_E_K_Leak_Priority = 0; Process__CELL_MEMBRANE_E_K_Leak_Km = 4; Process__CELL_MEMBRANE_E_K_Leak_Kx = 0.00635; Process__CELL_MEMBRANE_E_K_Leak_Vm = 3.12; Process__CELL_MEMBRANE_E_K_Leak_r = 0.62; Process__CELL_MEMBRANE_E_K_Leak_z = 1;
  Process__CELL_MEMBRANE_E_K_LeakSUB: -> Variable__ENVIRONMENT_Ke; (Process__CELL_MEMBRANE_E_K_LeakSUB_Kx*Process__CELL_MEMBRANE_E_K_LeakSUB_z*ln(Process__CELL_MEMBRANE_E_K_LeakSUB_r)*(1000*Variable__ENVIRONMENT_Ke - Process__CELL_MEMBRANE_E_K_LeakSUB_r*1000*Variable__CELL_CYTOPLASM_Ki)/(Process__CELL_MEMBRANE_E_K_LeakSUB_r - 1) + Process__CELL_MEMBRANE_E_K_LeakSUB_Vm*(1000*Variable__ENVIRONMENT_Ke/(Process__CELL_MEMBRANE_E_K_LeakSUB_Km + 1000*Variable__ENVIRONMENT_Ke) - Process__CELL_MEMBRANE_E_K_LeakSUB_r*1000*Variable__CELL_CYTOPLASM_Ki/(Process__CELL_MEMBRANE_E_K_LeakSUB_Km + Process__CELL_MEMBRANE_E_K_LeakSUB_r*1000*Variable__CELL_CYTOPLASM_Ki)))*1e-13*N_A*Variable__CELL_CYTOPLASM_AC_Purine*1e-13*N_A/1000/1000/3600*Process__CELL_MEMBRANE_E_K_LeakSUB_SW/N_A;  // modifiers: Variable__CELL_MEMBRANE_E_K_Leak, Variable__CELL_CYTOPLASM_AC_Purine, Variable__CELL_CYTOPLASM_Ki
    Process__CELL_MEMBRANE_E_K_LeakSUB_Name = Potassium_leakage_process2; Process__CELL_MEMBRANE_E_K_LeakSUB_Priority = 0; Process__CELL_MEMBRANE_E_K_LeakSUB_StepperID = DE1; Process__CELL_MEMBRANE_E_K_LeakSUB_Km = 4; Process__CELL_MEMBRANE_E_K_LeakSUB_Kx = 0.00635; Process__CELL_MEMBRANE_E_K_LeakSUB_Vm = 3.12; Process__CELL_MEMBRANE_E_K_LeakSUB_r = 0.62; Process__CELL_MEMBRANE_E_K_LeakSUB_z = 1; Process__CELL_MEMBRANE_E_K_LeakSUB_SW = 0;
  Process__CELL_MEMBRANE_E_LACtr: Variable__CELL_CYTOPLASM_LACi -> Variable__ENVIRONMENT_LACe; 1e-13*N_A*(Process__CELL_MEMBRANE_E_LACtr_k0*Variable__CELL_CYTOPLASM_LACi - Process__CELL_MEMBRANE_E_LACtr_k1*Variable__ENVIRONMENT_LACe)*(Variable__CELL_CYTOPLASM_AC_Enzyme*1e-13*N_A/1000)/N_A;  // modifiers: Variable__CELL_MEMBRANE_E_LACtr, Variable__CELL_CYTOPLASM_AC_Enzyme
    Process__CELL_MEMBRANE_E_LACtr_Name = Lactate_transport_process; Process__CELL_MEMBRANE_E_LACtr_StepperID = DE1; Process__CELL_MEMBRANE_E_LACtr_Priority = 0; Process__CELL_MEMBRANE_E_LACtr_k0 = 0.00733; Process__CELL_MEMBRANE_E_LACtr_k1 = 0.00506;
  Process__CELL_MEMBRANE_E_LACtrSUB: Variable__ENVIRONMENT_LACe -> ; 1e-13*N_A*(Process__CELL_MEMBRANE_E_LACtrSUB_k0*Variable__CELL_CYTOPLASM_LACi - Process__CELL_MEMBRANE_E_LACtrSUB_k1*Variable__ENVIRONMENT_LACe)*(Variable__CELL_CYTOPLASM_AC_Enzyme*1e-13*N_A/1000)*Process__CELL_MEMBRANE_E_LACtrSUB_SW/N_A;  // modifiers: Variable__CELL_CYTOPLASM_LACi, Variable__CELL_MEMBRANE_E_LACtr, Variable__CELL_CYTOPLASM_AC_Enzyme
    Process__CELL_MEMBRANE_E_LACtrSUB_Name = Lactate_transport_process2; Process__CELL_MEMBRANE_E_LACtrSUB_StepperID = DE1; Process__CELL_MEMBRANE_E_LACtrSUB_Priority = 0; Process__CELL_MEMBRANE_E_LACtrSUB_k0 = 0.00733; Process__CELL_MEMBRANE_E_LACtrSUB_k1 = 0.00506; Process__CELL_MEMBRANE_E_LACtrSUB_SW = 0;
  Process__CELL_MEMBRANE_E_LACtrSUB_efflux: -> Variable__ENVIRONMENT_LACe_ef; 1e-13*N_A*(Process__CELL_MEMBRANE_E_LACtrSUB_efflux_k0*Variable__CELL_CYTOPLASM_LACi - Process__CELL_MEMBRANE_E_LACtrSUB_efflux_k1*Variable__ENVIRONMENT_LACe)*(Variable__CELL_CYTOPLASM_AC_Enzyme*1e-13*N_A/1000)*Process__CELL_MEMBRANE_E_LACtrSUB_efflux_SW/N_A;  // modifiers: Variable__CELL_CYTOPLASM_LACi, Variable__CELL_MEMBRANE_E_LACtr, Variable__CELL_CYTOPLASM_AC_Enzyme, Variable__ENVIRONMENT_LACe
    Process__CELL_MEMBRANE_E_LACtrSUB_efflux_Name = Lactate_efflux_calc; Process__CELL_MEMBRANE_E_LACtrSUB_efflux_StepperID = DE1; Process__CELL_MEMBRANE_E_LACtrSUB_efflux_Priority = 0; Process__CELL_MEMBRANE_E_LACtrSUB_efflux_k0 = 0.00733; Process__CELL_MEMBRANE_E_LACtrSUB_efflux_k1 = 0.00506; Process__CELL_MEMBRANE_E_LACtrSUB_efflux_SW = 0;
  Process__CELL_MEMBRANE_E_NaK_Pump: 3 Variable__CELL_CYTOPLASM_Nai + 2 Variable__ENVIRONMENT_Ke + Variable__CELL_CYTOPLASM_MgATP -> Variable__CELL_CYTOPLASM_MgADP + Variable__CELL_CYTOPLASM_Pi + 2 Variable__CELL_CYTOPLASM_Ki + 3 Variable__ENVIRONMENT_Nae; 1000*Variable__CELL_CYTOPLASM_MgATP/(1000*Variable__CELL_CYTOPLASM_MgATP + Process__CELL_MEMBRANE_E_NaK_Pump_Km)*(Process__CELL_MEMBRANE_E_NaK_Pump_Vm/2)*(1000*Variable__ENVIRONMENT_Ke*1000*Variable__ENVIRONMENT_Ke + Process__CELL_MEMBRANE_E_NaK_Pump_B2*1000*Variable__ENVIRONMENT_Ke*Process__CELL_MEMBRANE_E_NaK_Pump_z/2)/(Process__CELL_MEMBRANE_E_NaK_Pump_B1*Process__CELL_MEMBRANE_E_NaK_Pump_B2 + 2*Process__CELL_MEMBRANE_E_NaK_Pump_B2*1000*Variable__ENVIRONMENT_Ke + 1000*Variable__ENVIRONMENT_Ke*1000*Variable__ENVIRONMENT_Ke + (Process__CELL_MEMBRANE_E_NaK_Pump_B3/(1000*Variable__CELL_CYTOPLASM_Nai) + 1)*(Process__CELL_MEMBRANE_E_NaK_Pump_B3/(1000*Variable__CELL_CYTOPLASM_Nai) + 1)*(Process__CELL_MEMBRANE_E_NaK_Pump_B3/(1000*Variable__CELL_CYTOPLASM_Nai) + 1)*(Process__CELL_MEMBRANE_E_NaK_Pump_B1*Process__CELL_MEMBRANE_E_NaK_Pump_B2*Process__CELL_MEMBRANE_E_NaK_Pump_k2k1 + Process__CELL_MEMBRANE_E_NaK_Pump_k3k1*(1000*Variable__ENVIRONMENT_Ke*1000*Variable__ENVIRONMENT_Ke + Process__CELL_MEMBRANE_E_NaK_Pump_B2*1000*Variable__ENVIRONMENT_Ke*Process__CELL_MEMBRANE_E_NaK_Pump_z)))*1e-13*N_A*Variable__CELL_MEMBRANE_AC_NaK_Pump*1e-13*N_A/1000/3600/1000/N_A;  // modifiers: Variable__CELL_MEMBRANE_E_NaK_Pump, Variable__CELL_MEMBRANE_AC_NaK_Pump
    Process__CELL_MEMBRANE_E_NaK_Pump_Name = Sodium_potassium_Pump; Process__CELL_MEMBRANE_E_NaK_Pump_StepperID = DE1; Process__CELL_MEMBRANE_E_NaK_Pump_Priority = 0; Process__CELL_MEMBRANE_E_NaK_Pump_B1 = 0.0617; Process__CELL_MEMBRANE_E_NaK_Pump_B2 = 0.1328; Process__CELL_MEMBRANE_E_NaK_Pump_B3 = 6.2672; Process__CELL_MEMBRANE_E_NaK_Pump_Km = 0.764; Process__CELL_MEMBRANE_E_NaK_Pump_Vm = 2.32; Process__CELL_MEMBRANE_E_NaK_Pump_k2k1 = 0.0082; Process__CELL_MEMBRANE_E_NaK_Pump_k3k1 = 0.0501; Process__CELL_MEMBRANE_E_NaK_Pump_z = 0.7114;
  Process__CELL_MEMBRANE_E_NaK_PumpSUB: 3 Variable__ENVIRONMENT_Nae -> 2 Variable__ENVIRONMENT_Ke; 1000*Variable__CELL_CYTOPLASM_MgATP/(1000*Variable__CELL_CYTOPLASM_MgATP + Process__CELL_MEMBRANE_E_NaK_PumpSUB_Km)*(Process__CELL_MEMBRANE_E_NaK_PumpSUB_Vm/2)*(1000*Variable__ENVIRONMENT_Ke*1000*Variable__ENVIRONMENT_Ke + Process__CELL_MEMBRANE_E_NaK_PumpSUB_B2*1000*Variable__ENVIRONMENT_Ke*Process__CELL_MEMBRANE_E_NaK_PumpSUB_z/2)/(Process__CELL_MEMBRANE_E_NaK_PumpSUB_B1*Process__CELL_MEMBRANE_E_NaK_PumpSUB_B2 + 2*Process__CELL_MEMBRANE_E_NaK_PumpSUB_B2*1000*Variable__ENVIRONMENT_Ke + 1000*Variable__ENVIRONMENT_Ke*1000*Variable__ENVIRONMENT_Ke + (Process__CELL_MEMBRANE_E_NaK_PumpSUB_B3/(1000*Variable__CELL_CYTOPLASM_Nai) + 1)*(Process__CELL_MEMBRANE_E_NaK_PumpSUB_B3/(1000*Variable__CELL_CYTOPLASM_Nai) + 1)*(Process__CELL_MEMBRANE_E_NaK_PumpSUB_B3/(1000*Variable__CELL_CYTOPLASM_Nai) + 1)*(Process__CELL_MEMBRANE_E_NaK_PumpSUB_B1*Process__CELL_MEMBRANE_E_NaK_PumpSUB_B2*Process__CELL_MEMBRANE_E_NaK_PumpSUB_k2k1 + Process__CELL_MEMBRANE_E_NaK_PumpSUB_k3k1*(1000*Variable__ENVIRONMENT_Ke*1000*Variable__ENVIRONMENT_Ke + Process__CELL_MEMBRANE_E_NaK_PumpSUB_B2*1000*Variable__ENVIRONMENT_Ke*Process__CELL_MEMBRANE_E_NaK_PumpSUB_z)))*1e-13*N_A*Variable__CELL_MEMBRANE_AC_NaK_Pump*1e-13*N_A/1000/3600/1000*Process__CELL_MEMBRANE_E_NaK_PumpSUB_SW/N_A;  // modifiers: Variable__CELL_CYTOPLASM_Nai, Variable__CELL_CYTOPLASM_MgATP, Variable__CELL_MEMBRANE_E_NaK_Pump, Variable__CELL_MEMBRANE_AC_NaK_Pump, Variable__CELL_CYTOPLASM_MgADP, Variable__CELL_CYTOPLASM_Pi, Variable__CELL_CYTOPLASM_Ki
    Process__CELL_MEMBRANE_E_NaK_PumpSUB_Name = Sodium_potassium_Pump; Process__CELL_MEMBRANE_E_NaK_PumpSUB_StepperID = DE1; Process__CELL_MEMBRANE_E_NaK_PumpSUB_Priority = 0; Process__CELL_MEMBRANE_E_NaK_PumpSUB_B1 = 0.0617; Process__CELL_MEMBRANE_E_NaK_PumpSUB_B2 = 0.1328; Process__CELL_MEMBRANE_E_NaK_PumpSUB_B3 = 6.2672; Process__CELL_MEMBRANE_E_NaK_PumpSUB_Km = 0.764; Process__CELL_MEMBRANE_E_NaK_PumpSUB_Vm = 2.32; Process__CELL_MEMBRANE_E_NaK_PumpSUB_k2k1 = 0.0082; Process__CELL_MEMBRANE_E_NaK_PumpSUB_k3k1 = 0.0501; Process__CELL_MEMBRANE_E_NaK_PumpSUB_z = 0.7114; Process__CELL_MEMBRANE_E_NaK_PumpSUB_SW = 0;
  Process__CELL_MEMBRANE_E_Na_Leak: Variable__ENVIRONMENT_Nae -> Variable__CELL_CYTOPLASM_Nai; (Process__CELL_MEMBRANE_E_Na_Leak_Kx*Process__CELL_MEMBRANE_E_Na_Leak_z*ln(Process__CELL_MEMBRANE_E_Na_Leak_r)*(1000*Variable__ENVIRONMENT_Nae - Process__CELL_MEMBRANE_E_Na_Leak_r*1000*Variable__CELL_CYTOPLASM_Nai)/(Process__CELL_MEMBRANE_E_Na_Leak_r - 1) + Process__CELL_MEMBRANE_E_Na_Leak_Vm*(1000*Variable__ENVIRONMENT_Nae/(Process__CELL_MEMBRANE_E_Na_Leak_Km + 1000*Variable__ENVIRONMENT_Nae) - Process__CELL_MEMBRANE_E_Na_Leak_r*1000*Variable__CELL_CYTOPLASM_Nai/(Process__CELL_MEMBRANE_E_Na_Leak_Km + Process__CELL_MEMBRANE_E_Na_Leak_r*1000*Variable__CELL_CYTOPLASM_Nai)))*1e-13*N_A*Variable__CELL_CYTOPLASM_AC_Enzyme*1e-13*N_A/1000/1000/3600/N_A;  // modifiers: Variable__CELL_MEMBRANE_E_Na_Leak, Variable__CELL_CYTOPLASM_AC_Enzyme
    Process__CELL_MEMBRANE_E_Na_Leak_Name = Sodium_leakage_process; Process__CELL_MEMBRANE_E_Na_Leak_StepperID = DE1; Process__CELL_MEMBRANE_E_Na_Leak_Priority = 0; Process__CELL_MEMBRANE_E_Na_Leak_Km = 21; Process__CELL_MEMBRANE_E_Na_Leak_Kx = 0.00706; Process__CELL_MEMBRANE_E_Na_Leak_Vm = 2.82; Process__CELL_MEMBRANE_E_Na_Leak_r = 0.62; Process__CELL_MEMBRANE_E_Na_Leak_z = 1;
  Process__CELL_MEMBRANE_E_Na_LeakSUB: -> Variable__ENVIRONMENT_Nae; (Process__CELL_MEMBRANE_E_Na_LeakSUB_Kx*Process__CELL_MEMBRANE_E_Na_LeakSUB_z*ln(Process__CELL_MEMBRANE_E_Na_LeakSUB_r)*(1000*Variable__ENVIRONMENT_Nae - Process__CELL_MEMBRANE_E_Na_LeakSUB_r*1000*Variable__CELL_CYTOPLASM_Nai)/(Process__CELL_MEMBRANE_E_Na_LeakSUB_r - 1) + Process__CELL_MEMBRANE_E_Na_LeakSUB_Vm*(1000*Variable__ENVIRONMENT_Nae/(Process__CELL_MEMBRANE_E_Na_LeakSUB_Km + 1000*Variable__ENVIRONMENT_Nae) - Process__CELL_MEMBRANE_E_Na_LeakSUB_r*1000*Variable__CELL_CYTOPLASM_Nai/(Process__CELL_MEMBRANE_E_Na_LeakSUB_Km + Process__CELL_MEMBRANE_E_Na_LeakSUB_r*1000*Variable__CELL_CYTOPLASM_Nai)))*1e-13*N_A*Variable__CELL_CYTOPLASM_AC_Enzyme*1e-13*N_A/1000/1000/3600*Process__CELL_MEMBRANE_E_Na_LeakSUB_SW/N_A;  // modifiers: Variable__CELL_MEMBRANE_E_Na_Leak, Variable__CELL_CYTOPLASM_AC_Enzyme, Variable__CELL_CYTOPLASM_Nai
    Process__CELL_MEMBRANE_E_Na_LeakSUB_Name = Sodium_leakage_process2; Process__CELL_MEMBRANE_E_Na_LeakSUB_StepperID = DE1; Process__CELL_MEMBRANE_E_Na_LeakSUB_Priority = 0; Process__CELL_MEMBRANE_E_Na_LeakSUB_Km = 21; Process__CELL_MEMBRANE_E_Na_LeakSUB_Kx = 0.00706; Process__CELL_MEMBRANE_E_Na_LeakSUB_Vm = 2.82; Process__CELL_MEMBRANE_E_Na_LeakSUB_r = 0.62; Process__CELL_MEMBRANE_E_Na_LeakSUB_z = 1; Process__CELL_MEMBRANE_E_Na_LeakSUB_SW = 0;
  Process__CELL_MEMBRANE_E_PYRtr: Variable__CELL_CYTOPLASM_PYRi -> Variable__ENVIRONMENT_PYRe; 1e-13*N_A*(Process__CELL_MEMBRANE_E_PYRtr_k0*Variable__CELL_CYTOPLASM_PYRi - Process__CELL_MEMBRANE_E_PYRtr_k1*Variable__ENVIRONMENT_PYRe)*(Variable__CELL_CYTOPLASM_AC_Enzyme*1e-13*N_A/1000)/N_A;  // modifiers: Variable__CELL_MEMBRANE_E_PYRtr, Variable__CELL_CYTOPLASM_AC_Enzyme
    Process__CELL_MEMBRANE_E_PYRtr_Name = Pyruvate_transport_process; Process__CELL_MEMBRANE_E_PYRtr_StepperID = DE1; Process__CELL_MEMBRANE_E_PYRtr_Priority = 0; Process__CELL_MEMBRANE_E_PYRtr_k0 = 0.0261; Process__CELL_MEMBRANE_E_PYRtr_k1 = 0.018;
  Process__CELL_MEMBRANE_E_PYRtrSUB: Variable__ENVIRONMENT_PYRe -> ; 1e-13*N_A*(Process__CELL_MEMBRANE_E_PYRtrSUB_k0*Variable__CELL_CYTOPLASM_PYRi - Process__CELL_MEMBRANE_E_PYRtrSUB_k1*Variable__ENVIRONMENT_PYRe)*(Variable__CELL_CYTOPLASM_AC_Enzyme*1e-13*N_A/1000)*Process__CELL_MEMBRANE_E_PYRtrSUB_SW/N_A;  // modifiers: Variable__CELL_CYTOPLASM_PYRi, Variable__CELL_MEMBRANE_E_PYRtr, Variable__CELL_CYTOPLASM_AC_Enzyme
    Process__CELL_MEMBRANE_E_PYRtrSUB_Name = Pyruvate_transport_process2; Process__CELL_MEMBRANE_E_PYRtrSUB_StepperID = DE1; Process__CELL_MEMBRANE_E_PYRtrSUB_Priority = 0; Process__CELL_MEMBRANE_E_PYRtrSUB_k0 = 0.0261; Process__CELL_MEMBRANE_E_PYRtrSUB_k1 = 0.018; Process__CELL_MEMBRANE_E_PYRtrSUB_SW = 0;
  Process__CELL_MEMBRANE_E_PYRtrSUB_efflux: -> Variable__ENVIRONMENT_PYRe_ef; 1e-13*N_A*(Process__CELL_MEMBRANE_E_PYRtrSUB_efflux_k0*Variable__CELL_CYTOPLASM_PYRi - Process__CELL_MEMBRANE_E_PYRtrSUB_efflux_k1*Variable__ENVIRONMENT_PYRe)*(Variable__CELL_CYTOPLASM_AC_Enzyme*1e-13*N_A/1000)*Process__CELL_MEMBRANE_E_PYRtrSUB_efflux_SW/N_A;  // modifiers: Variable__CELL_CYTOPLASM_PYRi, Variable__CELL_MEMBRANE_E_PYRtr, Variable__CELL_CYTOPLASM_AC_Enzyme, Variable__ENVIRONMENT_PYRe
    Process__CELL_MEMBRANE_E_PYRtrSUB_efflux_Name = Pyruvate_efflux_calc; Process__CELL_MEMBRANE_E_PYRtrSUB_efflux_StepperID = DE1; Process__CELL_MEMBRANE_E_PYRtrSUB_efflux_Priority = 0; Process__CELL_MEMBRANE_E_PYRtrSUB_efflux_k0 = 0.0261; Process__CELL_MEMBRANE_E_PYRtrSUB_efflux_k1 = 0.018; Process__CELL_MEMBRANE_E_PYRtrSUB_efflux_SW = 0;
  Process__CELL_MEMBRANE_E_Pitr: Variable__CELL_CYTOPLASM_Pi -> Variable__ENVIRONMENT_Pie; 1e-13*N_A*(Process__CELL_MEMBRANE_E_Pitr_k0*Variable__CELL_CYTOPLASM_Pi - Process__CELL_MEMBRANE_E_Pitr_k1*Variable__ENVIRONMENT_Pie)*(Variable__CELL_CYTOPLASM_AC_Enzyme*1e-13*N_A/1000)/N_A;  // modifiers: Variable__CELL_MEMBRANE_E_Pitr, Variable__CELL_CYTOPLASM_AC_Enzyme
    Process__CELL_MEMBRANE_E_Pitr_Name = Pi_transport_process; Process__CELL_MEMBRANE_E_Pitr_StepperID = DE1; Process__CELL_MEMBRANE_E_Pitr_Priority = 0; Process__CELL_MEMBRANE_E_Pitr_k0 = 0.000606; Process__CELL_MEMBRANE_E_Pitr_k1 = 0.00056;
  Process__CELL_MEMBRANE_E_PitrSUB: Variable__ENVIRONMENT_Pie -> ; 1e-13*N_A*(Process__CELL_MEMBRANE_E_PitrSUB_k0*Variable__CELL_CYTOPLASM_Pi - Process__CELL_MEMBRANE_E_PitrSUB_k1*Variable__ENVIRONMENT_Pie)*(Variable__CELL_CYTOPLASM_AC_Enzyme*1e-13*N_A/1000)*Process__CELL_MEMBRANE_E_PitrSUB_SW/N_A;  // modifiers: Variable__CELL_CYTOPLASM_Pi, Variable__CELL_MEMBRANE_E_Pitr, Variable__CELL_CYTOPLASM_AC_Enzyme
    Process__CELL_MEMBRANE_E_PitrSUB_Name = Pi_transport_process2; Process__CELL_MEMBRANE_E_PitrSUB_StepperID = DE1; Process__CELL_MEMBRANE_E_PitrSUB_Priority = 0; Process__CELL_MEMBRANE_E_PitrSUB_k0 = 0.000606; Process__CELL_MEMBRANE_E_PitrSUB_k1 = 0.00056; Process__CELL_MEMBRANE_E_PitrSUB_SW = 0;
  Process__CELL_MEMBRANE_E_PitrSUB_efflux: -> Variable__ENVIRONMENT_Pie_ef; 1e-13*N_A*(Process__CELL_MEMBRANE_E_PitrSUB_efflux_k0*Variable__CELL_CYTOPLASM_Pi - Process__CELL_MEMBRANE_E_PitrSUB_efflux_k1*Variable__ENVIRONMENT_Pie)*(Variable__CELL_CYTOPLASM_AC_Enzyme*1e-13*N_A/1000)*Process__CELL_MEMBRANE_E_PitrSUB_efflux_SW/N_A;  // modifiers: Variable__CELL_CYTOPLASM_Pi, Variable__CELL_MEMBRANE_E_Pitr, Variable__CELL_CYTOPLASM_AC_Enzyme, Variable__ENVIRONMENT_Pie
    Process__CELL_MEMBRANE_E_PitrSUB_efflux_Name = Pi_efflux_calc; Process__CELL_MEMBRANE_E_PitrSUB_efflux_StepperID = DE1; Process__CELL_MEMBRANE_E_PitrSUB_efflux_Priority = 0; Process__CELL_MEMBRANE_E_PitrSUB_efflux_k0 = 0.000606; Process__CELL_MEMBRANE_E_PitrSUB_efflux_k1 = 0.00056; Process__CELL_MEMBRANE_E_PitrSUB_efflux_SW = 0;
end
